# OpenSim document version 40500
Model SUBJ01_2d:
  gravity: 0 -9.80665 0
  length_units: meters
  force_units: N
  credits:
    A 2-D model 11 degrees of freedom and 18 muscles for simulating walking. This model was assembled by Vinh Nguyen and Russel Johnson and includes elements from Delp et al. (1990), Yamaguchi Zajac (1989), Anderson Pandy (1999), Sasaki et al. (2009) and Porsa et al. (2016). The CustomJoint and moving muscle insertion points for the knee joint are due to Ajay Seth. For use with Moco, Brian Umberger replaced the muscles with DeGrooteFregly2016Muscles and the ground contact elements with SmoothSphereHalfSpaceForces. License: Creative Commons (CCBY 3.0). You are free to distribute, remix, tweak, and build upon this work, even commercially, as long as you credit us for the original creation.
  publications:
    >Nguyen, V.Q.,Johnson, R.T., Sup, F.C., Umberger, B.R. Bilevel Optimization for Cost Function Determination in Dynamic Simulation of Human Gait. IEEE Transactions on Neural Systems and Rehabilitation Engineering, vol 27 pp 1426-1435, 2019
  Ground
  BodySet:
    Body pelvis: mass=9.842278 [kg] mass_center=(-0.07651588 0 0) inertia=(0.1303336 0.1303336 0.07217241 0 0 0)
        meshes=(sacrum.vtp pelvis.vtp l_pelvis.vtp)
    Body femur_r: mass=7.773369 mass_center=(0 -0.1661533 0) inertia=(0.1325121 0.03473619 0.1397363 0 0 0)
        meshes=r_femur.vtp
    Body tibia_r: mass=3.098433 mass_center=(0 -0.1832955 0) inertia=(0.05008705 0.005068333 0.05078269 0 0 0)
        meshes=(r_tibia.vtp r_fibula.vtp)
    Body talus_r: mass=0.08357203 mass_center=(0 0 0) inertia=(0.0009368521 0.0009368521 0.0009368521 0 0 0)
        meshes=talus.vtp
    Body calcn_r: mass=1.04465 mass_center=(0.08378965 0.02513689 0)
        inertia=(0.0009716785 0.002706823 0.002845631 0 0 0) meshes=foot.vtp
    Body toes_r: mass=0.181017 mass_center=(0.02754644 0.004776839 -0.01393236)
        inertia=(5.375081e-5 0.0001075016 5.375081e-5 0 0 0) meshes=bofoot.vtp
    Body femur_l: mass=7.773369 mass_center=(0 -0.1682617 0) inertia=(0.1358965 0.03562337 0.1433053 0 0 0)
        meshes=l_femur.vtp
    Body tibia_l: mass=3.098433 mass_center=(0 -0.1793093 0) inertia=(0.04793217 0.00485028 0.04859789 0 0 0)
        meshes=(l_tibia.vtp l_fibula.vtp)
    Body talus_l: mass=0.08357203 mass_center=(0 0 0) inertia=(0.0008965463 0.0008965463 0.0008965463 0 0 0)
        meshes=l_talus.vtp
    Body calcn_l: mass=1.04465 mass_center=(0.08276496 0.02482949 0)
        inertia=(0.000948058 0.002641023 0.002776457 0 0 0) meshes=l_foot.vtp
    Body toes_l: mass=0.181017 mass_center=(0.02720957 0.004718422 0.01376198)
        inertia=(5.244419e-5 0.0001048884 5.244419e-5 0 0 0) meshes=l_bofoot.vtp
    Body torso: mass=28.00294 mass_center=(-0.04066547 0.3057933 0) inertia=(1.547318 1.210916 1.547318 0 0 0)
        meshes=(hat_spine.vtp hat_jaw.vtp hat_skull.vtp hat_ribs_scap.vtp)
  JointSet:
    CustomJoint ground_pelvis: socket_parent_frame=ground_offset socket_child_frame=pelvis_offset
      Coordinate pelvis_tilt: default_value=0 range=(-1.570796 1.570796) clamped=true
      Coordinate pelvis_tx: default_value=0 range=(-5 5) clamped=true
      Coordinate pelvis_ty: default_value=1.2 range=(-1 2) clamped=true
      PhysicalOffsetFrame ground_offset: socket_parent=/ground translation=(0 0 0) [meters]
      PhysicalOffsetFrame pelvis_offset: socket_parent=/bodyset/pelvis translation=(0 0 0)
      SpatialTransform: axes_held_at_zero=(rotation2 rotation3)
        TransformAxis rotation1: coordinates=pelvis_tilt axis=(0 0 1) LinearFunction(coefficients=1 0)
        TransformAxis translation1: coordinates=pelvis_tx axis=(1 0 0) LinearFunction(coefficients=1 0)
        TransformAxis translation2: coordinates=pelvis_ty axis=(0 1 0) LinearFunction(coefficients=1 0)
        TransformAxis translation3: axis=(0 0 1) MultiplierFunction(scale=1, Constant(value=0.02))
    PinJoint hip_r: socket_parent_frame=pelvis_offset socket_child_frame=femur_r_offset
      Coordinate hip_flexion_r: default_value=0 range=(-2.094395 2.094395) clamped=true
      PhysicalOffsetFrame pelvis_offset: socket_parent=/bodyset/pelvis translation=(-0.06026965 -0.08606335 0.08471467)
      PhysicalOffsetFrame femur_r_offset: socket_parent=/bodyset/femur_r translation=(0 0 0)
    PinJoint knee_r: socket_parent_frame=femur_r_offset socket_child_frame=tibia_r_offset
      Coordinate knee_angle_r: default_value=0 range=(-2.094395 0)
      PhysicalOffsetFrame femur_r_offset: socket_parent=/bodyset/femur_r translation=(0 -0.3623954 -0.002442856)
      PhysicalOffsetFrame tibia_r_offset: socket_parent=/bodyset/tibia_r translation=(0 0 0)
    PinJoint ankle_r: socket_parent_frame=tibia_r_offset socket_child_frame=talus_r_offset
      Coordinate ankle_angle_r: default_value=-0.3490659 range=(-1.570796 1.570796) clamped=true
      PhysicalOffsetFrame tibia_r_offset: socket_parent=/bodyset/tibia_r translation=(-0.009550224 -0.382009 0)
      PhysicalOffsetFrame talus_r_offset: socket_parent=/bodyset/talus_r translation=(0 0 0)
    WeldJoint subtalar_r: socket_parent_frame=talus_r_offset socket_child_frame=calcn_r_offset
      PhysicalOffsetFrame talus_r_offset: socket_parent=/bodyset/talus_r
          translation=(-0.04657644 -0.04006319 0.007563777)
      PhysicalOffsetFrame calcn_r_offset: socket_parent=/bodyset/calcn_r translation=(0 0 0)
    PinJoint mtp_r: socket_parent_frame=calcn_r_offset socket_child_frame=toes_r_offset
      Coordinate mtp_angle_r: default_value=0 range=(-1.570796 1.570796) clamped=true locked=true
      PhysicalOffsetFrame calcn_r_offset: socket_parent=/bodyset/calcn_r
          translation=(0.1469749 -0.001644014 0.0008877676)
      PhysicalOffsetFrame toes_r_offset: socket_parent=/bodyset/toes_r translation=(0 0 0)
    PinJoint hip_l: socket_parent_frame=pelvis_offset socket_child_frame=femur_l_offset
      Coordinate hip_flexion_l: default_value=0 range=(-2.094395 2.094395) clamped=true
      PhysicalOffsetFrame pelvis_offset: socket_parent=/bodyset/pelvis
          translation=(-0.06026965 -0.08606335 -0.08471467)
      PhysicalOffsetFrame femur_l_offset: socket_parent=/bodyset/femur_l translation=(0 0 0)
    PinJoint knee_l: socket_parent_frame=femur_l_offset socket_child_frame=tibia_l_offset
      Coordinate knee_angle_l: default_value=0 range=(-2.094395 0)
      PhysicalOffsetFrame femur_l_offset: socket_parent=/bodyset/femur_l translation=(0 -0.3669942 0.002473855)
      PhysicalOffsetFrame tibia_l_offset: socket_parent=/bodyset/tibia_l translation=(0 0 0)
    PinJoint ankle_l: socket_parent_frame=tibia_l_offset socket_child_frame=talus_l_offset
      Coordinate ankle_angle_l: default_value=-0.3490659 range=(-1.047198 1.047198) clamped=true
      PhysicalOffsetFrame tibia_l_offset: socket_parent=/bodyset/tibia_l translation=(-0.009342528 -0.3737011 0)
      PhysicalOffsetFrame talus_l_offset: socket_parent=/bodyset/talus_l translation=(0 0 0)
    WeldJoint subtalar_l: socket_parent_frame=talus_l_offset socket_child_frame=calcn_l_offset
      PhysicalOffsetFrame talus_l_offset: socket_parent=/bodyset/talus_l
          translation=(-0.04556351 -0.03919191 -0.007399282)
      PhysicalOffsetFrame calcn_l_offset: socket_parent=/bodyset/calcn_l translation=(0 0 0)
    PinJoint mtp_l: socket_parent_frame=calcn_l_offset socket_child_frame=toes_l_offset
      Coordinate mtp_angle_l: default_value=0 range=(-1.570796 1.570796) clamped=true locked=true
      PhysicalOffsetFrame calcn_l_offset: socket_parent=/bodyset/calcn_l
          translation=(0.1451775 -0.001623909 -0.0008769109)
      PhysicalOffsetFrame toes_l_offset: socket_parent=/bodyset/toes_l translation=(0 0 0)
    PinJoint back: socket_parent_frame=pelvis_offset socket_child_frame=torso_offset
      Coordinate lumbar_ext: default_value=0 range=(-1.570796 1.570796) clamped=true
      PhysicalOffsetFrame pelvis_offset: socket_parent=/bodyset/pelvis translation=(-0.1089836 0.09030632 0)
      PhysicalOffsetFrame torso_offset: socket_parent=/bodyset/torso translation=(0 0 0)
  ForceSet:
    CoordinateLimitForce hip_limit_r: coordinate=hip_flexion_r upper_stiffness=500 [N*m/degree]
        upper_limit=103.7 [degrees] lower_stiffness=729.4401 [N*m/degree] lower_limit=-36.52 [degrees] damping=0
        transition=1 [degrees]
    CoordinateLimitForce hip_limit_l: coordinate=hip_flexion_l upper_stiffness=500 upper_limit=103.7
        lower_stiffness=729.4401 lower_limit=-36.52 damping=0 transition=1
    CoordinateLimitForce knee_limit_r: coordinate=knee_angle_r upper_stiffness=595.4197 upper_limit=11.4485
        lower_stiffness=105.2106 lower_limit=-137.51 damping=0 transition=7
    CoordinateLimitForce knee_limit_l: coordinate=knee_angle_l upper_stiffness=595.4197 upper_limit=11.4485
        lower_stiffness=105.2106 lower_limit=-137.51 damping=0 transition=7
    CoordinateLimitForce ankle_limit_r: coordinate=ankle_angle_r upper_stiffness=889.7686 upper_limit=35.8
        lower_stiffness=390.7439 lower_limit=-48.4 damping=0 transition=9
    CoordinateLimitForce ankle_limit_l: coordinate=ankle_angle_l upper_stiffness=889.7686 upper_limit=35.8
        lower_stiffness=390.7439 lower_limit=-48.4 damping=0 transition=9
    SpringGeneralizedForce hip_flexion_damping_r: coordinate=hip_flexion_r stiffness=0 rest_length=0 viscosity=0.1
    SpringGeneralizedForce hip_flexion_damping_l: coordinate=hip_flexion_l stiffness=0 rest_length=0 viscosity=0.1
    SpringGeneralizedForce knee_damping_r: coordinate=knee_angle_r stiffness=0 rest_length=0 viscosity=0.1
    SpringGeneralizedForce knee_damping_l: coordinate=knee_angle_l stiffness=0 rest_length=0 viscosity=0.1
    SpringGeneralizedForce ankle_damping_r: coordinate=ankle_angle_r stiffness=0 rest_length=0 viscosity=0.5
    SpringGeneralizedForce ankle_damping_l: coordinate=ankle_angle_l stiffness=0 rest_length=0 viscosity=0.5
    CoordinateActuator pelvis_tx_residual: coordinate=pelvis_tx optimal_force=2.5
    CoordinateActuator pelvis_ty_residual: coordinate=pelvis_ty optimal_force=2.5
    CoordinateActuator pelvis_tilt_residual: coordinate=pelvis_tilt optimal_force=2.5
    CoordinateActuator hip_flexion_r_torque: coordinate=hip_flexion_r optimal_force=300
    CoordinateActuator knee_angle_r_torque: coordinate=knee_angle_r optimal_force=300
    CoordinateActuator ankle_angle_r_torque: coordinate=ankle_angle_r optimal_force=200
    CoordinateActuator hip_flexion_l_torque: coordinate=hip_flexion_l optimal_force=300
    CoordinateActuator knee_angle_l_torque: coordinate=knee_angle_l optimal_force=300
    CoordinateActuator ankle_angle_l_torque: coordinate=ankle_angle_l optimal_force=200
    CoordinateActuator lumbar_ext_torque: coordinate=lumbar_ext optimal_force=300
  MarkerSet:
    Marker contact_Foot_Ground_R1: calcn_r (0.008220071 -0.008220071 -0.01644014) fixed=true
    Marker contact_Foot_Ground_R2: calcn_r (0.1315211 -0.008220071 -0.02877025) fixed=true
    Marker contact_Foot_Ground_R3: calcn_r (0.008220071 -0.008220071 0.006165053) fixed=true
    Marker contact_Foot_Ground_R4: calcn_r (0.1027509 -0.008220071 0.04110035) fixed=true
    Marker contact_Foot_Ground_R5: toes_r (0.05754049 -0.006576057 0.008220071) fixed=true
    Marker contact_Foot_Ground_R6: calcn_r (0.06165053 -0.008220071 -0.001438512) fixed=true
    Marker contact_Foot_Ground_R7: toes_r (0.02877025 -0.006576057 -0.01644014) fixed=true
    Marker contact_Foot_Ground_R8: toes_r (0.01644014 -0.006576057 0.02466021) fixed=true
    Marker contact_Foot_Ground_L1: calcn_l (0.008119546 -0.008119546 0.01623909) fixed=true
    Marker contact_Foot_Ground_L2: calcn_l (0.1299127 -0.008119546 0.02841841) fixed=true
    Marker contact_Foot_Ground_L3: calcn_l (0.008119546 -0.008119546 -0.006089659) fixed=true
    Marker contact_Foot_Ground_L4: calcn_l (0.1014943 -0.008119546 -0.04059773) fixed=true
    Marker contact_Foot_Ground_L5: toes_l (0.05683682 -0.006495636 -0.008119546) fixed=true
    Marker contact_Foot_Ground_L6: calcn_l (0.06089659 -0.008119546 0.00142092) fixed=true
    Marker contact_Foot_Ground_L7: toes_l (0.02841841 -0.006495636 0.01623909) fixed=true
    Marker contact_Foot_Ground_L8: toes_l (0.01623909 -0.006495636 -0.02435864) fixed=true
    Marker C7: torso (-0.1133341 0.4088887 0.00204595) fixed=true
    Marker CLAV: torso (0.05333369 0.3571901 0.001958477) fixed=true
    Marker RSHO: torso (0.01954595 0.388995 0.1720803) fixed=true
    Marker LSHO: torso (0.019546 0.3889951 -0.1720802) fixed=true
    Marker RASI: pelvis (0.0102068 0.01982626 0.1408593) fixed=true
    Marker LASI: pelvis (0.0102068 0.01982626 -0.1408593) fixed=true
    Marker SACR: pelvis (-0.1659997 0.03837708 0) fixed=true
    Marker RKNE: femur_r (0 -0.3588777 0.04441556) fixed=true
    Marker RANK: tibia_r (-0.004775112 -0.3780616 0.05061619) fixed=true
    Marker RHEE: calcn_r (-0.02055018 0.01644014 -0.004110035) fixed=true
    Marker LKNE: femur_l (0 -0.3634318 -0.04497918) fixed=true
    Marker LANK: tibia_l (-0.004671264 -0.3698399 -0.0495154) fixed=true
    Marker LHEE: calcn_l (-0.02029886 0.01623909 0.004059773) fixed=true
    Marker STRN: torso (0.1334171 0.2115096 0.00204595) fixed=true
    Marker T10: torso (-0.1237755 0.1606844 0.00204595) fixed=true
    Marker RTIB: tibia_r (-0.001372926 -0.2334368 0.09399623)
    Marker LTIB: tibia_l (-0.03478372 -0.2178664 -0.09725649)
    Marker RTOE: toes_r (0.001319321 0.02609702 0.00397052)
    Marker LTOE: toes_l (0.001303187 0.0257779 -0.00392196)
    Marker RTHI: femur_r (0.01270829 -0.1839241 0.1088768)
    Marker LTHI: femur_l (-0.02030173 -0.1623891 -0.1318801)
