# OpenSim document version 40500
Model SUBJ01_3d:
  gravity: 0 -9.81 0
  length_units: meters
  force_units: N
  Ground
  BodySet:
    Body pelvis: mass=9.72451 [kg] mass_center=(-0.07571726 0 0) inertia=(0.101386 0.101386 0.05614241 0 0 0)
        meshes=(r_pelvis.vtp l_pelvis.vtp sacrum.vtp)
    Body femur_l: mass=7.680357 mass_center=(0 -0.1529292 0) inertia=(0.08947398 0.02345434 0.09435195 0 0 0)
        meshes=l_femur.vtp
    Body femur_r: mass=7.680357 mass_center=(0 -0.1510129 0) inertia=(0.08724567 0.02287022 0.09200216 0 0 0)
        meshes=r_femur.vtp
    Body tibia_l: mass=3.061359 mass_center=(0 -0.174425 0) inertia=(0.0363239 0.003675632 0.03682839 0 0 0)
        meshes=(l_tibia.vtp l_fibula.vtp)
    Body tibia_r: mass=3.061359 mass_center=(0 -0.1783027 0) inertia=(0.0379569 0.003840877 0.03848408 0 0 0)
        meshes=(r_tibia.vtp r_fibula.vtp)
    Body patella_l: mass=0.07117711 mass_center=(0.001619251 0.02374901 0)
        inertia=(1.917777e-6 8.760298e-6 8.760298e-6 0 0 0) meshes=l_patella.vtp
    Body patella_r: mass=0.07117711 mass_center=(0.00159896 0.02345142 0)
        inertia=(1.870016e-6 8.542127e-6 8.542127e-6 0 0 0) meshes=r_patella.vtp
    Body talus_l: mass=0.08257205 mass_center=(0 0 0) inertia=(0.0007207122 0.0007207122 0.0007207122 0 0 0)
        meshes=l_talus.vtp
    Body talus_r: mass=0.08257205 mass_center=(0 0 0) inertia=(0.0007531131 0.0007531131 0.0007531131 0 0 0)
        meshes=r_talus.vtp
    Body calcn_l: mass=1.032151 mass_center=(0.08119546 0.02435864 0)
        inertia=(0.0007621221 0.002123054 0.002231929 0 0 0) meshes=l_foot.vtp
    Body calcn_r: mass=1.032151 mass_center=(0.08220071 0.02466021 0)
        inertia=(0.00078111 0.002175949 0.002287536 0 0 0) meshes=r_foot.vtp
    Body toes_l: mass=0.1788511 mass_center=(0.02809363 0.004871727 0.0142092)
        inertia=(5.443729e-5 0.0001088746 0.0005443729 0 0 0) meshes=l_bofoot.vtp
    Body toes_r: mass=0.1788511 mass_center=(0.02844144 0.004932042 0.01438512)
        inertia=(5.579357e-5 0.0001115871 0.0005579357 0 0 0) meshes=r_bofoot.vtp
    Body torso: mass=28.26986 mass_center=(-0.04000027 0.3007917 0) inertia=(1.314516 1.028728 1.314516 0 0 0)
        meshes=(hat_spine.vtp hat_jaw.vtp hat_skull.vtp hat_ribs_scap.vtp)
  JointSet:
    CustomJoint ground_pelvis: socket_parent_frame=ground_offset socket_child_frame=pelvis_offset
      Coordinate pelvis_tilt: range=(-1.570796 1.570796)
      Coordinate pelvis_list: range=(-1.570796 1.570796)
      Coordinate pelvis_rotation: range=(-1.570796 1.570796)
      Coordinate pelvis_tx: range=(-5 5)
      Coordinate pelvis_ty: default_value=0.94 range=(-3 3)
      Coordinate pelvis_tz: default_value=0 range=(-3 3)
      PhysicalOffsetFrame ground_offset: socket_parent=/ground translation=(0 0 0) [meters]
      PhysicalOffsetFrame pelvis_offset: socket_parent=/bodyset/pelvis translation=(0 0 0)
      SpatialTransform:
        TransformAxis rotation1: coordinates=pelvis_tilt axis=(0 0 1) LinearFunction(coefficients=1 0)
        TransformAxis rotation2: coordinates=pelvis_list axis=(1 0 0) LinearFunction(coefficients=1 0)
        TransformAxis rotation3: coordinates=pelvis_rotation axis=(0 1 0) LinearFunction(coefficients=1 0)
        TransformAxis translation1: coordinates=pelvis_tx axis=(1 0 0) LinearFunction(coefficients=1 0)
        TransformAxis translation2: coordinates=pelvis_ty axis=(0 1 0) LinearFunction(coefficients=1 0)
        TransformAxis translation3: coordinates=pelvis_tz axis=(0 0 1) LinearFunction(coefficients=1 0)
    CustomJoint hip_l: socket_parent_frame=pelvis_offset socket_child_frame=femur_l_offset
      Coordinate hip_flexion_l: default_value=0 range=(-0.5235988 2.094395)
      Coordinate hip_adduction_l: range=(-0.8726646 0.5235988)
      Coordinate hip_rotation_l: range=(-0.6981317 0.6981317)
      PhysicalOffsetFrame pelvis_offset: socket_parent=/bodyset/pelvis
          translation=(-0.06026965 -0.08606335 -0.08471467)
      PhysicalOffsetFrame femur_l_offset: socket_parent=/bodyset/femur_l translation=(0 0 0)
      SpatialTransform: axes_held_at_zero=(translation1 translation2 translation3)
        TransformAxis rotation1: coordinates=hip_flexion_l axis=(0 0 1) LinearFunction(coefficients=1 0)
        TransformAxis rotation2: coordinates=hip_adduction_l axis=(1 0 0) LinearFunction(coefficients=-1 0)
        TransformAxis rotation3: coordinates=hip_rotation_l axis=(0 1 0) LinearFunction(coefficients=-1 0)
    CustomJoint hip_r: socket_parent_frame=pelvis_offset socket_child_frame=femur_r_offset
      Coordinate hip_flexion_r: default_value=0 range=(-0.5235988 2.094395)
      Coordinate hip_adduction_r: range=(-0.8726646 0.5235988)
      Coordinate hip_rotation_r: range=(-0.6981317 0.6981317)
      PhysicalOffsetFrame pelvis_offset: socket_parent=/bodyset/pelvis translation=(-0.06026965 -0.08606335 0.08471467)
      PhysicalOffsetFrame femur_r_offset: socket_parent=/bodyset/femur_r translation=(0 0 0)
      SpatialTransform: axes_held_at_zero=(translation1 translation2 translation3)
        TransformAxis rotation1: coordinates=hip_flexion_r axis=(0 0 1) LinearFunction(coefficients=1 0)
        TransformAxis rotation2: coordinates=hip_adduction_r axis=(1 0 0) LinearFunction(coefficients=1 0)
        TransformAxis rotation3: coordinates=hip_rotation_r axis=(0 1 0) LinearFunction(coefficients=1 0)
    CustomJoint patellofemoral_l: socket_parent_frame=tibia_l_offset socket_child_frame=patella_l_offset
      Coordinate knee_angle_l_beta
      PhysicalOffsetFrame tibia_l_offset: socket_parent=/bodyset/femur_l
          translation=(-0.007277632 -0.3669942 0.002473855)
      PhysicalOffsetFrame patella_l_offset: socket_parent=/bodyset/patella_l translation=(0 0 0)
      SpatialTransform: axes_held_at_zero=(rotation2 rotation3)
        TransformAxis rotation1: coordinates=knee_angle_l_beta axis=(0 0 1)
          SimmSpline: x=(0 0.174533 0.349066 0.523599 0.698132 0.872665 1.0472 1.22173 1.39626 1.5708 1.74533 1.91986 2.0944)
              y=(0.00113686 -0.00629212 -0.105582 -0.253683 -0.414245 -0.579047 -0.747244 -0.91799 -1.09044 -1.26379 -1.43763 -1.61186 -1.78634)
        TransformAxis translation1: coordinates=knee_angle_l_beta axis=(1 0 0)
          MultiplierFunction: scale=0.8995837
            SimmSpline: x=(0 0.174533 0.349066 0.523599 0.698132 0.872665 1.0472 1.22173 1.39626 1.5708 1.74533 1.91986 2.0944)
                y=(0.0524 0.0488 0.0437 0.0371 0.0296 0.0216 0.0136 0.0057 -0.0019 -0.0088 -0.0148 -0.0196 -0.0227)
        TransformAxis translation2: coordinates=knee_angle_l_beta axis=(0 1 0)
          MultiplierFunction: scale=0.8995837
            SimmSpline: x=(0 0.174533 0.349066 0.523599 0.698132 0.872665 1.0472 1.22173 1.39626 1.5708 1.74533 1.91986 2.0944)
                y=(-0.0108 -0.019 -0.0263 -0.0322 -0.0367 -0.0395 -0.0408 -0.0404 -0.0384 -0.0349 -0.0301 -0.0245 -0.0187)
        TransformAxis translation3: axis=(0 0 1) MultiplierFunction(scale=0.8995837, Constant(value=-0.00275))
    CustomJoint patellofemoral_r: socket_parent_frame=tibia_r_offset socket_child_frame=patella_r_offset
      Coordinate knee_angle_r_beta
      PhysicalOffsetFrame tibia_r_offset: socket_parent=/bodyset/femur_r
          translation=(-0.007186437 -0.3623954 -0.002442856)
      PhysicalOffsetFrame patella_r_offset: socket_parent=/bodyset/patella_r translation=(0 0 0)
      SpatialTransform: axes_held_at_zero=(rotation2 rotation3)
        TransformAxis rotation1: coordinates=knee_angle_r_beta axis=(0 0 1)
          SimmSpline: x=(0 0.174533 0.349066 0.523599 0.698132 0.872665 1.0472 1.22173 1.39626 1.5708 1.74533 1.91986 2.0944)
              y=(0.00113686 -0.00629212 -0.105582 -0.253683 -0.414245 -0.579047 -0.747244 -0.91799 -1.09044 -1.26379 -1.43763 -1.61186 -1.78634)
        TransformAxis translation1: coordinates=knee_angle_r_beta axis=(1 0 0)
          MultiplierFunction: scale=0.8883112
            SimmSpline: x=(0 0.174533 0.349066 0.523599 0.698132 0.872665 1.0472 1.22173 1.39626 1.5708 1.74533 1.91986 2.0944)
                y=(0.0524 0.0488 0.0437 0.0371 0.0296 0.0216 0.0136 0.0057 -0.0019 -0.0088 -0.0148 -0.0196 -0.0227)
        TransformAxis translation2: coordinates=knee_angle_r_beta axis=(0 1 0)
          MultiplierFunction: scale=0.8883112
            SimmSpline: x=(0 0.174533 0.349066 0.523599 0.698132 0.872665 1.0472 1.22173 1.39626 1.5708 1.74533 1.91986 2.0944)
                y=(-0.0108 -0.019 -0.0263 -0.0322 -0.0367 -0.0395 -0.0408 -0.0404 -0.0384 -0.0349 -0.0301 -0.0245 -0.0187)
        TransformAxis translation3: axis=(0 0 1) MultiplierFunction(scale=0.8883112, Constant(value=0.00275))
    PinJoint knee_l: socket_parent_frame=femur_l_offset socket_child_frame=tibia_l_offset
      Coordinate knee_angle_l: default_value=0 range=(-2.094395 0)
      PhysicalOffsetFrame femur_l_offset: socket_parent=/bodyset/femur_l translation=(0 -0.3669942 0.002473855)
      PhysicalOffsetFrame tibia_l_offset: socket_parent=/bodyset/tibia_l translation=(0 0 0)
    PinJoint knee_r: socket_parent_frame=femur_r_offset socket_child_frame=tibia_r_offset
      Coordinate knee_angle_r: default_value=0 range=(-2.094395 0)
      PhysicalOffsetFrame femur_r_offset: socket_parent=/bodyset/femur_r translation=(0 -0.3623954 -0.002442856)
      PhysicalOffsetFrame tibia_r_offset: socket_parent=/bodyset/tibia_r translation=(0 0 0)
    PinJoint ankle_l: socket_parent_frame=tibia_l_offset socket_child_frame=talus_l_offset
      Coordinate ankle_angle_l: range=(-0.6981317 0.5235988)
      PhysicalOffsetFrame tibia_l_offset: socket_parent=/bodyset/tibia_l translation=(-0.009342528 -0.3737011 0)
          orientation=(-0.1758952 0.105208 0.01866219) [radians]
      PhysicalOffsetFrame talus_l_offset: socket_parent=/bodyset/talus_l translation=(0 0 0)
          orientation=(-0.1758952 0.105208 0.01866219)
    PinJoint ankle_r: socket_parent_frame=tibia_r_offset socket_child_frame=talus_r_offset
      Coordinate ankle_angle_r: range=(-0.6981317 0.5235988)
      PhysicalOffsetFrame tibia_r_offset: socket_parent=/bodyset/tibia_r translation=(-0.009550224 -0.382009 0)
          orientation=(0.1758952 -0.105208 0.01866219)
      PhysicalOffsetFrame talus_r_offset: socket_parent=/bodyset/talus_r translation=(0 0 0)
          orientation=(0.1758952 -0.105208 0.01866219)
    PinJoint subtalar_l: socket_parent_frame=talus_l_offset socket_child_frame=calcn_l_offset
      Coordinate subtalar_angle_l: default_value=0 range=(-0.3490659 0.3490659) locked=true
      PhysicalOffsetFrame talus_l_offset: socket_parent=/bodyset/talus_l
          translation=(-0.04556351 -0.03919191 -0.007399282) orientation=(1.768191 -0.906223 1.819602)
      PhysicalOffsetFrame calcn_l_offset: socket_parent=/bodyset/calcn_l translation=(0 0 0)
          orientation=(1.768191 -0.906223 1.819602)
    PinJoint subtalar_r: socket_parent_frame=talus_r_offset socket_child_frame=calcn_r_offset
      Coordinate subtalar_angle_r: default_value=0 range=(-0.3490659 0.3490659) locked=true
      PhysicalOffsetFrame talus_r_offset: socket_parent=/bodyset/talus_r
          translation=(-0.04657644 -0.04006319 0.007563777) orientation=(-1.768191 0.906223 1.819602)
      PhysicalOffsetFrame calcn_r_offset: socket_parent=/bodyset/calcn_r translation=(0 0 0)
          orientation=(-1.768191 0.906223 1.819602)
    PinJoint mtp_l: socket_parent_frame=calcn_l_offset socket_child_frame=toes_l_offset
      Coordinate mtp_angle_l: default_value=0 range=(-1.0472 1.0472) locked=true
      PhysicalOffsetFrame calcn_l_offset: socket_parent=/bodyset/calcn_l
          translation=(0.1451775 -0.001623909 -0.0008769109) orientation=(0 0.6199005 0)
      PhysicalOffsetFrame toes_l_offset: socket_parent=/bodyset/toes_l translation=(0 0 0) orientation=(0 0.6199005 0)
    PinJoint mtp_r: socket_parent_frame=calcn_r_offset socket_child_frame=toes_r_offset
      Coordinate mtp_angle_r: default_value=0 range=(-1.0472 1.0472) locked=true
      PhysicalOffsetFrame calcn_r_offset: socket_parent=/bodyset/calcn_r
          translation=(0.1469749 -0.001644014 0.0008877676) orientation=(0 -0.6199005 0)
      PhysicalOffsetFrame toes_r_offset: socket_parent=/bodyset/toes_r translation=(0 0 0) orientation=(0 -0.6199005 0)
    CustomJoint lumbar: socket_parent_frame=pelvis_offset socket_child_frame=torso_offset
      Coordinate lumbar_ext: range=(-1.570796 1.570796)
      Coordinate lumbar_bend: range=(-1.570796 1.570796)
      Coordinate lumbar_rota: range=(-1.570796 1.570796)
      PhysicalOffsetFrame pelvis_offset: socket_parent=/bodyset/pelvis translation=(-0.1078462 0.08936378 0)
      PhysicalOffsetFrame torso_offset: socket_parent=/bodyset/torso translation=(0 0 0)
      SpatialTransform: axes_held_at_zero=(translation1 translation2 translation3)
        TransformAxis rotation1: coordinates=lumbar_ext axis=(0 0 1) LinearFunction(coefficients=1 0)
        TransformAxis rotation2: coordinates=lumbar_bend axis=(1 0 0) LinearFunction(coefficients=1 0)
        TransformAxis rotation3: coordinates=lumbar_rota axis=(0 1 0) LinearFunction(coefficients=1 0)
  ConstraintSet:
    CoordinateCouplerConstraint patellofemoral_knee_angle_r_con: independent_coordinate_names=knee_angle_r
        dependent_coordinate_name=knee_angle_r_beta scale_factor=1
        coupled_coordinates_function=LinearFunction(coefficients=-1 0)
    CoordinateCouplerConstraint patellofemoral_knee_angle_l_con: independent_coordinate_names=knee_angle_l
        dependent_coordinate_name=knee_angle_l_beta scale_factor=1
        coupled_coordinates_function=LinearFunction(coefficients=-1 0)
  ForceSet:
    ExpressionBasedCoordinateForce PassiveHipDampingX_r: coordinate=hip_flexion_r
        expression=-2.44*exp(5.05*(q-1.81))+1.51*exp(-21.88*(q+0.47))-0.1*qdot
    ExpressionBasedCoordinateForce PassiveHipDampingY_r: coordinate=hip_adduction_r
        expression=-0.03*exp(14.94*(q-0.50))+0.03*exp(-14.94*(q+0.50))-0.1*qdot
    ExpressionBasedCoordinateForce PassiveHipDampingZ_r: coordinate=hip_rotation_r
        expression=-0.03*exp(14.94*(q-0.92))+0.03*exp(-14.94*(q+0.92))-0.1*qdot
    ExpressionBasedCoordinateForce PassiveHipDampingX_l: coordinate=hip_flexion_l
        expression=-2.44*exp(5.05*(q-1.81))+1.51*exp(-21.88*(q+0.47))-0.1*qdot
    ExpressionBasedCoordinateForce PassiveHipDampingY_l: coordinate=hip_adduction_l
        expression=-0.03*exp(14.94*(q-0.50))+0.03*exp(-14.94*(q+0.50))-0.1*qdot
    ExpressionBasedCoordinateForce PassiveHipDampingZ_l: coordinate=hip_rotation_l
        expression=-0.03*exp(14.94*(q-0.92))+0.03*exp(-14.94*(q+0.92))-0.1*qdot
    ExpressionBasedCoordinateForce PassiveKneeDamping_r: coordinate=knee_angle_r
        expression=-6.09*exp(33.94*(q-0.13))+11.03*exp(-11.33*(q+2.40))-0.1*qdot
    ExpressionBasedCoordinateForce PassiveKneeDamping_l: coordinate=knee_angle_l
        expression=-6.09*exp(33.94*(q-0.13))+11.03*exp(-11.33*(q+2.40))-0.1*qdot
    ExpressionBasedCoordinateForce PassiveAnkleDamping_r: coordinate=ankle_angle_r
        expression=-2.03*exp(38.11*(q-0.52))+0.18*exp(-42.12*(q+0.74))-0.1*qdot
    ExpressionBasedCoordinateForce PassiveAnkleDamping_l: coordinate=ankle_angle_l
        expression=-2.03*exp(38.11*(q-0.52))+0.18*exp(-42.12*(q+0.74))-0.1*qdot
    ExpressionBasedCoordinateForce PassiveLumbarDampingX: coordinate=lumbar_ext
        expression=-0.35*exp(30.72*(q-0.17))+0.25*exp(-20.36*(q+0.35))-0.1*qdot
    ExpressionBasedCoordinateForce PassiveLumbarDampingY: coordinate=lumbar_bend
        expression=-0.25*exp(20.36*(q-0.17))+0.25*exp(-20.36*(q+0.17))-0.1*qdot
    ExpressionBasedCoordinateForce PassiveLumbarDampingZ: coordinate=lumbar_rota
        expression=-0.25*exp(20.36*(q-0.17))+0.25*exp(-20.36*(q+0.17))-0.1*qdot
    CoordinateActuator pelvis_tx_residual: coordinate=pelvis_tx optimal_force=2.5
    CoordinateActuator pelvis_ty_residual: coordinate=pelvis_ty optimal_force=2.5
    CoordinateActuator pelvis_tz_residual: coordinate=pelvis_tz optimal_force=2.5
    CoordinateActuator pelvis_tilt_residual: coordinate=pelvis_tilt optimal_force=2.5
    CoordinateActuator pelvis_list_residual: coordinate=pelvis_list optimal_force=2.5
    CoordinateActuator pelvis_rotation_residual: coordinate=pelvis_rotation optimal_force=2.5
    CoordinateActuator hip_flexion_r_torque: coordinate=hip_flexion_r optimal_force=300
    CoordinateActuator hip_adduction_r_torque: coordinate=hip_adduction_r optimal_force=200
    CoordinateActuator hip_rotation_r_torque: coordinate=hip_rotation_r optimal_force=100
    CoordinateActuator knee_angle_r_torque: coordinate=knee_angle_r optimal_force=300
    CoordinateActuator ankle_angle_r_torque: coordinate=ankle_angle_r optimal_force=200
    CoordinateActuator hip_flexion_l_torque: coordinate=hip_flexion_l optimal_force=300
    CoordinateActuator hip_adduction_l_torque: coordinate=hip_adduction_l optimal_force=200
    CoordinateActuator hip_rotation_l_torque: coordinate=hip_rotation_l optimal_force=100
    CoordinateActuator knee_angle_l_torque: coordinate=knee_angle_l optimal_force=300
    CoordinateActuator ankle_angle_l_torque: coordinate=ankle_angle_l optimal_force=200
    CoordinateActuator lumbar_ext_torque: coordinate=lumbar_ext optimal_force=300
    CoordinateActuator lumbar_bend_torque: coordinate=lumbar_bend optimal_force=200
    CoordinateActuator lumbar_rota_torque: coordinate=lumbar_rota optimal_force=100
  MarkerSet:
    Marker C7: torso (-0.1133341 0.4088887 0.00204595) fixed=true
    Marker CLAV: torso (0.05333369 0.3571901 0.001958477) fixed=true
    Marker RSHO: torso (0.01954595 0.388995 0.1720803) fixed=true
    Marker LSHO: torso (0.019546 0.3889951 -0.1720802) fixed=true
    Marker RASI: pelvis (0.0102068 0.01982626 0.1408593) fixed=true
    Marker LASI: pelvis (0.0102068 0.01982626 -0.1408593) fixed=true
    Marker SACR: pelvis (-0.1659997 0.03837708 0) fixed=true
    Marker RKNE: femur_r (0 -0.3588777 0.04441556) fixed=true
    Marker RANK: tibia_r (-0.004775112 -0.3780616 0.05061619) fixed=true
    Marker RHEE: calcn_r (-0.02055018 0.01644014 -0.004110035) fixed=true
    Marker LKNE: femur_l (0 -0.3634318 -0.04497918) fixed=true
    Marker LANK: tibia_l (-0.004671264 -0.3698399 -0.0495154) fixed=true
    Marker LHEE: calcn_l (-0.02029886 0.01623909 0.004059773) fixed=true
    Marker STRN: torso (0.1334171 0.2115096 0.00204595) fixed=true
    Marker T10: torso (-0.1237755 0.1606844 0.00204595) fixed=true
    Marker RTIB: tibia_r (-0.001372926 -0.2334368 0.09399623)
    Marker LTIB: tibia_l (-0.03478372 -0.2178664 -0.09725649)
    Marker RTOE: toes_r (0.00246713 0.0534644 0.01626771)
    Marker LTOE: toes_l (0.005081733 0.05036231 -0.004326229)
    Marker RTHI: femur_r (0.01270829 -0.1839241 0.1088768)
    Marker LTHI: femur_l (-0.02030173 -0.1623891 -0.1318801)
