# OpenSim document version 40500
ExternalLoads:
  datafile: walk_grf.mot
  ExternalForce grf1: applied_to_body=calcn_r force_expressed_in_body=ground point_expressed_in_body=ground
      force_identifier=ground_force_1_v point_identifier=ground_force_1_p torque_identifier=ground_force_1_m
  ExternalForce grf2: applied_to_body=calcn_l force_expressed_in_body=ground point_expressed_in_body=ground
      force_identifier=ground_force_2_v point_identifier=ground_force_2_p torque_identifier=ground_force_2_m
  ExternalForce grf4: applied_to_body=calcn_r force_expressed_in_body=ground point_expressed_in_body=ground
      force_identifier=ground_force_4_v point_identifier=ground_force_4_p torque_identifier=ground_force_4_m
