# OpenSim document version 40500
InverseKinematicsTool:
  model_file: ..\data\SUBJ01\scaling\SUBJ01_scaledModelAdjusted_2d.osim
  time_range: 0.95 2
  output_motion_file: ..\data\SUBJ01\ik\SUBJ01_walk_ik_2d.mot
  marker_file: ..\data\SUBJ01\dynamic\walk_2d.trc
  report_marker_locations: true
  IKTaskSet:
    IKMarkerTask CLAV: weight=1
    IKMarkerTask STRN: weight=1
    IKMarkerTask C7: weight=1
    IKMarkerTask T10: weight=1
    IKMarkerTask RSHO: weight=1
    IKMarkerTask LSHO: weight=1
    IKMarkerTask LASI: weight=1
    IKMarkerTask RASI: weight=1
    IKMarkerTask SACR: weight=1
    IKMarkerTask RTHI: weight=1
    IKMarkerTask RKNE: weight=1
    IKMarkerTask RTIB: weight=1
    IKMarkerTask RHEE: weight=1
    IKMarkerTask RANK: weight=1
    IKMarkerTask RTOE: weight=1
    IKMarkerTask LTHI: weight=1
    IKMarkerTask lKNE: weight=1
    IKMarkerTask LTIB: weight=1
    IKMarkerTask LHEE: weight=1
    IKMarkerTask LANK: weight=1
    IKMarkerTask LTOE: weight=1
