# OpenSim document version 40500
AnalyzeTool SUBJ01_walk_ik_3d:
  model_file: C:\+GitRepos+\optimal-control-weights\datasets\Crienkinge2023\code\..\data\SUBJ01\model\SUBJ01_model_3d.osim
  replace_force_set: false
  results_directory: C:\+GitRepos+\optimal-control-weights\datasets\Crienkinge2023\code\..\data\SUBJ01\mrs\3d\results\MuscleAnalysis
  output_precision: 8
  initial_time: 0.9605
  final_time: 2
  solve_for_equilibrium_for_auxiliary_states: false
  maximum_number_of_integrator_steps: 20000
  maximum_integrator_step_size: 1
  minimum_integrator_step_size: 1e-8
  integrator_error_tolerance: 1e-5
  coordinates_file: C:\+GitRepos+\optimal-control-weights\datasets\Crienkinge2023\code\..\data\SUBJ01\mrs\3d\SUBJ01_walk_ik_3d.mot
  lowpass_cutoff_frequency_for_coordinates: -1
  AnalysisSet Analyses:
    MuscleAnalysis: start_time=0.9605 end_time=2 step_interval=1 in_degrees=true muscle_list=all
        moment_arm_coordinate_list=(hip_flexion_r hip_adduction_r hip_rotation_r knee_angle_r ankle_angle_r hip_flexion_l hip_adduction_l hip_rotation_l knee_angle_l ankle_angle_l)
        compute_moments=true
