# OpenSim document version 40500
ScaleTool:
  mass: 62.2073 [kg]
  height: -1
  age: -1
  GenericModelMaker:
    model_file: ..\model\Denton2023_Crienkinge2023.osim
  ModelScaler:
    apply: true
    scaling_order: measurements
    marker_file: ..\data\SUBJ01\static\static.trc
    time_range: 0 0.81
    preserve_mass_distribution: true
    output_model_file: ..\data\SUBJ01\scaling\SUBJ01_scaledModel_2d.osim
    output_scale_file: ..\data\SUBJ01\scaling\SUBJ01_scaleSet_2d.xml
    MeasurementSet:
      Measurement torso_depth: apply=true
        MarkerPair: markers=(C7 CLAV)
        MarkerPair: markers=(T10 STRN)
        BodyScale torso: axes=X
      Measurement torso_height: apply=true
        MarkerPair: markers=(C7 T10)
        MarkerPair: markers=(CLAV STRN)
        BodyScale torso: axes=Y
      Measurement torso_width: apply=true
        MarkerPair: markers=(RSHO LSHO)
        BodyScale torso: axes=Z
      Measurement pelvis_depth: apply=true
        MarkerPair: markers=(RASI SACR)
        MarkerPair: markers=(LASI SACR)
        BodyScale pelvis: axes=X
      Measurement pelvis_height: apply=true
        MarkerPair: markers=(RASI LASI)
        BodyScale pelvis: axes=Y
      Measurement pelvis_width: apply=true
        MarkerPair: markers=(RASI LASI)
        BodyScale pelvis: axes=Z
      Measurement l_thigh: apply=true
        MarkerPair: markers=(LASI LKNE)
        BodyScale femur_l: axes=(X Y Z)
      Measurement l_patella: apply=true
        MarkerPair: markers=(LASI LKNE)
        BodyScale patella_l: axes=(X Y Z)
      Measurement l_tibia: apply=true
        MarkerPair: markers=(LKNE LANK)
        BodyScale tibia_l: axes=(X Y Z)
        BodyScale talus_l: axes=(X Y Z)
      Measurement l_foot: apply=true
        MarkerPair: markers=(LHEE LTOE)
        BodyScale calcn_l: axes=(X Y Z)
        BodyScale toes_l: axes=(X Y Z)
      Measurement r_thigh: apply=true
        MarkerPair: markers=(RASI RKNE)
        BodyScale femur_r: axes=(X Y Z)
      Measurement r_patella: apply=true
        MarkerPair: markers=(RASI RKNE)
        BodyScale patella_r: axes=(X Y Z)
      Measurement r_tibia: apply=true
        MarkerPair: markers=(RKNE RANK)
        BodyScale tibia_r: axes=(X Y Z)
        BodyScale talus_r: axes=(X Y Z)
      Measurement r_foot: apply=true
        MarkerPair: markers=(RHEE RTOE)
        BodyScale calcn_r: axes=(X Y Z)
        BodyScale toes_r: axes=(X Y Z)
  MarkerPlacer:
    apply: false
    marker_file: ..\data\SUBJ01\static\static.trc
    time_range: -1 -1
    max_marker_movement: -1
