# OpenSim document version 40500
ScaleTool:
  mass: 62.2073 [kg]
  height: -1
  age: -1
  GenericModelMaker:
    model_file: ..\model\Miller2021_Crienkinge2023.osim
  ModelScaler:
    apply: true
    scaling_order: measurements
    marker_file: ..\data\SUBJ01\static\static.trc
    time_range: 0 0.81
    preserve_mass_distribution: true
    output_model_file: ..\data\SUBJ01\scaling\SUBJ01_scaledModel_3d.osim
    output_scale_file: ..\data\SUBJ01\scaling\SUBJ01_scaleSet_3d.xml
    MeasurementSet:
      Measurement torso_depth: apply=true
        MarkerPair: markers=(C7 CLAV)
        MarkerPair: markers=(T10 STRN)
        BodyScale torso: axes=X
      Measurement torso_height: apply=true
        MarkerPair: markers=(C7 T10)
        MarkerPair: markers=(CLAV STRN)
        BodyScale torso: axes=Y
      Measurement torso_width: apply=true
        MarkerPair: markers=(RSHO LSHO)
        BodyScale torso: axes=Z
      Measurement pelvis_depth: apply=true
        MarkerPair: markers=(RASI SACR)
        MarkerPair: markers=(LASI SACR)
        BodyScale pelvis: axes=X
      Measurement pelvis_height: apply=true
        MarkerPair: markers=(RASI LASI)
        BodyScale pelvis: axes=Y
      Measurement pelvis_width: apply=true
        MarkerPair: markers=(RASI LASI)
        BodyScale pelvis: axes=Z
      Measurement l_thigh: apply=true
        MarkerPair: markers=(LASI LKNE)
        BodyScale femur_l: axes=(X Y Z)
      Measurement l_patella: apply=true
        MarkerPair: markers=(LASI LKNE)
        BodyScale patella_l: axes=(X Y Z)
      Measurement l_tibia: apply=true
        MarkerPair: markers=(LKNE LANK)
        BodyScale tibia_l: axes=(X Y Z)
        BodyScale talus_l: axes=(X Y Z)
      Measurement l_foot: apply=true
        MarkerPair: markers=(LHEE LTOE)
        BodyScale calcn_l: axes=(X Y Z)
        BodyScale toes_l: axes=(X Y Z)
      Measurement r_thigh: apply=true
        MarkerPair: markers=(RASI RKNE)
        BodyScale femur_r: axes=(X Y Z)
      Measurement r_patella: apply=true
        MarkerPair: markers=(RASI RKNE)
        BodyScale patella_r: axes=(X Y Z)
      Measurement r_tibia: apply=true
        MarkerPair: markers=(RKNE RANK)
        BodyScale tibia_r: axes=(X Y Z)
        BodyScale talus_r: axes=(X Y Z)
      Measurement r_foot: apply=true
        MarkerPair: markers=(RHEE RTOE)
        BodyScale calcn_r: axes=(X Y Z)
        BodyScale toes_r: axes=(X Y Z)
  MarkerPlacer:
    apply: true
    marker_file: ..\data\SUBJ01\static\static.trc
    time_range: 0 0.81
    output_motion_file: ..\data\SUBJ01\scaling\SUBJ01_staticMotion_3d.mot
    output_model_file: ..\data\SUBJ01\scaling\SUBJ01_scaledModelAdjusted_3d.osim
    max_marker_movement: -1
    IKTaskSet:
      IKMarkerTask CLAV: weight=5
      IKMarkerTask STRN: weight=5
      IKMarkerTask C7: weight=5
      IKMarkerTask T10: weight=5
      IKMarkerTask RSHO: apply=false weight=0
      IKMarkerTask LSHO: apply=false weight=0
      IKMarkerTask LASI: weight=10
      IKMarkerTask RASI: weight=10
      IKMarkerTask SACR: weight=10
      IKMarkerTask RTHI: apply=false weight=0
      IKMarkerTask RKNE: weight=5
      IKMarkerTask RTIB: apply=false weight=0
      IKMarkerTask RHEE: weight=5
      IKMarkerTask RANK: weight=2.5
      IKMarkerTask RTOE: weight=2.5
      IKMarkerTask LTHI: apply=false weight=0
      IKMarkerTask LKNE: weight=5
      IKMarkerTask LTIB: apply=false weight=0
      IKMarkerTask LHEE: weight=5
      IKMarkerTask LANK: weight=2.5
      IKMarkerTask LTOE: weight=2.5
      IKCoordinateTask [values shared by the 20 below unless stated]: weight=0.001 value_type=default_value value=0
      IKCoordinateTask lumbar_ext
      IKCoordinateTask lumbar_bend
      IKCoordinateTask lumbar_rota
      IKCoordinateTask pelvis_tilt
      IKCoordinateTask pelvis_list
      IKCoordinateTask pelvis_rotation
      IKCoordinateTask hip_flexion_r
      IKCoordinateTask hip_adduction_r
      IKCoordinateTask hip_rotation_r
      IKCoordinateTask knee_angle_r
      IKCoordinateTask ankle_angle_r
      IKCoordinateTask subtalar_angle_r
      IKCoordinateTask mtp_angle_r
      IKCoordinateTask hip_flexion_l
      IKCoordinateTask hip_adduction_l
      IKCoordinateTask hip_rotation_l
      IKCoordinateTask knee_angle_l
      IKCoordinateTask ankle_angle_l
      IKCoordinateTask subtalar_angle_l
      IKCoordinateTask mtp_angle_l
