# OpenSim document version 40500
Model SUBJ01_2d:
  gravity: 0 -9.80665 0
  length_units: meters
  force_units: N
  credits:
    A 2-D model 11 degrees of freedom and 18 muscles for simulating walking. This model was assembled by Vinh Nguyen and Russel Johnson and includes elements from Delp et al. (1990), Yamaguchi Zajac (1989), Anderson Pandy (1999), Sasaki et al. (2009) and Porsa et al. (2016). The CustomJoint and moving muscle insertion points for the knee joint are due to Ajay Seth. For use with Moco, Brian Umberger replaced the muscles with DeGrooteFregly2016Muscles and the ground contact elements with SmoothSphereHalfSpaceForces. License: Creative Commons (CCBY 3.0). You are free to distribute, remix, tweak, and build upon this work, even commercially, as long as you credit us for the original creation.
  publications:
    >Nguyen, V.Q.,Johnson, R.T., Sup, F.C., Umberger, B.R. Bilevel Optimization for Cost Function Determination in Dynamic Simulation of Human Gait. IEEE Transactions on Neural Systems and Rehabilitation Engineering, vol 27 pp 1426-1435, 2019
  Ground
  BodySet:
    Body pelvis: mass=9.842278 [kg] mass_center=(-0.07651588 0 0) inertia=(0.1303336 0.1303336 0.07217241 0 0 0)
        meshes=(sacrum.vtp pelvis.vtp l_pelvis.vtp)
    Body femur_r: mass=7.773369 mass_center=(0 -0.1661533 0) inertia=(0.1325121 0.03473619 0.1397363 0 0 0)
        meshes=r_femur.vtp
    Body tibia_r: mass=3.098433 mass_center=(0 -0.1832955 0) inertia=(0.05008705 0.005068333 0.05078269 0 0 0)
        meshes=(r_tibia.vtp r_fibula.vtp)
    Body talus_r: mass=0.08357203 mass_center=(0 0 0) inertia=(0.0009368521 0.0009368521 0.0009368521 0 0 0)
        meshes=talus.vtp
    Body calcn_r: mass=1.04465 mass_center=(0.08378965 0.02513689 0)
        inertia=(0.0009716785 0.002706823 0.002845631 0 0 0) meshes=foot.vtp
    Body toes_r: mass=0.181017 mass_center=(0.02754644 0.004776839 -0.01393236)
        inertia=(5.375081e-5 0.0001075016 5.375081e-5 0 0 0) meshes=bofoot.vtp
    Body femur_l: mass=7.773369 mass_center=(0 -0.1682617 0) inertia=(0.1358965 0.03562337 0.1433053 0 0 0)
        meshes=l_femur.vtp
    Body tibia_l: mass=3.098433 mass_center=(0 -0.1793093 0) inertia=(0.04793217 0.00485028 0.04859789 0 0 0)
        meshes=(l_tibia.vtp l_fibula.vtp)
    Body talus_l: mass=0.08357203 mass_center=(0 0 0) inertia=(0.0008965463 0.0008965463 0.0008965463 0 0 0)
        meshes=l_talus.vtp
    Body calcn_l: mass=1.04465 mass_center=(0.08276496 0.02482949 0)
        inertia=(0.000948058 0.002641023 0.002776457 0 0 0) meshes=l_foot.vtp
    Body toes_l: mass=0.181017 mass_center=(0.02720957 0.004718422 0.01376198)
        inertia=(5.244419e-5 0.0001048884 5.244419e-5 0 0 0) meshes=l_bofoot.vtp
    Body torso: mass=28.00294 mass_center=(-0.04066547 0.3057933 0) inertia=(1.547318 1.210916 1.547318 0 0 0)
        meshes=(hat_spine.vtp hat_jaw.vtp hat_skull.vtp hat_ribs_scap.vtp)
  JointSet:
    CustomJoint ground_pelvis: socket_parent_frame=ground_offset socket_child_frame=pelvis_offset
      Coordinate pelvis_tilt: default_value=0 range=(-1.570796 1.570796) clamped=true
      Coordinate pelvis_tx: default_value=0 range=(-5 5) clamped=true
      Coordinate pelvis_ty: default_value=1.2 range=(-1 2) clamped=true
      PhysicalOffsetFrame ground_offset: socket_parent=/ground translation=(0 0 0) [meters]
      PhysicalOffsetFrame pelvis_offset: socket_parent=/bodyset/pelvis translation=(0 0 0)
      SpatialTransform: axes_held_at_zero=(rotation2 rotation3)
        TransformAxis rotation1: coordinates=pelvis_tilt axis=(0 0 1) LinearFunction(coefficients=1 0)
        TransformAxis translation1: coordinates=pelvis_tx axis=(1 0 0) LinearFunction(coefficients=1 0)
        TransformAxis translation2: coordinates=pelvis_ty axis=(0 1 0) LinearFunction(coefficients=1 0)
        TransformAxis translation3: axis=(0 0 1) MultiplierFunction(scale=1, Constant(value=0.02))
    PinJoint hip_r: socket_parent_frame=pelvis_offset socket_child_frame=femur_r_offset
      Coordinate hip_flexion_r: default_value=0 range=(-2.094395 2.094395) clamped=true
      PhysicalOffsetFrame pelvis_offset: socket_parent=/bodyset/pelvis translation=(-0.06026965 -0.08606335 0.08471467)
      PhysicalOffsetFrame femur_r_offset: socket_parent=/bodyset/femur_r translation=(0 0 0)
    PinJoint knee_r: socket_parent_frame=femur_r_offset socket_child_frame=tibia_r_offset
      Coordinate knee_angle_r: default_value=0 range=(-2.094395 0)
      PhysicalOffsetFrame femur_r_offset: socket_parent=/bodyset/femur_r translation=(0 -0.3623954 -0.002442856)
      PhysicalOffsetFrame tibia_r_offset: socket_parent=/bodyset/tibia_r translation=(0 0 0)
    PinJoint ankle_r: socket_parent_frame=tibia_r_offset socket_child_frame=talus_r_offset
      Coordinate ankle_angle_r: default_value=-0.3490659 range=(-1.570796 1.570796) clamped=true
      PhysicalOffsetFrame tibia_r_offset: socket_parent=/bodyset/tibia_r translation=(-0.009550224 -0.382009 0)
      PhysicalOffsetFrame talus_r_offset: socket_parent=/bodyset/talus_r translation=(0 0 0)
    WeldJoint subtalar_r: socket_parent_frame=talus_r_offset socket_child_frame=calcn_r_offset
      PhysicalOffsetFrame talus_r_offset: socket_parent=/bodyset/talus_r
          translation=(-0.04657644 -0.04006319 0.007563777)
      PhysicalOffsetFrame calcn_r_offset: socket_parent=/bodyset/calcn_r translation=(0 0 0)
    PinJoint mtp_r: socket_parent_frame=calcn_r_offset socket_child_frame=toes_r_offset
      Coordinate mtp_angle_r: default_value=0 range=(-1.570796 1.570796) clamped=true locked=true
      PhysicalOffsetFrame calcn_r_offset: socket_parent=/bodyset/calcn_r
          translation=(0.1469749 -0.001644014 0.0008877676)
      PhysicalOffsetFrame toes_r_offset: socket_parent=/bodyset/toes_r translation=(0 0 0)
    PinJoint hip_l: socket_parent_frame=pelvis_offset socket_child_frame=femur_l_offset
      Coordinate hip_flexion_l: default_value=0 range=(-2.094395 2.094395) clamped=true
      PhysicalOffsetFrame pelvis_offset: socket_parent=/bodyset/pelvis
          translation=(-0.06026965 -0.08606335 -0.08471467)
      PhysicalOffsetFrame femur_l_offset: socket_parent=/bodyset/femur_l translation=(0 0 0)
    PinJoint knee_l: socket_parent_frame=femur_l_offset socket_child_frame=tibia_l_offset
      Coordinate knee_angle_l: default_value=0 range=(-2.094395 0)
      PhysicalOffsetFrame femur_l_offset: socket_parent=/bodyset/femur_l translation=(0 -0.3669942 0.002473855)
      PhysicalOffsetFrame tibia_l_offset: socket_parent=/bodyset/tibia_l translation=(0 0 0)
    PinJoint ankle_l: socket_parent_frame=tibia_l_offset socket_child_frame=talus_l_offset
      Coordinate ankle_angle_l: default_value=-0.3490659 range=(-1.047198 1.047198) clamped=true
      PhysicalOffsetFrame tibia_l_offset: socket_parent=/bodyset/tibia_l translation=(-0.009342528 -0.3737011 0)
      PhysicalOffsetFrame talus_l_offset: socket_parent=/bodyset/talus_l translation=(0 0 0)
    WeldJoint subtalar_l: socket_parent_frame=talus_l_offset socket_child_frame=calcn_l_offset
      PhysicalOffsetFrame talus_l_offset: socket_parent=/bodyset/talus_l
          translation=(-0.04556351 -0.03919191 -0.007399282)
      PhysicalOffsetFrame calcn_l_offset: socket_parent=/bodyset/calcn_l translation=(0 0 0)
    PinJoint mtp_l: socket_parent_frame=calcn_l_offset socket_child_frame=toes_l_offset
      Coordinate mtp_angle_l: default_value=0 range=(-1.570796 1.570796) clamped=true locked=true
      PhysicalOffsetFrame calcn_l_offset: socket_parent=/bodyset/calcn_l
          translation=(0.1451775 -0.001623909 -0.0008769109)
      PhysicalOffsetFrame toes_l_offset: socket_parent=/bodyset/toes_l translation=(0 0 0)
    PinJoint back: socket_parent_frame=pelvis_offset socket_child_frame=torso_offset
      Coordinate lumbar_ext: default_value=0 range=(-1.570796 1.570796) clamped=true
      PhysicalOffsetFrame pelvis_offset: socket_parent=/bodyset/pelvis translation=(-0.1089836 0.09030632 0)
      PhysicalOffsetFrame torso_offset: socket_parent=/bodyset/torso translation=(0 0 0)
  ForceSet:
    SmoothSphereHalfSpaceForce [values shared by the 16 below unless stated]: socket_half_space=/contactgeometryset/floor
        dissipation=0.4163202 [s/m] static_friction=0.8 dynamic_friction=0.8 viscous_friction=0
        transition_velocity=0.1327498 [m/s] hertz_smoothing=300 hunt_crossley_smoothing=50
    SmoothSphereHalfSpaceForce Contact_Foot_Ground_R1: socket_sphere=/contactgeometryset/Foot_Ground_R1
        stiffness=1.474053e7 [N/m^2]
    SmoothSphereHalfSpaceForce Contact_Foot_Ground_R2: socket_sphere=/contactgeometryset/Foot_Ground_R2
        stiffness=1.593302e7
    SmoothSphereHalfSpaceForce Contact_Foot_Ground_R3: socket_sphere=/contactgeometryset/Foot_Ground_R3
        stiffness=1.474053e7
    SmoothSphereHalfSpaceForce Contact_Foot_Ground_R4: socket_sphere=/contactgeometryset/Foot_Ground_R4
        stiffness=1.552861e7
    SmoothSphereHalfSpaceForce Contact_Foot_Ground_R5: socket_sphere=/contactgeometryset/Foot_Ground_R5
        stiffness=1.663769e7
    SmoothSphereHalfSpaceForce Contact_Foot_Ground_R6: socket_sphere=/contactgeometryset/Foot_Ground_R6
        stiffness=1.498419e7
    SmoothSphereHalfSpaceForce Contact_Foot_Ground_R7: socket_sphere=/contactgeometryset/Foot_Ground_R7
        stiffness=1.630601e7
    SmoothSphereHalfSpaceForce Contact_Foot_Ground_R8: socket_sphere=/contactgeometryset/Foot_Ground_R8
        stiffness=1.617878e7
    SmoothSphereHalfSpaceForce Contact_Foot_Ground_L1: socket_sphere=/contactgeometryset/Foot_Ground_L1
        stiffness=1.474053e7
    SmoothSphereHalfSpaceForce Contact_Foot_Ground_L2: socket_sphere=/contactgeometryset/Foot_Ground_L2
        stiffness=1.593302e7
    SmoothSphereHalfSpaceForce Contact_Foot_Ground_L3: socket_sphere=/contactgeometryset/Foot_Ground_L3
        stiffness=1.474053e7
    SmoothSphereHalfSpaceForce Contact_Foot_Ground_L4: socket_sphere=/contactgeometryset/Foot_Ground_L4
        stiffness=1.552861e7
    SmoothSphereHalfSpaceForce Contact_Foot_Ground_L5: socket_sphere=/contactgeometryset/Foot_Ground_L5
        stiffness=1.663769e7
    SmoothSphereHalfSpaceForce Contact_Foot_Ground_L6: socket_sphere=/contactgeometryset/Foot_Ground_L6
        stiffness=1.498419e7
    SmoothSphereHalfSpaceForce Contact_Foot_Ground_L7: socket_sphere=/contactgeometryset/Foot_Ground_L7
        stiffness=1.630601e7
    SmoothSphereHalfSpaceForce Contact_Foot_Ground_L8: socket_sphere=/contactgeometryset/Foot_Ground_L8
        stiffness=1.617878e7
    CoordinateLimitForce hip_limit_r: coordinate=hip_flexion_r upper_stiffness=500 [N*m/degree]
        upper_limit=103.7 [degrees] lower_stiffness=729.4401 [N*m/degree] lower_limit=-36.52 [degrees] damping=0
        transition=1 [degrees]
    CoordinateLimitForce hip_limit_l: coordinate=hip_flexion_l upper_stiffness=500 upper_limit=103.7
        lower_stiffness=729.4401 lower_limit=-36.52 damping=0 transition=1
    CoordinateLimitForce knee_limit_r: coordinate=knee_angle_r upper_stiffness=595.4197 upper_limit=11.4485
        lower_stiffness=105.2106 lower_limit=-137.51 damping=0 transition=7
    CoordinateLimitForce knee_limit_l: coordinate=knee_angle_l upper_stiffness=595.4197 upper_limit=11.4485
        lower_stiffness=105.2106 lower_limit=-137.51 damping=0 transition=7
    CoordinateLimitForce ankle_limit_r: coordinate=ankle_angle_r upper_stiffness=889.7686 upper_limit=35.8
        lower_stiffness=390.7439 lower_limit=-48.4 damping=0 transition=9
    CoordinateLimitForce ankle_limit_l: coordinate=ankle_angle_l upper_stiffness=889.7686 upper_limit=35.8
        lower_stiffness=390.7439 lower_limit=-48.4 damping=0 transition=9
    SpringGeneralizedForce mtp_damping_r: coordinate=mtp_angle_r stiffness=25 rest_length=0 viscosity=0.03
    SpringGeneralizedForce mtp_damping_l: coordinate=mtp_angle_l stiffness=25 rest_length=0 viscosity=0.03
    SpringGeneralizedForce hip_flexion_damping_r: coordinate=hip_flexion_r stiffness=0 rest_length=0 viscosity=0.1
    SpringGeneralizedForce hip_flexion_damping_l: coordinate=hip_flexion_l stiffness=0 rest_length=0 viscosity=0.1
    SpringGeneralizedForce knee_damping_r: coordinate=knee_angle_r stiffness=0 rest_length=0 viscosity=0.1
    SpringGeneralizedForce knee_damping_l: coordinate=knee_angle_l stiffness=0 rest_length=0 viscosity=0.1
    SpringGeneralizedForce ankle_damping_r: coordinate=ankle_angle_r stiffness=0 rest_length=0 viscosity=0.5
    SpringGeneralizedForce ankle_damping_l: coordinate=ankle_angle_l stiffness=0 rest_length=0 viscosity=0.5
    Millard2012EquilibriumMuscle [values shared by the 18 below unless stated]: min_control=0.01 max_control=1
        max_contraction_velocity=20 fiber_damping=0.1 default_activation=0.05 activation_time_constant=0.055 [seconds]
        deactivation_time_constant=0.065 [seconds]
      ActiveForceLengthCurve: minimum_value=0
      ForceVelocityCurve: concentric_slope_at_vmax=0 concentric_slope_near_vmax=0.25 isometric_slope=5
          eccentric_slope_at_vmax=0 eccentric_slope_near_vmax=0.15 max_eccentric_velocity_force_multiplier=1.4
      FiberForceLengthCurve: strain_at_one_norm_force=0.7
      TendonForceLengthCurve: strain_at_one_norm_force=0.049
    Millard2012EquilibriumMuscle hamstrings_r: max_isometric_force=3056.474 optimal_fiber_length=0.1076772
        tendon_slack_length=0.3084282 pennation_angle_at_optimal=0.2253 [radians] ignore_tendon_compliance=true
      PathPoint bifemlh_r-P1: pelvis (-0.1363221 -0.1136532 0.07694309)
      PathPoint bifemlh_r-P2: tibia_r (-0.02955116 -0.03534356 0.02889344)
      PathPoint bifemlh_r-P3: tibia_r (-0.02297335 -0.05527345 0.03367457)
    Millard2012EquilibriumMuscle bifemsh_r: max_isometric_force=521.3053 optimal_fiber_length=0.09997937
        tendon_slack_length=0.1432161 pennation_angle_at_optimal=0.2642232 ignore_tendon_compliance=true
      PathPoint P1: femur_r (0.004886857 -0.2063236 0.02287046)
      PathPoint P2: tibia_r (-0.02955116 -0.03534356 0.02889344)
      PathPoint P3: tibia_r (-0.02297335 -0.05527345 0.03367457)
    Millard2012EquilibriumMuscle glut_max_r: max_isometric_force=2797.483 optimal_fiber_length=0.1577063
        tendon_slack_length=0.08320136 pennation_angle_at_optimal=0.3673821 ignore_tendon_compliance=true
      PathPoint glut_max2_r-P1: pelvis (-0.1459962 0.0195017 0.06238338)
      PathPoint glut_max2_r-P2: pelvis (-0.1489199 -0.05761881 0.1012765)
      PathPoint glut_max2_r-P3: femur_r (-0.04163603 -0.05180062 0.02863702)
      PathPoint glut_max2_r-P4: femur_r (-0.01524697 -0.09930075 0.04095186)
    Millard2012EquilibriumMuscle iliopsoas_r: max_isometric_force=2017.724 optimal_fiber_length=0.1171174
        tendon_slack_length=0.1591544 pennation_angle_at_optimal=0.2391189 ignore_tendon_compliance=true
      PathPoint psoas_r-P1: pelvis (-0.07002229 0.09828426 0.03202272)
      PathPoint psoas_r-P2: pelvis (-0.02575779 -0.06315903 0.08410119)
      ConditionalPathPoint psoas_r-P3: pelvis (-0.03116906 -0.08919821 0.09041707)
          socket_coordinate=/jointset/hip_r/hip_flexion_r range=(-1.5708 0.785398) [radians]
      PathPoint psoas_r-P4: femur_r (0.001563792 -0.04955275 0.003714011)
      PathPoint psoas_r-P5: femur_r (-0.01837463 -0.05834908 0.01016468)
    Millard2012EquilibriumMuscle rect_fem_r: max_isometric_force=2011.288 optimal_fiber_length=0.06890337
        tendon_slack_length=0.3529595 pennation_angle_at_optimal=0.2170149 ignore_tendon_compliance=true
      PathPoint P1: pelvis (-0.03192677 -0.03446043 0.1072596)
      ConditionalPathPoint P2: femur_r (0.03264419 -0.3938807 0.001857006)
          socket_coordinate=/jointset/knee_r/knee_angle_r range=(-2.61799 -1.45997)
      MovingPathPoint P3: tibia_r socket_x_coordinate=/jointset/knee_r/knee_angle_r
          socket_y_coordinate=/jointset/knee_r/knee_angle_r socket_z_coordinate=/jointset/knee_r/knee_angle_r
        x_location: MultiplierFunction: scale=0.9817668
          SimmSpline: x=(-2.0944 -1.99997 -1.5708 -1.45752 -1.39626 -1.0472 -0.698132 -0.526391 -0.349066 -0.174533 0 0.00017453 0.00034907 0.0279253 0.0872665 0.174533 2.0944)
              y=(0.0155805 0.0179938 0.0275081 0.0296564 0.0307615 0.0365695 0.0422074 0.0450902 0.048391 0.0534299 0.0617576 0.0617669 0.0617762 0.0633083 0.066994 0.0733035 0.0573481)
        y_location: MultiplierFunction: scale=0.9817668
          SimmSpline: x=(-2.0944 -1.99997 -1.5708 -1.45752 -1.39626 -1.0472 -0.698132 -0.526391 -0.349066 -0.174533 0 0.00017453 0.00034907 0.0279253 0.0872665 0.174533 2.0944)
              y=(0.0234116 0.0237613 0.0251141 0.0252795 0.0253146 0.0249184 0.0242373 0.0238447 0.0234197 0.0227644 0.020984 0.0209814 0.0209788 0.0205225 0.0191754 0.0159554 -0.0673774)
        z_location: MultiplierFunction: scale=0.9817668
          SimmSpline: x=(-2.0944 0.1745) y=(0.0014 0.0014)
    Millard2012EquilibriumMuscle vasti_r: max_isometric_force=7829.957 optimal_fiber_length=0.1014117
        tendon_slack_length=0.1191699 pennation_angle_at_optimal=0.267941 ignore_tendon_compliance=true
      PathPoint vas_int_r-P1: femur_r (0.02834379 -0.1880457 0.03029852)
      PathPoint vas_int_r-P2: femur_r (0.03274191 -0.2036844 0.02785504)
      ConditionalPathPoint vas_int_r-P3: femur_r (0.03352389 -0.3938807 0.005375544)
          socket_coordinate=/jointset/knee_r/knee_angle_r range=(-2.61799 -1.42)
      MovingPathPoint vas_int_r-P4: tibia_r socket_x_coordinate=/jointset/knee_r/knee_angle_r
          socket_y_coordinate=/jointset/knee_r/knee_angle_r socket_z_coordinate=/jointset/knee_r/knee_angle_r
        x_location: MultiplierFunction: scale=0.9817668
          SimmSpline: x=(-2.0944 -1.99997 -1.5708 -1.45752 -1.39626 -1.0472 -0.698132 -0.526391 -0.349066 -0.174533 0 0.00017453 0.00034907 0.0279253 0.0872665 0.174533 2.0944)
              y=(0.0082733 0.0106866 0.0202042 0.022353 0.0234583 0.0292715 0.0349465 0.037871 0.0412569 0.0465287 0.0554632 0.0554735 0.0554837 0.0571717 0.061272 0.0684368 0.0648818)
        y_location: MultiplierFunction: scale=0.9817668
          SimmSpline: x=(-2.0944 -1.99997 -1.5708 -1.45752 -1.39626 -1.0472 -0.698132 -0.526391 -0.349066 -0.174533 0 0.00017453 0.00034907 0.0279253 0.0872665 0.174533 2.0944)
              y=(0.025599 0.0259487 0.0273124 0.0274796 0.0275151 0.0271363 0.0265737 0.0263073 0.0261187 0.0260129 0.0252923 0.0252911 0.0252898 0.0250526 0.0242191 0.0218288 -0.0685706)
        z_location: MultiplierFunction: scale=0.9817668
          SimmSpline: x=(-2.0944 2.0944) y=(0.0018 0.0018)
    Millard2012EquilibriumMuscle gastroc_r: max_isometric_force=3475.727 optimal_fiber_length=0.06075402
        tendon_slack_length=0.3909234 pennation_angle_at_optimal=0.1820829
      PathPoint med_gas_r-P1: femur_r (-0.01857006 -0.3840089 -0.02296817)
      ConditionalPathPoint med_gas_r-P2: femur_r (-0.0293212 -0.3930981 -0.02521613)
          socket_coordinate=/jointset/knee_r/knee_angle_r range=(-0.785398 0.174533)
      PathPoint med_gas_r-P3: calcn_r (0 0.02597485 -0.00444086)
    Millard2012EquilibriumMuscle soleus_r: max_isometric_force=5258.489 optimal_fiber_length=0.04277716
        tendon_slack_length=0.2627392 pennation_angle_at_optimal=0.3814289
      PathPoint P1: tibia_r (-0.002356241 -0.1505048 0.006970546)
      PathPoint P2: calcn_r (0 0.02597485 -0.00444086)
    Millard2012EquilibriumMuscle dorsiflexors_r: max_isometric_force=1876.342 optimal_fiber_length=0.06503542
        tendon_slack_length=0.2395649 pennation_angle_at_optimal=0.2021615 ignore_tendon_compliance=true
      PathPoint P1: tibia_r (0.01757365 -0.1594391 0.01129027)
      PathPoint P2: tibia_r (0.03230019 -0.3878957 -0.0173773)
      PathPoint P3: calcn_r (0.09769883 0.01491458 -0.02555587)
    Millard2012EquilibriumMuscle hamstrings_l: max_isometric_force=3030.942 optimal_fiber_length=0.1085843
        tendon_slack_length=0.3110263 pennation_angle_at_optimal=0.2253 ignore_tendon_compliance=true
      PathPoint bifemlh_l-P1: pelvis (-0.1363221 -0.1136532 -0.07694309)
      PathPoint bifemlh_l-P2: tibia_l (-0.02890849 -0.03457492 -0.02826507)
      PathPoint bifemlh_l-P3: tibia_l (-0.02247373 -0.05407138 -0.03294222)
    Millard2012EquilibriumMuscle bifemsh_l: max_isometric_force=519.8421 optimal_fiber_length=0.1002608
        tendon_slack_length=0.1436193 pennation_angle_at_optimal=0.2642232 ignore_tendon_compliance=true
      PathPoint P1: femur_l (0.004948871 -0.2089418 -0.02316068)
      PathPoint P2: tibia_l (-0.02890849 -0.03457492 -0.02826507)
      PathPoint P3: tibia_l (-0.02247373 -0.05407138 -0.03294222)
    Millard2012EquilibriumMuscle glut_max_l: max_isometric_force=2785.026 optimal_fiber_length=0.1584117
        tendon_slack_length=0.08357351 pennation_angle_at_optimal=0.3673821 ignore_tendon_compliance=true
      PathPoint glut_max2_l-P1: pelvis (-0.1459962 0.0195017 -0.06238338)
      PathPoint glut_max2_l-P2: pelvis (-0.1489199 -0.05761881 -0.1012765)
      PathPoint glut_max2_l-P3: femur_l (-0.04216439 -0.05245796 -0.02900042)
      PathPoint glut_max2_l-P4: femur_l (-0.01544045 -0.1005609 -0.04147153)
    Millard2012EquilibriumMuscle iliopsoas_l: max_isometric_force=2011.833 optimal_fiber_length=0.1174603
        tendon_slack_length=0.1596205 pennation_angle_at_optimal=0.2391189 ignore_tendon_compliance=true
      PathPoint psoas_l-P1: pelvis (-0.07002229 0.09828426 -0.03202272)
      PathPoint psoas_l-P2: pelvis (-0.02575779 -0.06315903 -0.08410119)
      ConditionalPathPoint psoas_l-P3: pelvis (-0.03116906 -0.08919821 -0.09041707)
          socket_coordinate=/jointset/hip_l/hip_flexion_l range=(-1.5708 0.785398)
      PathPoint psoas_l-P4: femur_l (0.001583636 -0.05018157 -0.003761141)
      PathPoint psoas_l-P5: femur_l (-0.0186078 -0.05908951 -0.01029367)
    Millard2012EquilibriumMuscle rect_fem_l: max_isometric_force=1986.568 optimal_fiber_length=0.06976079
        tendon_slack_length=0.3573517 pennation_angle_at_optimal=0.2170149 ignore_tendon_compliance=true
      PathPoint P1: pelvis (-0.03192677 -0.03446043 -0.1072596)
      ConditionalPathPoint P2: femur_l (0.03305844 -0.398879 -0.001880571)
          socket_coordinate=/jointset/knee_l/knee_angle_l range=(-2.61799 -1.45997)
      MovingPathPoint P3: tibia_l socket_x_coordinate=/jointset/knee_l/knee_angle_l
          socket_y_coordinate=/jointset/knee_l/knee_angle_l socket_z_coordinate=/jointset/knee_l/knee_angle_l
        x_location: MultiplierFunction: scale=0.9604155
          SimmSpline: x=(-2.0944 -1.99997 -1.5708 -1.45752 -1.39626 -1.0472 -0.698132 -0.526391 -0.349066 -0.174533 0 0.00017453 0.00034907 0.0279253 0.0872665 0.174533 2.0944)
              y=(0.0155805 0.0179938 0.0275081 0.0296564 0.0307615 0.0365695 0.0422074 0.0450902 0.048391 0.0534299 0.0617576 0.0617669 0.0617762 0.0633083 0.066994 0.0733035 0.0573481)
        y_location: MultiplierFunction: scale=0.9604155
          SimmSpline: x=(-2.0944 -1.99997 -1.5708 -1.45752 -1.39626 -1.0472 -0.698132 -0.526391 -0.349066 -0.174533 0 0.00017453 0.00034907 0.0279253 0.0872665 0.174533 2.0944)
              y=(0.0234116 0.0237613 0.0251141 0.0252795 0.0253146 0.0249184 0.0242373 0.0238447 0.0234197 0.0227644 0.020984 0.0209814 0.0209788 0.0205225 0.0191754 0.0159554 -0.0673774)
        z_location: MultiplierFunction: scale=0.9604155
          SimmSpline: x=(-2.0944 0.1745) y=(-0.0014 -0.0014)
    Millard2012EquilibriumMuscle vasti_l: max_isometric_force=7704.416 optimal_fiber_length=0.1030641
        tendon_slack_length=0.1211117 pennation_angle_at_optimal=0.267941 ignore_tendon_compliance=true
      PathPoint vas_int_l-P1: femur_l (0.02870347 -0.190432 -0.030683)
      PathPoint vas_int_l-P2: femur_l (0.03315739 -0.2062691 -0.02820851)
      ConditionalPathPoint vas_int_l-P3: femur_l (0.0339493 -0.398879 -0.005443759)
          socket_coordinate=/jointset/knee_l/knee_angle_l range=(-2.61799 -1.42)
      MovingPathPoint vas_int_l-P4: tibia_l socket_x_coordinate=/jointset/knee_l/knee_angle_l
          socket_y_coordinate=/jointset/knee_l/knee_angle_l socket_z_coordinate=/jointset/knee_l/knee_angle_l
        x_location: MultiplierFunction: scale=0.9604155
          SimmSpline: x=(-2.0944 -1.99997 -1.5708 -1.45752 -1.39626 -1.0472 -0.698132 -0.526391 -0.349066 -0.174533 0 0.00017453 0.00034907 0.0279253 0.0872665 0.174533 2.0944)
              y=(0.0082733 0.0106866 0.0202042 0.022353 0.0234583 0.0292715 0.0349465 0.037871 0.0412569 0.0465287 0.0554632 0.0554735 0.0554837 0.0571717 0.061272 0.0684368 0.0648818)
        y_location: MultiplierFunction: scale=0.9604155
          SimmSpline: x=(-2.0944 -1.99997 -1.5708 -1.45752 -1.39626 -1.0472 -0.698132 -0.526391 -0.349066 -0.174533 0 0.00017453 0.00034907 0.0279253 0.0872665 0.174533 2.0944)
              y=(0.025599 0.0259487 0.0273124 0.0274796 0.0275151 0.0271363 0.0265737 0.0263073 0.0261187 0.0260129 0.0252923 0.0252911 0.0252898 0.0250526 0.0242191 0.0218288 -0.0685706)
        z_location: MultiplierFunction: scale=0.9604155
          SimmSpline: x=(-2.0944 2.0944) y=(-0.0018 -0.0018)
    Millard2012EquilibriumMuscle gastroc_l: max_isometric_force=3561.209 optimal_fiber_length=0.0592957
        tendon_slack_length=0.3815398 pennation_angle_at_optimal=0.1820829
      PathPoint med_gas_l-P1: femur_l (-0.01880571 -0.3888819 0.02325964)
      ConditionalPathPoint med_gas_l-P2: femur_l (-0.02969328 -0.3980865 0.02553612)
          socket_coordinate=/jointset/knee_l/knee_angle_l range=(-0.785398 0.174533)
      PathPoint med_gas_l-P3: calcn_l (0 0.0256572 0.004386552)
    Millard2012EquilibriumMuscle soleus_l: max_isometric_force=5381.114 optimal_fiber_length=0.04180235
        tendon_slack_length=0.2567519 pennation_angle_at_optimal=0.3814289
      PathPoint P1: tibia_l (-0.002304998 -0.1472317 -0.006818952)
      PathPoint P2: calcn_l (0 0.0256572 0.004386552)
    Millard2012EquilibriumMuscle dorsiflexors_l: max_isometric_force=1917.033 optimal_fiber_length=0.06365498
        tendon_slack_length=0.2344799 pennation_angle_at_optimal=0.2021615 ignore_tendon_compliance=true
      PathPoint P1: tibia_l (0.01719147 -0.1559716 -0.01104474)
      PathPoint P2: tibia_l (0.03159774 -0.3794599 0.01699938)
      PathPoint P3: calcn_l (0.09650405 0.01473218 0.02524334)
  MarkerSet:
    Marker contact_Foot_Ground_R1: calcn_r (0.008220071 -0.008220071 -0.01644014) fixed=true
    Marker contact_Foot_Ground_R2: calcn_r (0.1315211 -0.008220071 -0.02877025) fixed=true
    Marker contact_Foot_Ground_R3: calcn_r (0.008220071 -0.008220071 0.006165053) fixed=true
    Marker contact_Foot_Ground_R4: calcn_r (0.1027509 -0.008220071 0.04110035) fixed=true
    Marker contact_Foot_Ground_R5: toes_r (0.05754049 -0.006576057 0.008220071) fixed=true
    Marker contact_Foot_Ground_R6: calcn_r (0.06165053 -0.008220071 -0.001438512) fixed=true
    Marker contact_Foot_Ground_R7: toes_r (0.02877025 -0.006576057 -0.01644014) fixed=true
    Marker contact_Foot_Ground_R8: toes_r (0.01644014 -0.006576057 0.02466021) fixed=true
    Marker contact_Foot_Ground_L1: calcn_l (0.008119546 -0.008119546 0.01623909) fixed=true
    Marker contact_Foot_Ground_L2: calcn_l (0.1299127 -0.008119546 0.02841841) fixed=true
    Marker contact_Foot_Ground_L3: calcn_l (0.008119546 -0.008119546 -0.006089659) fixed=true
    Marker contact_Foot_Ground_L4: calcn_l (0.1014943 -0.008119546 -0.04059773) fixed=true
    Marker contact_Foot_Ground_L5: toes_l (0.05683682 -0.006495636 -0.008119546) fixed=true
    Marker contact_Foot_Ground_L6: calcn_l (0.06089659 -0.008119546 0.00142092) fixed=true
    Marker contact_Foot_Ground_L7: toes_l (0.02841841 -0.006495636 0.01623909) fixed=true
    Marker contact_Foot_Ground_L8: toes_l (0.01623909 -0.006495636 -0.02435864) fixed=true
    Marker C7: torso (-0.1133341 0.4088887 0.00204595) fixed=true
    Marker CLAV: torso (0.05333369 0.3571901 0.001958477) fixed=true
    Marker RSHO: torso (0.01954595 0.388995 0.1720803) fixed=true
    Marker LSHO: torso (0.019546 0.3889951 -0.1720802) fixed=true
    Marker RASI: pelvis (0.0102068 0.01982626 0.1408593) fixed=true
    Marker LASI: pelvis (0.0102068 0.01982626 -0.1408593) fixed=true
    Marker SACR: pelvis (-0.1659997 0.03837708 0) fixed=true
    Marker RKNE: femur_r (0 -0.3588777 0.04441556) fixed=true
    Marker RANK: tibia_r (-0.004775112 -0.3780616 0.05061619) fixed=true
    Marker RHEE: calcn_r (-0.02055018 0.01644014 -0.004110035) fixed=true
    Marker LKNE: femur_l (0 -0.3634318 -0.04497918) fixed=true
    Marker LANK: tibia_l (-0.004671264 -0.3698399 -0.0495154) fixed=true
    Marker LHEE: calcn_l (-0.02029886 0.01623909 0.004059773) fixed=true
    Marker STRN: torso (0.1334171 0.2115096 0.00204595) fixed=true
    Marker T10: torso (-0.1237755 0.1606844 0.00204595) fixed=true
    Marker RTIB: tibia_r (-0.001372926 -0.2334368 0.09399623)
    Marker LTIB: tibia_l (-0.03478372 -0.2178664 -0.09725649)
    Marker RTOE: toes_r (0.001319321 0.02609702 0.00397052)
    Marker LTOE: toes_l (0.001303187 0.0257779 -0.00392196)
    Marker RTHI: femur_r (0.01270829 -0.1839241 0.1088768)
    Marker LTHI: femur_l (-0.02030173 -0.1623891 -0.1318801)
  ContactGeometrySet:
    ContactSphere Foot_Ground_R1: socket_frame=/bodyset/calcn_r location=(0.008220071 -0.008220071 -0.01644014)
        radius=0.0465
    ContactSphere Foot_Ground_R2: socket_frame=/bodyset/calcn_r location=(0.1315211 -0.008220071 -0.02877025)
        radius=0.0398
    ContactSphere Foot_Ground_R3: socket_frame=/bodyset/calcn_r location=(0.008220071 -0.008220071 0.006165053)
        radius=0.0465
    ContactSphere Foot_Ground_R4: socket_frame=/bodyset/calcn_r location=(0.1027509 -0.008220071 0.04110035)
        radius=0.0419
    ContactSphere Foot_Ground_R5: socket_frame=/bodyset/toes_r location=(0.05754049 -0.006576057 0.008220071)
        radius=0.0365
    ContactSphere Foot_Ground_R6: socket_frame=/bodyset/calcn_r location=(0.06165053 -0.008220071 -0.001438512)
        radius=0.045
    ContactSphere Foot_Ground_R7: socket_frame=/bodyset/toes_r location=(0.02877025 -0.006576057 -0.01644014)
        radius=0.038
    ContactSphere Foot_Ground_R8: socket_frame=/bodyset/toes_r location=(0.01644014 -0.006576057 0.02466021)
        radius=0.0386
    ContactSphere Foot_Ground_L1: socket_frame=/bodyset/calcn_l location=(0.008119546 -0.008119546 0.01623909)
        radius=0.0465
    ContactSphere Foot_Ground_L2: socket_frame=/bodyset/calcn_l location=(0.1299127 -0.008119546 0.02841841)
        radius=0.0398
    ContactSphere Foot_Ground_L3: socket_frame=/bodyset/calcn_l location=(0.008119546 -0.008119546 -0.006089659)
        radius=0.0465
    ContactSphere Foot_Ground_L4: socket_frame=/bodyset/calcn_l location=(0.1014943 -0.008119546 -0.04059773)
        radius=0.0419
    ContactSphere Foot_Ground_L5: socket_frame=/bodyset/toes_l location=(0.05683682 -0.006495636 -0.008119546)
        radius=0.0365
    ContactSphere Foot_Ground_L6: socket_frame=/bodyset/calcn_l location=(0.06089659 -0.008119546 0.00142092)
        radius=0.045
    ContactSphere Foot_Ground_L7: socket_frame=/bodyset/toes_l location=(0.02841841 -0.006495636 0.01623909)
        radius=0.038
    ContactSphere Foot_Ground_L8: socket_frame=/bodyset/toes_l location=(0.01623909 -0.006495636 -0.02435864)
        radius=0.0386
    ContactHalfSpace floor: socket_frame=/ground orientation=(0 0 -1.570796)
