# OpenSim document version 40500
Model SUBJ01_3d:
  gravity: 0 -9.81 0
  length_units: meters
  force_units: N
  Ground
  BodySet:
    Body pelvis: mass=9.72451 [kg] mass_center=(-0.07571726 0 0) inertia=(0.101386 0.101386 0.05614241 0 0 0)
        meshes=(r_pelvis.vtp l_pelvis.vtp sacrum.vtp)
    Body femur_l: mass=7.680357 mass_center=(0 -0.1529292 0) inertia=(0.08947398 0.02345434 0.09435195 0 0 0)
        meshes=l_femur.vtp
    Body femur_r: mass=7.680357 mass_center=(0 -0.1510129 0) inertia=(0.08724567 0.02287022 0.09200216 0 0 0)
        meshes=r_femur.vtp
    Body tibia_l: mass=3.061359 mass_center=(0 -0.174425 0) inertia=(0.0363239 0.003675632 0.03682839 0 0 0)
        meshes=(l_tibia.vtp l_fibula.vtp)
    Body tibia_r: mass=3.061359 mass_center=(0 -0.1783027 0) inertia=(0.0379569 0.003840877 0.03848408 0 0 0)
        meshes=(r_tibia.vtp r_fibula.vtp)
    Body patella_l: mass=0.07117711 mass_center=(0.001619251 0.02374901 0)
        inertia=(1.917777e-6 8.760298e-6 8.760298e-6 0 0 0) meshes=l_patella.vtp
    Body patella_r: mass=0.07117711 mass_center=(0.00159896 0.02345142 0)
        inertia=(1.870016e-6 8.542127e-6 8.542127e-6 0 0 0) meshes=r_patella.vtp
    Body talus_l: mass=0.08257205 mass_center=(0 0 0) inertia=(0.0007207122 0.0007207122 0.0007207122 0 0 0)
        meshes=l_talus.vtp
    Body talus_r: mass=0.08257205 mass_center=(0 0 0) inertia=(0.0007531131 0.0007531131 0.0007531131 0 0 0)
        meshes=r_talus.vtp
    Body calcn_l: mass=1.032151 mass_center=(0.08119546 0.02435864 0)
        inertia=(0.0007621221 0.002123054 0.002231929 0 0 0) meshes=l_foot.vtp
    Body calcn_r: mass=1.032151 mass_center=(0.08220071 0.02466021 0)
        inertia=(0.00078111 0.002175949 0.002287536 0 0 0) meshes=r_foot.vtp
    Body toes_l: mass=0.1788511 mass_center=(0.02809363 0.004871727 0.0142092)
        inertia=(5.443729e-5 0.0001088746 0.0005443729 0 0 0) meshes=l_bofoot.vtp
    Body toes_r: mass=0.1788511 mass_center=(0.02844144 0.004932042 0.01438512)
        inertia=(5.579357e-5 0.0001115871 0.0005579357 0 0 0) meshes=r_bofoot.vtp
    Body torso: mass=28.26986 mass_center=(-0.04000027 0.3007917 0) inertia=(1.314516 1.028728 1.314516 0 0 0)
        meshes=(hat_spine.vtp hat_jaw.vtp hat_skull.vtp hat_ribs_scap.vtp)
  JointSet:
    CustomJoint ground_pelvis: socket_parent_frame=ground_offset socket_child_frame=pelvis_offset
      Coordinate pelvis_tilt: range=(-1.570796 1.570796)
      Coordinate pelvis_list: range=(-1.570796 1.570796)
      Coordinate pelvis_rotation: range=(-1.570796 1.570796)
      Coordinate pelvis_tx: range=(-5 5)
      Coordinate pelvis_ty: default_value=0.94 range=(-3 3)
      Coordinate pelvis_tz: default_value=0 range=(-3 3)
      PhysicalOffsetFrame ground_offset: socket_parent=/ground translation=(0 0 0) [meters]
      PhysicalOffsetFrame pelvis_offset: socket_parent=/bodyset/pelvis translation=(0 0 0)
      SpatialTransform:
        TransformAxis rotation1: coordinates=pelvis_tilt axis=(0 0 1) LinearFunction(coefficients=1 0)
        TransformAxis rotation2: coordinates=pelvis_list axis=(1 0 0) LinearFunction(coefficients=1 0)
        TransformAxis rotation3: coordinates=pelvis_rotation axis=(0 1 0) LinearFunction(coefficients=1 0)
        TransformAxis translation1: coordinates=pelvis_tx axis=(1 0 0) LinearFunction(coefficients=1 0)
        TransformAxis translation2: coordinates=pelvis_ty axis=(0 1 0) LinearFunction(coefficients=1 0)
        TransformAxis translation3: coordinates=pelvis_tz axis=(0 0 1) LinearFunction(coefficients=1 0)
    CustomJoint hip_l: socket_parent_frame=pelvis_offset socket_child_frame=femur_l_offset
      Coordinate hip_flexion_l: default_value=0 range=(-0.5235988 2.094395)
      Coordinate hip_adduction_l: range=(-0.8726646 0.5235988)
      Coordinate hip_rotation_l: range=(-0.6981317 0.6981317)
      PhysicalOffsetFrame pelvis_offset: socket_parent=/bodyset/pelvis
          translation=(-0.06026965 -0.08606335 -0.08471467)
      PhysicalOffsetFrame femur_l_offset: socket_parent=/bodyset/femur_l translation=(0 0 0)
      SpatialTransform: axes_held_at_zero=(translation1 translation2 translation3)
        TransformAxis rotation1: coordinates=hip_flexion_l axis=(0 0 1) LinearFunction(coefficients=1 0)
        TransformAxis rotation2: coordinates=hip_adduction_l axis=(1 0 0) LinearFunction(coefficients=-1 0)
        TransformAxis rotation3: coordinates=hip_rotation_l axis=(0 1 0) LinearFunction(coefficients=-1 0)
    CustomJoint hip_r: socket_parent_frame=pelvis_offset socket_child_frame=femur_r_offset
      Coordinate hip_flexion_r: default_value=0 range=(-0.5235988 2.094395)
      Coordinate hip_adduction_r: range=(-0.8726646 0.5235988)
      Coordinate hip_rotation_r: range=(-0.6981317 0.6981317)
      PhysicalOffsetFrame pelvis_offset: socket_parent=/bodyset/pelvis translation=(-0.06026965 -0.08606335 0.08471467)
      PhysicalOffsetFrame femur_r_offset: socket_parent=/bodyset/femur_r translation=(0 0 0)
      SpatialTransform: axes_held_at_zero=(translation1 translation2 translation3)
        TransformAxis rotation1: coordinates=hip_flexion_r axis=(0 0 1) LinearFunction(coefficients=1 0)
        TransformAxis rotation2: coordinates=hip_adduction_r axis=(1 0 0) LinearFunction(coefficients=1 0)
        TransformAxis rotation3: coordinates=hip_rotation_r axis=(0 1 0) LinearFunction(coefficients=1 0)
    CustomJoint patellofemoral_l: socket_parent_frame=tibia_l_offset socket_child_frame=patella_l_offset
      Coordinate knee_angle_l_beta
      PhysicalOffsetFrame tibia_l_offset: socket_parent=/bodyset/femur_l
          translation=(-0.007277632 -0.3669942 0.002473855)
      PhysicalOffsetFrame patella_l_offset: socket_parent=/bodyset/patella_l translation=(0 0 0)
      SpatialTransform: axes_held_at_zero=(rotation2 rotation3)
        TransformAxis rotation1: coordinates=knee_angle_l_beta axis=(0 0 1)
          SimmSpline: x=(0 0.174533 0.349066 0.523599 0.698132 0.872665 1.0472 1.22173 1.39626 1.5708 1.74533 1.91986 2.0944)
              y=(0.00113686 -0.00629212 -0.105582 -0.253683 -0.414245 -0.579047 -0.747244 -0.91799 -1.09044 -1.26379 -1.43763 -1.61186 -1.78634)
        TransformAxis translation1: coordinates=knee_angle_l_beta axis=(1 0 0)
          MultiplierFunction: scale=0.8995837
            SimmSpline: x=(0 0.174533 0.349066 0.523599 0.698132 0.872665 1.0472 1.22173 1.39626 1.5708 1.74533 1.91986 2.0944)
                y=(0.0524 0.0488 0.0437 0.0371 0.0296 0.0216 0.0136 0.0057 -0.0019 -0.0088 -0.0148 -0.0196 -0.0227)
        TransformAxis translation2: coordinates=knee_angle_l_beta axis=(0 1 0)
          MultiplierFunction: scale=0.8995837
            SimmSpline: x=(0 0.174533 0.349066 0.523599 0.698132 0.872665 1.0472 1.22173 1.39626 1.5708 1.74533 1.91986 2.0944)
                y=(-0.0108 -0.019 -0.0263 -0.0322 -0.0367 -0.0395 -0.0408 -0.0404 -0.0384 -0.0349 -0.0301 -0.0245 -0.0187)
        TransformAxis translation3: axis=(0 0 1) MultiplierFunction(scale=0.8995837, Constant(value=-0.00275))
    CustomJoint patellofemoral_r: socket_parent_frame=tibia_r_offset socket_child_frame=patella_r_offset
      Coordinate knee_angle_r_beta
      PhysicalOffsetFrame tibia_r_offset: socket_parent=/bodyset/femur_r
          translation=(-0.007186437 -0.3623954 -0.002442856)
      PhysicalOffsetFrame patella_r_offset: socket_parent=/bodyset/patella_r translation=(0 0 0)
      SpatialTransform: axes_held_at_zero=(rotation2 rotation3)
        TransformAxis rotation1: coordinates=knee_angle_r_beta axis=(0 0 1)
          SimmSpline: x=(0 0.174533 0.349066 0.523599 0.698132 0.872665 1.0472 1.22173 1.39626 1.5708 1.74533 1.91986 2.0944)
              y=(0.00113686 -0.00629212 -0.105582 -0.253683 -0.414245 -0.579047 -0.747244 -0.91799 -1.09044 -1.26379 -1.43763 -1.61186 -1.78634)
        TransformAxis translation1: coordinates=knee_angle_r_beta axis=(1 0 0)
          MultiplierFunction: scale=0.8883112
            SimmSpline: x=(0 0.174533 0.349066 0.523599 0.698132 0.872665 1.0472 1.22173 1.39626 1.5708 1.74533 1.91986 2.0944)
                y=(0.0524 0.0488 0.0437 0.0371 0.0296 0.0216 0.0136 0.0057 -0.0019 -0.0088 -0.0148 -0.0196 -0.0227)
        TransformAxis translation2: coordinates=knee_angle_r_beta axis=(0 1 0)
          MultiplierFunction: scale=0.8883112
            SimmSpline: x=(0 0.174533 0.349066 0.523599 0.698132 0.872665 1.0472 1.22173 1.39626 1.5708 1.74533 1.91986 2.0944)
                y=(-0.0108 -0.019 -0.0263 -0.0322 -0.0367 -0.0395 -0.0408 -0.0404 -0.0384 -0.0349 -0.0301 -0.0245 -0.0187)
        TransformAxis translation3: axis=(0 0 1) MultiplierFunction(scale=0.8883112, Constant(value=0.00275))
    PinJoint knee_l: socket_parent_frame=femur_l_offset socket_child_frame=tibia_l_offset
      Coordinate knee_angle_l: default_value=0 range=(-2.094395 0)
      PhysicalOffsetFrame femur_l_offset: socket_parent=/bodyset/femur_l translation=(0 -0.3669942 0.002473855)
      PhysicalOffsetFrame tibia_l_offset: socket_parent=/bodyset/tibia_l translation=(0 0 0)
    PinJoint knee_r: socket_parent_frame=femur_r_offset socket_child_frame=tibia_r_offset
      Coordinate knee_angle_r: default_value=0 range=(-2.094395 0)
      PhysicalOffsetFrame femur_r_offset: socket_parent=/bodyset/femur_r translation=(0 -0.3623954 -0.002442856)
      PhysicalOffsetFrame tibia_r_offset: socket_parent=/bodyset/tibia_r translation=(0 0 0)
    PinJoint ankle_l: socket_parent_frame=tibia_l_offset socket_child_frame=talus_l_offset
      Coordinate ankle_angle_l: range=(-0.6981317 0.5235988)
      PhysicalOffsetFrame tibia_l_offset: socket_parent=/bodyset/tibia_l translation=(-0.009342528 -0.3737011 0)
          orientation=(-0.1758952 0.105208 0.01866219) [radians]
      PhysicalOffsetFrame talus_l_offset: socket_parent=/bodyset/talus_l translation=(0 0 0)
          orientation=(-0.1758952 0.105208 0.01866219)
    PinJoint ankle_r: socket_parent_frame=tibia_r_offset socket_child_frame=talus_r_offset
      Coordinate ankle_angle_r: range=(-0.6981317 0.5235988)
      PhysicalOffsetFrame tibia_r_offset: socket_parent=/bodyset/tibia_r translation=(-0.009550224 -0.382009 0)
          orientation=(0.1758952 -0.105208 0.01866219)
      PhysicalOffsetFrame talus_r_offset: socket_parent=/bodyset/talus_r translation=(0 0 0)
          orientation=(0.1758952 -0.105208 0.01866219)
    PinJoint subtalar_l: socket_parent_frame=talus_l_offset socket_child_frame=calcn_l_offset
      Coordinate subtalar_angle_l: default_value=0 range=(-0.3490659 0.3490659) locked=true
      PhysicalOffsetFrame talus_l_offset: socket_parent=/bodyset/talus_l
          translation=(-0.04556351 -0.03919191 -0.007399282) orientation=(1.768191 -0.906223 1.819602)
      PhysicalOffsetFrame calcn_l_offset: socket_parent=/bodyset/calcn_l translation=(0 0 0)
          orientation=(1.768191 -0.906223 1.819602)
    PinJoint subtalar_r: socket_parent_frame=talus_r_offset socket_child_frame=calcn_r_offset
      Coordinate subtalar_angle_r: default_value=0 range=(-0.3490659 0.3490659) locked=true
      PhysicalOffsetFrame talus_r_offset: socket_parent=/bodyset/talus_r
          translation=(-0.04657644 -0.04006319 0.007563777) orientation=(-1.768191 0.906223 1.819602)
      PhysicalOffsetFrame calcn_r_offset: socket_parent=/bodyset/calcn_r translation=(0 0 0)
          orientation=(-1.768191 0.906223 1.819602)
    PinJoint mtp_l: socket_parent_frame=calcn_l_offset socket_child_frame=toes_l_offset
      Coordinate mtp_angle_l: default_value=0 range=(-1.0472 1.0472) locked=true
      PhysicalOffsetFrame calcn_l_offset: socket_parent=/bodyset/calcn_l
          translation=(0.1451775 -0.001623909 -0.0008769109) orientation=(0 0.6199005 0)
      PhysicalOffsetFrame toes_l_offset: socket_parent=/bodyset/toes_l translation=(0 0 0) orientation=(0 0.6199005 0)
    PinJoint mtp_r: socket_parent_frame=calcn_r_offset socket_child_frame=toes_r_offset
      Coordinate mtp_angle_r: default_value=0 range=(-1.0472 1.0472) locked=true
      PhysicalOffsetFrame calcn_r_offset: socket_parent=/bodyset/calcn_r
          translation=(0.1469749 -0.001644014 0.0008877676) orientation=(0 -0.6199005 0)
      PhysicalOffsetFrame toes_r_offset: socket_parent=/bodyset/toes_r translation=(0 0 0) orientation=(0 -0.6199005 0)
    CustomJoint lumbar: socket_parent_frame=pelvis_offset socket_child_frame=torso_offset
      Coordinate lumbar_ext: range=(-1.570796 1.570796)
      Coordinate lumbar_bend: range=(-1.570796 1.570796)
      Coordinate lumbar_rota: range=(-1.570796 1.570796)
      PhysicalOffsetFrame pelvis_offset: socket_parent=/bodyset/pelvis translation=(-0.1078462 0.08936378 0)
      PhysicalOffsetFrame torso_offset: socket_parent=/bodyset/torso translation=(0 0 0)
      SpatialTransform: axes_held_at_zero=(translation1 translation2 translation3)
        TransformAxis rotation1: coordinates=lumbar_ext axis=(0 0 1) LinearFunction(coefficients=1 0)
        TransformAxis rotation2: coordinates=lumbar_bend axis=(1 0 0) LinearFunction(coefficients=1 0)
        TransformAxis rotation3: coordinates=lumbar_rota axis=(0 1 0) LinearFunction(coefficients=1 0)
  ConstraintSet:
    CoordinateCouplerConstraint patellofemoral_knee_angle_r_con: independent_coordinate_names=knee_angle_r
        dependent_coordinate_name=knee_angle_r_beta scale_factor=1
        coupled_coordinates_function=LinearFunction(coefficients=-1 0)
    CoordinateCouplerConstraint patellofemoral_knee_angle_l_con: independent_coordinate_names=knee_angle_l
        dependent_coordinate_name=knee_angle_l_beta scale_factor=1
        coupled_coordinates_function=LinearFunction(coefficients=-1 0)
  ForceSet:
    ExpressionBasedCoordinateForce PassiveToeMoment_r: coordinate=mtp_angle_r expression=-10.0*q-1.0*qdot
    ExpressionBasedCoordinateForce PassiveToeMoment_l: coordinate=mtp_angle_l expression=-10.0*q-1.0*qdot
    ExpressionBasedCoordinateForce PassiveHipDampingX_r: coordinate=hip_flexion_r
        expression=-2.44*exp(5.05*(q-1.81))+1.51*exp(-21.88*(q+0.47))-0.1*qdot
    ExpressionBasedCoordinateForce PassiveHipDampingY_r: coordinate=hip_adduction_r
        expression=-0.03*exp(14.94*(q-0.50))+0.03*exp(-14.94*(q+0.50))-0.1*qdot
    ExpressionBasedCoordinateForce PassiveHipDampingZ_r: coordinate=hip_rotation_r
        expression=-0.03*exp(14.94*(q-0.92))+0.03*exp(-14.94*(q+0.92))-0.1*qdot
    ExpressionBasedCoordinateForce PassiveHipDampingX_l: coordinate=hip_flexion_l
        expression=-2.44*exp(5.05*(q-1.81))+1.51*exp(-21.88*(q+0.47))-0.1*qdot
    ExpressionBasedCoordinateForce PassiveHipDampingY_l: coordinate=hip_adduction_l
        expression=-0.03*exp(14.94*(q-0.50))+0.03*exp(-14.94*(q+0.50))-0.1*qdot
    ExpressionBasedCoordinateForce PassiveHipDampingZ_l: coordinate=hip_rotation_l
        expression=-0.03*exp(14.94*(q-0.92))+0.03*exp(-14.94*(q+0.92))-0.1*qdot
    ExpressionBasedCoordinateForce PassiveKneeDamping_r: coordinate=knee_angle_r
        expression=-6.09*exp(33.94*(q-0.13))+11.03*exp(-11.33*(q+2.40))-0.1*qdot
    ExpressionBasedCoordinateForce PassiveKneeDamping_l: coordinate=knee_angle_l
        expression=-6.09*exp(33.94*(q-0.13))+11.03*exp(-11.33*(q+2.40))-0.1*qdot
    ExpressionBasedCoordinateForce PassiveAnkleDamping_r: coordinate=ankle_angle_r
        expression=-2.03*exp(38.11*(q-0.52))+0.18*exp(-42.12*(q+0.74))-0.1*qdot
    ExpressionBasedCoordinateForce PassiveAnkleDamping_l: coordinate=ankle_angle_l
        expression=-2.03*exp(38.11*(q-0.52))+0.18*exp(-42.12*(q+0.74))-0.1*qdot
    ExpressionBasedCoordinateForce PassiveSubtalarDamping_r: coordinate=subtalar_angle_r
        expression=-60.21*exp(16.32*(q-0.65))+60.21*exp(-16.32*(q+0.65))-0.1*qdot
    ExpressionBasedCoordinateForce PassiveSubtalarDamping_l: coordinate=subtalar_angle_l
        expression=-60.21*exp(16.32*(q-0.65))+60.21*exp(-16.32*(q+0.65))-0.1*qdot
    ExpressionBasedCoordinateForce PassiveLumbarDampingX: coordinate=lumbar_ext
        expression=-0.35*exp(30.72*(q-0.17))+0.25*exp(-20.36*(q+0.35))-0.1*qdot
    ExpressionBasedCoordinateForce PassiveLumbarDampingY: coordinate=lumbar_bend
        expression=-0.25*exp(20.36*(q-0.17))+0.25*exp(-20.36*(q+0.17))-0.1*qdot
    ExpressionBasedCoordinateForce PassiveLumbarDampingZ: coordinate=lumbar_rota
        expression=-0.25*exp(20.36*(q-0.17))+0.25*exp(-20.36*(q+0.17))-0.1*qdot
    DeGrooteFregly2016Muscle [values shared by the 84 below unless stated]: min_control=0.001 max_control=1
        max_contraction_velocity=20 default_activation=0.01 active_force_width_scale=1 fiber_damping=0.01
        passive_fiber_strain_at_one_norm_force=0.75 tendon_strain_at_one_norm_force=0.049
        ignore_passive_fiber_force=false
    DeGrooteFregly2016Muscle addbrev_r: max_isometric_force=532.5451 optimal_fiber_length=0.09759263
        tendon_slack_length=0.03360367 pennation_angle_at_optimal=0.1148 [radians] activation_time_constant=0.016
        deactivation_time_constant=0.057
      PathPoint P1: pelvis (-0.02045544 -0.1030699 0.01688592)
      PathPoint P2: femur_r (-0.001776622 -0.1048207 0.02211895)
    DeGrooteFregly2016Muscle addlong_r: max_isometric_force=817.8986 optimal_fiber_length=0.09768718
        tendon_slack_length=0.1189942 pennation_angle_at_optimal=0.1378 activation_time_constant=0.018
        deactivation_time_constant=0.062
      PathPoint P1: pelvis (-0.008117919 -0.09747779 0.0207017)
      PathPoint P2: femur_r (0.01000238 -0.212635 0.01406197)
    DeGrooteFregly2016Muscle addmagMid_r: max_isometric_force=2185.42 optimal_fiber_length=0.1212148
        tendon_slack_length=0.04102112 pennation_angle_at_optimal=0.2073 activation_time_constant=0.05
        deactivation_time_constant=0.142
      PathPoint P1: pelvis (-0.05639704 -0.1324009 0.03129377)
      PathPoint P2: femur_r (0.002149713 -0.1442617 0.02595645)
    DeGrooteFregly2016Muscle bflh_r: max_isometric_force=1204.325 optimal_fiber_length=0.1143947
        tendon_slack_length=0.2855038 pennation_angle_at_optimal=0.1759182 activation_time_constant=0.027
        deactivation_time_constant=0.084 active_force_width_scale=1.5
      PathPoint P1: pelvis (-0.1113804 -0.1305917 0.0642542)
      PathPoint P2: tibia_r (-0.03218426 -0.03342578 0.02416207)
      PathPoint P3: tibia_r (-0.02740914 -0.04345352 0.02893718)
    DeGrooteFregly2016Muscle bfsh_r: max_isometric_force=496.9657 optimal_fiber_length=0.1111936
        tendon_slack_length=0.09548933 pennation_angle_at_optimal=0.2642 activation_time_constant=0.012
        deactivation_time_constant=0.048
      PathPoint P1: femur_r (0.004441556 -0.1875225 0.02078648)
      PathPoint P2: tibia_r (-0.03218426 -0.03342578 0.02416207)
      PathPoint P3: tibia_r (-0.02740914 -0.04345352 0.02893718)
    DeGrooteFregly2016Muscle edl_r: max_isometric_force=531.1283 optimal_fiber_length=0.06335656
        tendon_slack_length=0.330862 pennation_angle_at_optimal=0.2183 activation_time_constant=0.009
        deactivation_time_constant=0.041 active_force_width_scale=1.5 passive_fiber_strain_at_one_norm_force=1.5
      PathPoint P1: tibia_r (-0.01528036 -0.1104961 0.01957796)
      PathPoint P2: tibia_r (0.01566237 -0.3590884 0.01069625)
      PathPoint P3: calcn_r (0.07554245 0.02959225 0.0006576057)
      PathPoint P4: calcn_r (0.1328363 0.004521039 0.01068609)
      PathPoint P5: toes_r (0.0002466021 0.003863433 0.01257671)
      PathPoint P6: toes_r (0.03641491 -0.0003288028 0.02055018)
    DeGrooteFregly2016Muscle ehl_r: max_isometric_force=253.5999 optimal_fiber_length=0.06792959
        tendon_slack_length=0.2956935 pennation_angle_at_optimal=0.1972681 activation_time_constant=0.01
        deactivation_time_constant=0.043 active_force_width_scale=1.5 passive_fiber_strain_at_one_norm_force=1.5
      PathPoint P1: tibia_r (-0.01337031 -0.1480285 0.01804992)
      PathPoint P2: tibia_r (0.006780659 -0.277816 0.01566237)
      PathPoint P3: tibia_r (0.01910045 -0.3526898 -0.002674063)
      PathPoint P4: calcn_r (0.07973469 0.03197607 -0.01734435)
      PathPoint P5: calcn_r (0.1062855 0.02540002 -0.02112558)
      PathPoint P6: calcn_r (0.142536 0.0114259 -0.0230162)
      PathPoint P7: toes_r (0.02449581 0.003370229 -0.02013917)
      PathPoint P8: toes_r (0.046279 0.002794824 -0.01528933)
    DeGrooteFregly2016Muscle ercspn_r: max_isometric_force=2022.023 optimal_fiber_length=0.1431704
        tendon_slack_length=0.02986866 pennation_angle_at_optimal=0 activation_time_constant=0.051
        deactivation_time_constant=0.146
      PathPoint P1: pelvis (-0.1499352 0.04813583 0.04780688)
      PathPoint P2: torso (-0.07333382 0.1033971 0.02980632)
    DeGrooteFregly2016Muscle extobl_r: max_isometric_force=682.5943 optimal_fiber_length=0.1274094
        tendon_slack_length=0.1486443 pennation_angle_at_optimal=0 activation_time_constant=0.014
        deactivation_time_constant=0.053
      PathPoint P1: pelvis (-0.03212897 -0.06973665 0.01096488)
      PathPoint P2: torso (0.08666724 0.1033971 0.1360454)
    DeGrooteFregly2016Muscle fdb_r: max_isometric_force=918.8989 optimal_fiber_length=0.02457801
        tendon_slack_length=0.1391658 pennation_angle_at_optimal=0 activation_time_constant=0.007
        deactivation_time_constant=0.036
      PathPoint P1: calcn_r (0.01750875 0.004438838 0)
      PathPoint P2: calcn_r (0.1362888 -0.006658257 0.009535282)
      PathPoint P3: toes_r (-0.001561813 -0.006411655 0.0120835)
      PathPoint P4: toes_r (0.0234272 -0.00583625 0.01767315)
      PathPoint P5: toes_r (0.03625051 -0.004932042 0.01989257)
    DeGrooteFregly2016Muscle fdl_r: max_isometric_force=377.3263 optimal_fiber_length=0.04026231
        tendon_slack_length=0.3320286 pennation_angle_at_optimal=0.2248 activation_time_constant=0.007
        deactivation_time_constant=0.035 active_force_width_scale=1.5 passive_fiber_strain_at_one_norm_force=1.5
      PathPoint P1: tibia_r (-0.002196552 -0.1749601 -0.00171904)
      PathPoint P2: tibia_r (-0.01680839 -0.3481057 -0.01184228)
      PathPoint P3: calcn_r (0.03583951 0.02589322 -0.0230162)
      PathPoint P4: calcn_r (0.0581981 0.01446732 -0.02161879)
      PathPoint P5: calcn_r (0.1362888 -0.006658257 0.009535282)
      PathPoint P6: toes_r (-0.001561813 -0.006411655 0.0120835)
      PathPoint P7: toes_r (0.0234272 -0.00583625 0.01767315)
      PathPoint P8: toes_r (0.03625051 -0.004932042 0.01989257)
    DeGrooteFregly2016Muscle fhl_r: max_isometric_force=815.998 optimal_fiber_length=0.04722237
        tendon_slack_length=0.3085135 pennation_angle_at_optimal=0.258 activation_time_constant=0.01
        deactivation_time_constant=0.042 active_force_width_scale=1.5 passive_fiber_strain_at_one_norm_force=1.5
      PathPoint P1: tibia_r (-0.02960569 -0.2065713 0.01910045)
      PathPoint P2: tibia_r (-0.02311154 -0.3505887 -0.00725817)
      PathPoint P3: calcn_r (0.03074306 0.0226874 -0.01981037)
      PathPoint P4: calcn_r (0.08532433 0.005589648 -0.02104338)
      PathPoint P5: calcn_r (0.1418784 -0.004356637 -0.02211199)
      PathPoint P6: toes_r (0.01274111 -0.005260845 -0.02178319)
      PathPoint P7: toes_r (0.0461968 -0.008384472 -0.01487833)
    DeGrooteFregly2016Muscle gaslat_r: max_isometric_force=1323.031 optimal_fiber_length=0.06365302
        tendon_slack_length=0.3605406 pennation_angle_at_optimal=0.2102 activation_time_constant=0.016
        deactivation_time_constant=0.058 active_force_width_scale=1.5
      PathPoint P1: femur_r (-0.002664934 -0.3388019 0.02460622)
      ConditionalPathPoint P2: femur_r (-0.0239844 -0.3544362 0.02309609)
          socket_coordinate=/jointset/knee_r/knee_angle_r range=(-0.8727 0) [radians]
      ConditionalPathPoint P3: tibia_r (-0.02769565 -0.03915592 0.02674063)
          socket_coordinate=/jointset/knee_r/knee_angle_r range=(-1.5708 0)
      PathPoint P4: calcn_r (0.003616831 0.02548222 -0.004356637)
    DeGrooteFregly2016Muscle gasmed_r: max_isometric_force=2619.993 optimal_fiber_length=0.05085484
        tendon_slack_length=0.3818423 pennation_angle_at_optimal=0.1656816 activation_time_constant=0.023
        deactivation_time_constant=0.074 active_force_width_scale=1.5
      PathPoint P1: femur_r (0.007106489 -0.3364923 -0.01847687)
      ConditionalPathPoint P2: femur_r (-0.02043116 -0.3508829 -0.01687791)
          socket_coordinate=/jointset/knee_r/knee_angle_r range=(-0.8727 0)
      ConditionalPathPoint P3: tibia_r (-0.03056072 -0.04202099 -0.01432534)
          socket_coordinate=/jointset/knee_r/knee_angle_r range=(-1.5708 0)
      PathPoint P4: calcn_r (0.003616831 0.02548222 -0.004356637)
    DeGrooteFregly2016Muscle glmax2_r: max_isometric_force=2672.577 optimal_fiber_length=0.211613
        tendon_slack_length=0.06829145 pennation_angle_at_optimal=0.3673821 activation_time_constant=0.103
        deactivation_time_constant=0.274
      PathPoint P1: pelvis (-0.1410462 0.009539447 0.05065775)
      PathPoint P2: pelvis (-0.1439378 -0.06677613 0.08914449)
      PathPoint P3: femur_r (-0.039974 -0.05187737 0.02238544)
      PathPoint P4: femur_r (-0.01385765 -0.09025242 0.03722024)
    DeGrooteFregly2016Muscle glmed2_r: max_isometric_force=2087.814 optimal_fiber_length=0.07683782
        tendon_slack_length=0.06862775 pennation_angle_at_optimal=0.3165559 activation_time_constant=0.055
        deactivation_time_constant=0.156
      PathPoint P1: pelvis (-0.09103207 0.03464902 0.07401295)
      PathPoint P2: femur_r (-0.02291843 -0.005152205 0.046814)
    DeGrooteFregly2016Muscle glmin2_r: max_isometric_force=962.3356 optimal_fiber_length=0.05698171
        tendon_slack_length=0.02655755 pennation_angle_at_optimal=0 activation_time_constant=0.014
        deactivation_time_constant=0.054
      PathPoint P1: pelvis (-0.06597147 -0.01557013 0.106469)
      PathPoint P2: femur_r (-0.008527787 -0.009238436 0.04974543)
    DeGrooteFregly2016Muscle grac_r: max_isometric_force=257.6379 optimal_fiber_length=0.231868
        tendon_slack_length=0.1510655 pennation_angle_at_optimal=0.172 activation_time_constant=0.016
        deactivation_time_constant=0.057
      PathPoint P1: pelvis (-0.05072093 -0.1417978 0.02692975)
      PathPoint P2: tibia_r (-0.01759151 -0.04541132 -0.02827821)
      PathPoint P3: tibia_r (0.00169994 -0.06648866 -0.0150225)
    DeGrooteFregly2016Muscle iliacus_r: max_isometric_force=801.2285 optimal_fiber_length=0.1174939
        tendon_slack_length=0.09861277 pennation_angle_at_optimal=0.2799 activation_time_constant=0.021
        deactivation_time_constant=0.07
      PathPoint P1: pelvis (-0.06479341 0.03388148 0.09243395)
      PathPoint P2: pelvis (-0.01445803 -0.06107439 0.0828945)
      ConditionalPathPoint P3: pelvis (-0.03855476 -0.1041664 0.09100852)
          socket_coordinate=/jointset/hip_r/hip_flexion_r range=(-1.5708 0)
      PathPoint P4: femur_r (-0.002043116 -0.05018958 0.01234753)
      PathPoint P5: femur_r (-0.0108374 -0.05658542 0.0174109)
    DeGrooteFregly2016Muscle intobl_r: max_isometric_force=729.6781 optimal_fiber_length=0.09932341
        tendon_slack_length=0.09932341 pennation_angle_at_optimal=0 activation_time_constant=0.013
        deactivation_time_constant=0.049
      PathPoint P1: pelvis (-0.04283862 0.07675417 0.1268637)
      PathPoint P2: torso (0.09333395 0.1503958 0.01855165)
    DeGrooteFregly2016Muscle obtext_r: max_isometric_force=88.01005 optimal_fiber_length=0.04906816
        tendon_slack_length=0.04009228 pennation_angle_at_optimal=0.1222 activation_time_constant=0.006
        deactivation_time_constant=0.032
      PathPoint P1: pelvis (-0.09103207 -0.1262058 0.04057006)
      PathPoint P2: femur_r (-0.03109089 -0.02842596 0.03642076)
    DeGrooteFregly2016Muscle pect_r: max_isometric_force=229.5691 optimal_fiber_length=0.07464463
        tendon_slack_length=0.03079091 pennation_angle_at_optimal=0 activation_time_constant=0.008
        deactivation_time_constant=0.037
      PathPoint P1: pelvis (-0.04615861 -0.08421029 0.04945161)
      PathPoint P2: femur_r (-0.0108374 -0.07301918 0.02247427)
    DeGrooteFregly2016Muscle perbrev_r: max_isometric_force=451.2043 optimal_fiber_length=0.04221442
        tendon_slack_length=0.1371504 pennation_angle_at_optimal=0.2052 activation_time_constant=0.008
        deactivation_time_constant=0.038
      PathPoint P1: tibia_r (-0.02320704 -0.2418117 0.02397106)
      PathPoint P2: tibia_r (-0.03237526 -0.3717902 0.02378006)
      PathPoint P3: tibia_r (-0.02721814 -0.382391 0.02435307)
      PathPoint P4: calcn_r (0.03871653 0.02219419 0.01915276)
      PathPoint P5: calcn_r (0.05564988 0.01800195 0.02819484)
    DeGrooteFregly2016Muscle perlong_r: max_isometric_force=975.7973 optimal_fiber_length=0.0467433
        tendon_slack_length=0.3056718 pennation_angle_at_optimal=0.248 activation_time_constant=0.016
        deactivation_time_constant=0.058
      PathPoint P1: tibia_r (-0.01910045 -0.1311246 0.02693163)
      PathPoint P2: tibia_r (-0.03027421 -0.3724587 0.02263403)
      PathPoint P3: tibia_r (-0.02597661 -0.383346 0.02292054)
      PathPoint P4: calcn_r (0.03600391 0.01890616 0.01816636)
      PathPoint P5: calcn_r (0.05597868 0.008713275 0.023345)
      PathPoint P6: calcn_r (0.070035 0.005671849 0.009699683)
      PathPoint P7: calcn_r (0.09888745 0.00698706 -0.01512493)
    DeGrooteFregly2016Muscle pertert_r: max_isometric_force=149.3182 optimal_fiber_length=0.06882505
        tendon_slack_length=0.07765873 pennation_angle_at_optimal=0.2269 activation_time_constant=0.007
        deactivation_time_constant=0.034
      PathPoint per_tert_r-P1: tibia_r (0.0009550224 -0.2677883 0.02206102)
      PathPoint per_tert_r-P2: tibia_r (0.02187001 -0.3742733 0.02473508)
      PathPoint per_tert_r-P3: calcn_r (0.07044601 0.01874176 0.02457801)
    DeGrooteFregly2016Muscle piri_r: max_isometric_force=781.0255 optimal_fiber_length=0.02761123
        tendon_slack_length=0.1220204 pennation_angle_at_optimal=0.1745 activation_time_constant=0.012
        deactivation_time_constant=0.046
      PathPoint P1: pelvis (-0.109035 -0.007160068 0.01481355)
      PathPoint P2: pelvis (-0.1092599 -0.03361833 0.06679806)
      PathPoint P3: pelvis (-0.09959979 -0.06140334 0.09978042)
      PathPoint P4: femur_r (-0.01314701 -0.00319792 0.0388192)
    DeGrooteFregly2016Muscle popli_r: max_isometric_force=296.9004 optimal_fiber_length=0.03825357
        tendon_slack_length=0.06531097 pennation_angle_at_optimal=0 activation_time_constant=0.009
        deactivation_time_constant=0.04
      PathPoint P1: femur_r (-0.008883112 -0.3464414 0.03109089)
      ConditionalPathPoint P2: femur_r (-0.01687791 -0.3491063 0.02043116)
          socket_coordinate=/jointset/knee_r/knee_angle_r range=(-0.9599 0)
      PathPoint P3: tibia_r (-0.02960569 -0.03342578 -0.009550224)
      PathPoint P4: tibia_r (-0.009550224 -0.06207646 -0.01432534)
    DeGrooteFregly2016Muscle psoas_r: max_isometric_force=1117.567 optimal_fiber_length=0.2689852
        tendon_slack_length=0.102309 pennation_angle_at_optimal=0.2155251 activation_time_constant=0.049
        deactivation_time_constant=0.139
      PathPoint P1: torso (-0.01466676 0.08929753 0.03091942)
      PathPoint P2: pelvis (-0.06490051 0.06798226 0.04276304)
      PathPoint P3: pelvis (-0.02195479 -0.07171032 0.07192962)
      ConditionalPathPoint P4: pelvis (-0.03319993 -0.1041664 0.08114012)
          socket_coordinate=/jointset/hip_r/hip_flexion_r range=(-1.5708 0.5585)
      PathPoint P5: femur_r (-0.01172571 -0.04148413 0.004086231)
      PathPoint P6: femur_r (-0.02087531 -0.04654751 0.007817138)
    DeGrooteFregly2016Muscle quadfem_r: max_isometric_force=297.4524 optimal_fiber_length=0.05569827
        tendon_slack_length=0.02475479 pennation_angle_at_optimal=0 activation_time_constant=0.011
        deactivation_time_constant=0.045
      PathPoint quad_fem_r-P1: pelvis (-0.1224114 -0.1262058 0.05701738)
      PathPoint quad_fem_r-P2: femur_r (-0.03384466 -0.03189037 0.03251219)
    DeGrooteFregly2016Muscle recabd_r: max_isometric_force=524.6906 optimal_fiber_length=0.3618344
        tendon_slack_length=0.0171677 pennation_angle_at_optimal=0 activation_time_constant=0.029
        deactivation_time_constant=0.091
      PathPoint rectabd_r-P1: pelvis (-0.0278451 -0.07675417 0.01206137)
      PathPoint rectabd_r-P2: torso (0.1226675 0.2086573 0.03834008)
    DeGrooteFregly2016Muscle recfem_r: max_isometric_force=1937.945 optimal_fiber_length=0.06913236
        tendon_slack_length=0.3891997 pennation_angle_at_optimal=0.217 activation_time_constant=0.016
        deactivation_time_constant=0.057 active_force_width_scale=1.5 passive_fiber_strain_at_one_norm_force=1.5
      PathPoint P1: pelvis (-0.02570317 -0.04254374 0.1023023)
      ConditionalPathPoint P2: femur_r (0.03553245 -0.3553245 0.001776622)
          socket_coordinate=/jointset/knee_r/knee_angle_r range=(-3.1416 -1.309)
      PathPoint P3: patella_r (0.008883112 0.04352725 0.0006218178)
      PathPoint P4: patella_r (0.01074857 0.0388192 -0.0008883112)
      PathPoint P5: patella_r (0.004441556 0.002194129 2.664934e-5)
      PathPoint P6: tibia_r (0.03113373 -0.06028101 -0.0004488605)
    DeGrooteFregly2016Muscle sart_r: max_isometric_force=216.6242 optimal_fiber_length=0.3730249
        tendon_slack_length=0.1147769 pennation_angle_at_optimal=0.0261 activation_time_constant=0.017
        deactivation_time_constant=0.059
      PathPoint P1: pelvis (-0.02088383 -0.01710521 0.1157891)
      PathPoint P2: femur_r (-0.002664934 -0.3169494 -0.0373979)
      PathPoint P3: tibia_r (-0.02397106 -0.0382964 -0.03485832)
      PathPoint P4: tibia_r (-0.01518486 -0.05720584 -0.02521259)
      PathPoint P5: tibia_r (0.0129883 -0.07735682 -0.002483058)
    DeGrooteFregly2016Muscle semimem_r: max_isometric_force=2019.357 optimal_fiber_length=0.08662923
        tendon_slack_length=0.3050894 pennation_angle_at_optimal=0.2546 activation_time_constant=0.035
        deactivation_time_constant=0.106 active_force_width_scale=1.5
      PathPoint P1: pelvis (-0.1057043 -0.1249996 0.06732437)
      PathPoint P2: tibia_r (-0.02769565 -0.03982443 -0.01871844)
    DeGrooteFregly2016Muscle semiten_r: max_isometric_force=539.851 optimal_fiber_length=0.2286778
        tendon_slack_length=0.2179227 pennation_angle_at_optimal=0.2413 activation_time_constant=0.019
        deactivation_time_constant=0.065 active_force_width_scale=1.5
      PathPoint P1: pelvis (-0.1111662 -0.13739 0.05646914)
      PathPoint P2: tibia_r (-0.0297967 -0.04851514 -0.02187001)
      PathPoint P3: tibia_r (0.001814543 -0.07382323 -0.01117376)
    DeGrooteFregly2016Muscle soleus_r: max_isometric_force=5153.386 optimal_fiber_length=0.05332988
        tendon_slack_length=0.2679076 pennation_angle_at_optimal=0.3814289 activation_time_constant=0.074
        deactivation_time_constant=0.202
      PathPoint P1: tibia_r (-0.00725817 -0.08748005 0.00935922)
      PathPoint P2: calcn_r (0.003616831 0.02548222 -0.004356637)
    DeGrooteFregly2016Muscle tfl_r: max_isometric_force=355.7372 optimal_fiber_length=0.08838461
        tendon_slack_length=0.4181987 pennation_angle_at_optimal=0.0524 activation_time_constant=0.01
        deactivation_time_constant=0.043
      PathPoint P1: pelvis (-0.03330703 0.02346485 0.1360742)
      PathPoint P2: femur_r (0.02611635 -0.08838696 0.05303218)
      PathPoint P3: femur_r (0.00950493 -0.359766 0.02878128)
      PathPoint P4: tibia_r (0.01031424 -0.03915592 0.03304378)
    DeGrooteFregly2016Muscle tibant_r: max_isometric_force=1050.852 optimal_fiber_length=0.06421911
        tendon_slack_length=0.2233095 pennation_angle_at_optimal=0.1951828 activation_time_constant=0.023
        deactivation_time_constant=0.074
      PathPoint P1: tibia_r (0.01470735 -0.1252989 0.01547136)
      PathPoint P2: tibia_r (0.02397106 -0.1820273 0.01222429)
      PathPoint P3: tibia_r (0.02225202 -0.3494427 -0.0126063)
      PathPoint P4: calcn_r (0.09584602 0.01463173 -0.02507122)
    DeGrooteFregly2016Muscle tibpost_r: max_isometric_force=1461.186 optimal_fiber_length=0.03603901
        tendon_slack_length=0.2622839 pennation_angle_at_optimal=0.2265 activation_time_constant=0.019
        deactivation_time_constant=0.066
      PathPoint P1: tibia_r (-0.003915592 -0.1245349 0.009836731)
      PathPoint P2: tibia_r (-0.01566237 -0.3490607 -0.01671289)
      PathPoint P3: calcn_r (0.03427769 0.02745504 -0.0235094)
      PathPoint P4: calcn_r (0.06345895 0.01306991 -0.0230984)
    DeGrooteFregly2016Muscle tricox_r: max_isometric_force=432.8894 optimal_fiber_length=0.05990827
        tendon_slack_length=0.06095929 pennation_angle_at_optimal=0 activation_time_constant=0.01
        deactivation_time_constant=0.042
      PathPoint P1: pelvis (-0.1188772 -0.1118418 0.04057006)
      PathPoint P2: pelvis (-0.1413674 -0.09320149 0.06907875)
      PathPoint P3: femur_r (-0.01261402 -0.002931427 0.03935219)
    DeGrooteFregly2016Muscle vasint_r: max_isometric_force=1517.437 optimal_fiber_length=0.1070763
        tendon_slack_length=0.1820928 pennation_angle_at_optimal=0.06309973 activation_time_constant=0.026
        deactivation_time_constant=0.082
      PathPoint P1: femur_r (0.02576102 -0.1709111 0.02753765)
      PathPoint P2: femur_r (0.02975842 -0.185124 0.02531687)
      ConditionalPathPoint P3: femur_r (0.03286751 -0.3544362 0.002664934)
          socket_coordinate=/jointset/knee_r/knee_angle_r range=(-3.1416 -1.309)
      PathPoint P4: patella_r (0.005152205 0.04263894 -0.0005329867)
      PathPoint P5: patella_r (0.004441556 0.002194129 -0.0003464414)
      PathPoint P6: tibia_r (0.03110508 -0.06035742 0.0004106596)
    DeGrooteFregly2016Muscle vaslat_r: max_isometric_force=4607.426 optimal_fiber_length=0.1046609
        tendon_slack_length=0.1985228 pennation_angle_at_optimal=0.2529 activation_time_constant=0.047
        deactivation_time_constant=0.135
      PathPoint P1: femur_r (0.004263894 -0.1646929 0.03100206)
      PathPoint P2: femur_r (0.02389557 -0.2301614 0.03633193)
      ConditionalPathPoint P3: femur_r (0.03020258 -0.3659842 0.01510129)
          socket_coordinate=/jointset/knee_r/knee_angle_r range=(-3.1416 -1.309)
      PathPoint P4: patella_r (0.009149605 0.03757556 0.01252519)
      PathPoint P5: patella_r (0.004441556 0.002194129 0.006511321)
      PathPoint P6: tibia_r (0.03107643 -0.06052932 0.004880165)
    DeGrooteFregly2016Muscle vasmed_r: max_isometric_force=2455.603 optimal_fiber_length=0.1067868
        tendon_slack_length=0.1801407 pennation_angle_at_optimal=0.4222 activation_time_constant=0.035
        deactivation_time_constant=0.105
      PathPoint P1: femur_r (0.01243636 -0.1864565 0.01670025)
      PathPoint P2: femur_r (0.03162388 -0.2459734 0.0007994801)
      ConditionalPathPoint P3: femur_r (0.03109089 -0.3642076 -0.01332467)
          socket_coordinate=/jointset/knee_r/knee_angle_r range=(-3.1416 -1.309)
      PathPoint P4: patella_r (0.00559636 0.03952985 -0.01510129)
      PathPoint P5: patella_r (0.004441556 0.002194129 -0.007550645)
      PathPoint P6: tibia_r (0.03046521 -0.06071077 -0.006475052)
    DeGrooteFregly2016Muscle addbrev_l: max_isometric_force=528.2266 optimal_fiber_length=0.0983905
        tendon_slack_length=0.0338784 pennation_angle_at_optimal=0.1148 activation_time_constant=0.016
        deactivation_time_constant=0.057
      PathPoint P1: pelvis (-0.02045544 -0.1030699 -0.01688592)
      PathPoint P2: femur_l (-0.001799167 -0.1061509 -0.02239963)
    DeGrooteFregly2016Muscle addlong_l: max_isometric_force=808.6677 optimal_fiber_length=0.09880227
        tendon_slack_length=0.1203525 pennation_angle_at_optimal=0.1378 activation_time_constant=0.018
        deactivation_time_constant=0.062
      PathPoint P1: pelvis (-0.008117919 -0.09747779 -0.0207017)
      PathPoint P2: femur_l (0.01012931 -0.2153333 -0.01424041)
    DeGrooteFregly2016Muscle addmagMid_l: max_isometric_force=2157.488 optimal_fiber_length=0.1227841
        tendon_slack_length=0.04155221 pennation_angle_at_optimal=0.2073 activation_time_constant=0.05
        deactivation_time_constant=0.142
      PathPoint P1: pelvis (-0.05639704 -0.1324009 -0.03129377)
      PathPoint P2: femur_l (0.002176992 -0.1460924 -0.02628583)
    DeGrooteFregly2016Muscle bflh_l: max_isometric_force=1192.773 optimal_fiber_length=0.1155026
        tendon_slack_length=0.2882689 pennation_angle_at_optimal=0.1759182 activation_time_constant=0.021
        deactivation_time_constant=0.07 active_force_width_scale=1.5
      PathPoint P1: pelvis (-0.1113804 -0.1305917 -0.0642542)
      PathPoint P2: tibia_l (-0.03148432 -0.03269885 -0.0236366)
      PathPoint P3: tibia_l (-0.02681306 -0.0425085 -0.02830786)
    DeGrooteFregly2016Muscle bfsh_l: max_isometric_force=494.5435 optimal_fiber_length=0.1117382
        tendon_slack_length=0.09595703 pennation_angle_at_optimal=0.2642232 activation_time_constant=0.011
        deactivation_time_constant=0.046
      PathPoint P1: femur_l (0.004497918 -0.1899021 -0.02105026)
      PathPoint P2: tibia_l (-0.03148432 -0.03269885 -0.0236366)
      PathPoint P3: tibia_l (-0.02681306 -0.0425085 -0.02830786)
    DeGrooteFregly2016Muscle edl_l: max_isometric_force=541.6786 optimal_fiber_length=0.06212256
        tendon_slack_length=0.3244178 pennation_angle_at_optimal=0.2183 activation_time_constant=0.009
        deactivation_time_constant=0.041 active_force_width_scale=1.5 passive_fiber_strain_at_one_norm_force=1.5
      PathPoint P1: tibia_l (-0.01494804 -0.108093 -0.01915218)
      PathPoint P2: tibia_l (0.01532175 -0.3512791 -0.01046363)
      PathPoint P3: calcn_l (0.07461862 0.02923036 -0.0006495636)
      PathPoint P4: calcn_l (0.1312119 0.00446575 -0.01055541)
      PathPoint P5: toes_l (0.0002435864 0.003816186 -0.0124229)
      PathPoint P6: toes_l (0.03596959 -0.0003247818 -0.02029886)
    DeGrooteFregly2016Muscle ehl_l: max_isometric_force=258.5399 optimal_fiber_length=0.06663165
        tendon_slack_length=0.2900437 pennation_angle_at_optimal=0.1972681 activation_time_constant=0.01
        deactivation_time_constant=0.043 active_force_width_scale=1.5 passive_fiber_strain_at_one_norm_force=1.5
      PathPoint P1: tibia_l (-0.01307954 -0.1448092 -0.01765738)
      PathPoint P2: tibia_l (0.006633195 -0.2717741 -0.01532175)
      PathPoint P3: tibia_l (0.01868506 -0.3450196 0.002615908)
      PathPoint P4: calcn_l (0.07875959 0.03158503 0.01713224)
      PathPoint P5: calcn_l (0.1049857 0.0250894 0.02086723)
      PathPoint P6: calcn_l (0.1407929 0.01128617 0.02273473)
      PathPoint P7: toes_l (0.02419625 0.003329014 0.01989289)
      PathPoint P8: toes_l (0.04571304 0.002760645 0.01510235)
    DeGrooteFregly2016Muscle ercspn_l: max_isometric_force=2022.023 optimal_fiber_length=0.1431704
        tendon_slack_length=0.02986866 pennation_angle_at_optimal=0 activation_time_constant=0.044
        deactivation_time_constant=0.127
      PathPoint P1: pelvis (-0.1499352 0.04813583 -0.04780688)
      PathPoint P2: torso (-0.07333382 0.1033971 -0.02980632)
    DeGrooteFregly2016Muscle extobl_l: max_isometric_force=682.5943 optimal_fiber_length=0.1274094
        tendon_slack_length=0.1486443 pennation_angle_at_optimal=0 activation_time_constant=0.014
        deactivation_time_constant=0.053
      PathPoint P1: pelvis (-0.03212897 -0.06973665 -0.01096488)
      PathPoint P2: torso (0.08666724 0.1033971 -0.1360454)
    DeGrooteFregly2016Muscle fdb_l: max_isometric_force=930.2754 optimal_fiber_length=0.02427744
        tendon_slack_length=0.1374639 pennation_angle_at_optimal=0 activation_time_constant=0.007
        deactivation_time_constant=0.036
      PathPoint P1: calcn_l (0.01729463 0.004384555 0)
      PathPoint P2: calcn_l (0.1346221 -0.006576832 -0.009418673)
      PathPoint P3: toes_l (-0.001542714 -0.006333246 -0.01193573)
      PathPoint P4: toes_l (0.0231407 -0.005764877 -0.01745702)
      PathPoint P5: toes_l (0.0358072 -0.004871727 -0.0196493)
    DeGrooteFregly2016Muscle fdl_l: max_isometric_force=384.406 optimal_fiber_length=0.03952078
        tendon_slack_length=0.3259135 pennation_angle_at_optimal=0.2248 activation_time_constant=0.007
        deactivation_time_constant=0.035 active_force_width_scale=1.5 passive_fiber_strain_at_one_norm_force=1.5
      PathPoint P1: tibia_l (-0.002148781 -0.1711551 0.001681655)
      PathPoint P2: tibia_l (-0.01644285 -0.3405351 0.01158473)
      PathPoint P3: calcn_l (0.03540122 0.02557657 0.02273473)
      PathPoint P4: calcn_l (0.05748638 0.0142904 0.0213544)
      PathPoint P5: calcn_l (0.1346221 -0.006576832 -0.009418673)
      PathPoint P6: toes_l (-0.001542714 -0.006333246 -0.01193573)
      PathPoint P7: toes_l (0.0231407 -0.005764877 -0.01745702)
      PathPoint P8: toes_l (0.0358072 -0.004871727 -0.0196493)
    DeGrooteFregly2016Muscle fhl_l: max_isometric_force=830.9021 optimal_fiber_length=0.04637534
        tendon_slack_length=0.3029797 pennation_angle_at_optimal=0.258 activation_time_constant=0.01
        deactivation_time_constant=0.042 active_force_width_scale=1.5 passive_fiber_strain_at_one_norm_force=1.5
      PathPoint P1: tibia_l (-0.02896184 -0.2020789 -0.01868506)
      PathPoint P2: tibia_l (-0.02260892 -0.3429642 0.007100321)
      PathPoint P3: calcn_l (0.0303671 0.02240995 0.0195681)
      PathPoint P4: calcn_l (0.08428088 0.005521291 0.02078604)
      PathPoint P5: calcn_l (0.1401434 -0.004303359 0.02184158)
      PathPoint P6: toes_l (0.0125853 -0.005196509 0.0215168)
      PathPoint P7: toes_l (0.04563185 -0.008281936 0.01469638)
    DeGrooteFregly2016Muscle gaslat_l: max_isometric_force=1349.661 optimal_fiber_length=0.06239708
        tendon_slack_length=0.3534268 pennation_angle_at_optimal=0.2102 activation_time_constant=0.015
        deactivation_time_constant=0.055 active_force_width_scale=1.5
      PathPoint P1: femur_l (-0.002698751 -0.3431012 -0.02491847)
      ConditionalPathPoint P2: femur_l (-0.02428876 -0.3589339 -0.02338918)
          socket_coordinate=/jointset/knee_l/knee_angle_l range=(-0.8727 0)
      ConditionalPathPoint P3: tibia_l (-0.02709333 -0.03830436 -0.02615908)
          socket_coordinate=/jointset/knee_l/knee_angle_l range=(-1.5708 0)
      PathPoint P4: calcn_l (0.0035726 0.02517059 0.004303359)
    DeGrooteFregly2016Muscle gasmed_l: max_isometric_force=2671.475 optimal_fiber_length=0.04987482
        tendon_slack_length=0.3744838 pennation_angle_at_optimal=0.1656816 activation_time_constant=0.022
        deactivation_time_constant=0.072 active_force_width_scale=1.5
      PathPoint P1: femur_l (0.007196669 -0.3407623 0.01871134)
      ConditionalPathPoint P2: femur_l (-0.02069042 -0.3553355 0.01709209)
          socket_coordinate=/jointset/knee_l/knee_angle_l range=(-0.8727 0)
      ConditionalPathPoint P3: tibia_l (-0.02989609 -0.04110712 0.01401379)
          socket_coordinate=/jointset/knee_l/knee_angle_l range=(-1.5708 0)
      PathPoint P4: calcn_l (0.0035726 0.02517059 0.004303359)
    DeGrooteFregly2016Muscle glmax2_l: max_isometric_force=2660.817 optimal_fiber_length=0.2125482
        tendon_slack_length=0.06859328 pennation_angle_at_optimal=0.3673821 activation_time_constant=0.103
        deactivation_time_constant=0.274
      PathPoint P1: pelvis (-0.1410462 0.009539447 -0.05065775)
      PathPoint P2: pelvis (-0.1439378 -0.06677613 -0.08914449)
      PathPoint P3: femur_l (-0.04048127 -0.05253569 -0.02266951)
      PathPoint P4: femur_l (-0.01403351 -0.0913977 -0.03769256)
    DeGrooteFregly2016Muscle glmed2_l: max_isometric_force=2083.444 optimal_fiber_length=0.07699898
        tendon_slack_length=0.06877169 pennation_angle_at_optimal=0.3165559 activation_time_constant=0.055
        deactivation_time_constant=0.156
      PathPoint P1: pelvis (-0.09103207 0.03464902 -0.07401295)
      PathPoint P2: femur_l (-0.02320926 -0.005217585 -0.04740806)
    DeGrooteFregly2016Muscle glmin2_l: max_isometric_force=958.6502 optimal_fiber_length=0.05720077
        tendon_slack_length=0.02665965 pennation_angle_at_optimal=0 activation_time_constant=0.014
        deactivation_time_constant=0.054
      PathPoint P1: pelvis (-0.06597147 -0.01557013 -0.106469)
      PathPoint P2: femur_l (-0.008636003 -0.00935567 -0.05037669)
    DeGrooteFregly2016Muscle grac_l: max_isometric_force=255.7012 optimal_fiber_length=0.2336242
        tendon_slack_length=0.1522097 pennation_angle_at_optimal=0.172 activation_time_constant=0.014
        deactivation_time_constant=0.053
      PathPoint P1: pelvis (-0.05072093 -0.1417978 -0.02692975)
      PathPoint P2: tibia_l (-0.01720894 -0.04442372 0.02766323)
      PathPoint P3: tibia_l (0.00166297 -0.06504268 0.0146958)
    DeGrooteFregly2016Muscle iliacus_l: max_isometric_force=798.5755 optimal_fiber_length=0.1178842
        tendon_slack_length=0.09894038 pennation_angle_at_optimal=0.2799 activation_time_constant=0.02
        deactivation_time_constant=0.067
      PathPoint P1: pelvis (-0.06479341 0.03388148 -0.09243395)
      PathPoint P2: pelvis (-0.01445803 -0.06107439 -0.0828945)
      ConditionalPathPoint P3: pelvis (-0.03855476 -0.1041664 -0.09100852)
          socket_coordinate=/jointset/hip_l/hip_flexion_l range=(-1.5708 0)
      PathPoint P4: femur_l (-0.002069042 -0.05082648 -0.01250421)
      PathPoint P5: femur_l (-0.01097492 -0.05730348 -0.01763184)
    DeGrooteFregly2016Muscle intobl_l: max_isometric_force=729.6781 optimal_fiber_length=0.09932341
        tendon_slack_length=0.09932341 pennation_angle_at_optimal=0 activation_time_constant=0.013
        deactivation_time_constant=0.049
      PathPoint P1: pelvis (-0.04283862 0.07675417 -0.1268637)
      PathPoint P2: torso (0.09333395 0.1503958 -0.01855165)
    DeGrooteFregly2016Muscle obtext_l: max_isometric_force=87.57003 optimal_fiber_length=0.04931471
        tendon_slack_length=0.04029373 pennation_angle_at_optimal=0.1222 activation_time_constant=0.006
        deactivation_time_constant=0.032
      PathPoint P1: pelvis (-0.09103207 -0.1262058 -0.04057006)
      PathPoint P2: femur_l (-0.03148543 -0.02878668 -0.03688293)
    DeGrooteFregly2016Muscle pect_l: max_isometric_force=227.4441 optimal_fiber_length=0.07534203
        tendon_slack_length=0.03107859 pennation_angle_at_optimal=0 activation_time_constant=0.008
        deactivation_time_constant=0.037
      PathPoint P1: pelvis (-0.04615861 -0.08421029 -0.04945161)
      PathPoint P2: femur_l (-0.01097492 -0.07394578 -0.02275947)
    DeGrooteFregly2016Muscle perbrev_l: max_isometric_force=460.692 optimal_fiber_length=0.04134503
        tendon_slack_length=0.1343258 pennation_angle_at_optimal=0.2052 activation_time_constant=0.008
        deactivation_time_constant=0.038
      PathPoint P1: tibia_l (-0.02270234 -0.2365528 -0.02344975)
      PathPoint P2: tibia_l (-0.03167117 -0.3637046 -0.02326289)
      PathPoint P3: tibia_l (-0.0266262 -0.3740748 -0.02382345)
      PathPoint P4: calcn_l (0.03824306 0.02192277 -0.01891854)
      PathPoint P5: calcn_l (0.05496932 0.0177818 -0.02785004)
    DeGrooteFregly2016Muscle perlong_l: max_isometric_force=995.4185 optimal_fiber_length=0.04582192
        tendon_slack_length=0.2996465 pennation_angle_at_optimal=0.248 activation_time_constant=0.016
        deactivation_time_constant=0.058
      PathPoint P1: tibia_l (-0.01868506 -0.1282729 -0.02634593)
      PathPoint P2: tibia_l (-0.02961581 -0.3643586 -0.02214179)
      PathPoint P3: tibia_l (-0.02541168 -0.3750091 -0.02242207)
      PathPoint P4: calcn_l (0.03556361 0.01867495 -0.0179442)
      PathPoint P5: calcn_l (0.05529411 0.008606718 -0.02305951)
      PathPoint P6: calcn_l (0.06917853 0.005602486 -0.009581064)
      PathPoint P7: calcn_l (0.09767813 0.006901614 0.01493996)
    DeGrooteFregly2016Muscle pertert_l: max_isometric_force=152.9377 optimal_fiber_length=0.06719618
        tendon_slack_length=0.0758208 pennation_angle_at_optimal=0.2269 activation_time_constant=0.007
        deactivation_time_constant=0.034
      PathPoint per_tert_l-P1: tibia_l (0.0009342528 -0.2619645 -0.02158124)
      PathPoint per_tert_l-P2: tibia_l (0.02139439 -0.3661337 -0.02419715)
      PathPoint per_tert_l-P3: calcn_l (0.06958451 0.01851256 -0.02427744)
    DeGrooteFregly2016Muscle piri_l: max_isometric_force=780.0175 optimal_fiber_length=0.02764691
        tendon_slack_length=0.1221781 pennation_angle_at_optimal=0.1745 activation_time_constant=0.012
        deactivation_time_constant=0.046
      PathPoint P1: pelvis (-0.109035 -0.007160068 -0.01481355)
      PathPoint P2: pelvis (-0.1092599 -0.03361833 -0.06679806)
      PathPoint P3: pelvis (-0.09959979 -0.06140334 -0.09978042)
      PathPoint P4: femur_l (-0.01331384 -0.003238501 -0.03931181)
    DeGrooteFregly2016Muscle popli_l: max_isometric_force=300.2009 optimal_fiber_length=0.037833
        tendon_slack_length=0.06459293 pennation_angle_at_optimal=0 activation_time_constant=0.009
        deactivation_time_constant=0.04
      PathPoint P1: femur_l (-0.008995837 -0.3508376 -0.03148543)
      ConditionalPathPoint P2: femur_l (-0.01709209 -0.3535364 -0.02069042)
          socket_coordinate=/jointset/knee_l/knee_angle_l range=(-0.9599 0)
      PathPoint P3: tibia_l (-0.02896184 -0.03269885 0.009342528)
      PathPoint P4: tibia_l (-0.009342528 -0.06072643 0.01401379)
    DeGrooteFregly2016Muscle psoas_l: max_isometric_force=1115.911 optimal_fiber_length=0.2693844
        tendon_slack_length=0.1024608 pennation_angle_at_optimal=0.2155251 activation_time_constant=0.025
        deactivation_time_constant=0.079
      PathPoint P1: torso (-0.01466676 0.08929753 -0.03091942)
      PathPoint P2: pelvis (-0.06490051 0.06798226 -0.04276304)
      PathPoint P3: pelvis (-0.02195479 -0.07171032 -0.07192962)
      ConditionalPathPoint P4: pelvis (-0.03319993 -0.1041664 -0.08114012)
          socket_coordinate=/jointset/hip_l/hip_flexion_l range=(-1.5708 0.5585)
      PathPoint P5: femur_l (-0.0118745 -0.04201056 -0.004138085)
      PathPoint P6: femur_l (-0.02114022 -0.04713818 -0.007916336)
    DeGrooteFregly2016Muscle quadfem_l: max_isometric_force=296.8185 optimal_fiber_length=0.05581722
        tendon_slack_length=0.02480765 pennation_angle_at_optimal=0 activation_time_constant=0.011
        deactivation_time_constant=0.045
      PathPoint quad_fem_l-P1: pelvis (-0.1224114 -0.1262058 -0.05701738)
      PathPoint quad_fem_l-P2: femur_l (-0.03427414 -0.03229505 -0.03292476)
    DeGrooteFregly2016Muscle recabd_l: max_isometric_force=524.6906 optimal_fiber_length=0.3618344
        tendon_slack_length=0.0171677 pennation_angle_at_optimal=0 activation_time_constant=0.031
        deactivation_time_constant=0.096
      PathPoint rectabd_l-P1: pelvis (-0.0278451 -0.07675417 -0.01206137)
      PathPoint rectabd_l-P2: torso (0.1226675 0.2086573 -0.03834008)
    DeGrooteFregly2016Muscle recfem_l: max_isometric_force=1922.924 optimal_fiber_length=0.06967237
        tendon_slack_length=0.3922399 pennation_angle_at_optimal=0.2170149 activation_time_constant=0.016
        deactivation_time_constant=0.057 active_force_width_scale=1.5 passive_fiber_strain_at_one_norm_force=1.5
      PathPoint P1: pelvis (-0.02570317 -0.04254374 -0.1023023)
      ConditionalPathPoint P2: femur_l (0.03598335 -0.3598335 -0.001799167)
          socket_coordinate=/jointset/knee_l/knee_angle_l range=(-3.1416 -1.309)
      PathPoint P3: patella_l (0.008995837 0.0440796 -0.0006297086)
      PathPoint P4: patella_l (0.01088496 0.03931181 0.0008995837)
      PathPoint P5: patella_l (0.004497918 0.002221972 -2.698751e-5)
      PathPoint P6: tibia_l (0.03045664 -0.05897004 0.0004390988)
    DeGrooteFregly2016Muscle sart_l: max_isometric_force=215.7339 optimal_fiber_length=0.3745643
        tendon_slack_length=0.1152506 pennation_angle_at_optimal=0.0261 activation_time_constant=0.017
        deactivation_time_constant=0.059
      PathPoint P1: pelvis (-0.02088383 -0.01710521 -0.1157891)
      PathPoint P2: femur_l (-0.002698751 -0.3209715 0.03787247)
      PathPoint P3: tibia_l (-0.02344975 -0.03746354 0.03410023)
      PathPoint P4: tibia_l (-0.01485462 -0.05596174 0.02466427)
      PathPoint P5: tibia_l (0.01270584 -0.07567448 0.002429057)
    DeGrooteFregly2016Muscle semimem_l: max_isometric_force=1998.73 optimal_fiber_length=0.08752328
        tendon_slack_length=0.308238 pennation_angle_at_optimal=0.2546 activation_time_constant=0.026
        deactivation_time_constant=0.083 active_force_width_scale=1.5
      PathPoint P1: pelvis (-0.1057043 -0.1249996 -0.06732437)
      PathPoint P2: tibia_l (-0.02709333 -0.03895834 0.01831135)
    DeGrooteFregly2016Muscle semiten_l: max_isometric_force=536.2903 optimal_fiber_length=0.2301961
        tendon_slack_length=0.2193696 pennation_angle_at_optimal=0.2413 activation_time_constant=0.015
        deactivation_time_constant=0.056 active_force_width_scale=1.5
      PathPoint P1: pelvis (-0.1111662 -0.13739 -0.05646914)
      PathPoint P2: tibia_l (-0.02914869 -0.04746004 0.02139439)
      PathPoint P3: tibia_l (0.00177508 -0.07221774 0.01093076)
    DeGrooteFregly2016Muscle soleus_l: max_isometric_force=5272.163 optimal_fiber_length=0.05212841
        tendon_slack_length=0.2618719 pennation_angle_at_optimal=0.3814289 activation_time_constant=0.06
        deactivation_time_constant=0.167
      PathPoint P1: tibia_l (-0.007100321 -0.08557756 -0.009155677)
      PathPoint P2: calcn_l (0.0035726 0.02517059 0.004303359)
    DeGrooteFregly2016Muscle tfl_l: max_isometric_force=353.165 optimal_fiber_length=0.08902832
        tendon_slack_length=0.4212445 pennation_angle_at_optimal=0.0524 activation_time_constant=0.01
        deactivation_time_constant=0.043
      PathPoint P1: pelvis (-0.03330703 0.02346485 -0.1360742)
      PathPoint P2: femur_l (0.02644776 -0.08950857 -0.05370514)
      PathPoint P3: femur_l (0.009625545 -0.3643314 -0.02914651)
      PathPoint P4: tibia_l (0.01008993 -0.03830436 -0.03232515)
    DeGrooteFregly2016Muscle tibant_l: max_isometric_force=1073.618 optimal_fiber_length=0.06285732
        tendon_slack_length=0.2185741 pennation_angle_at_optimal=0.1951828 activation_time_constant=0.023
        deactivation_time_constant=0.074
      PathPoint P1: tibia_l (0.01438749 -0.122574 -0.0151349)
      PathPoint P2: tibia_l (0.02344975 -0.1780686 -0.01195844)
      PathPoint P3: tibia_l (0.02176809 -0.3418431 0.01233214)
      PathPoint P4: calcn_l (0.0946739 0.01445279 0.02476461)
    DeGrooteFregly2016Muscle tibpost_l: max_isometric_force=1493.647 optimal_fiber_length=0.03525578
        tendon_slack_length=0.2565838 pennation_angle_at_optimal=0.2265 activation_time_constant=0.019
        deactivation_time_constant=0.066
      PathPoint P1: tibia_l (-0.003830436 -0.1218266 -0.009622804)
      PathPoint P2: tibia_l (-0.01532175 -0.3414694 0.01634942)
      PathPoint P3: calcn_l (0.0338585 0.02711928 0.0232219)
      PathPoint P4: calcn_l (0.06268289 0.01291008 0.02281592)
    DeGrooteFregly2016Muscle tricox_l: max_isometric_force=432.2609 optimal_fiber_length=0.05999538
        tendon_slack_length=0.06104793 pennation_angle_at_optimal=0 activation_time_constant=0.01
        deactivation_time_constant=0.042
      PathPoint P1: pelvis (-0.1188772 -0.1118418 -0.04057006)
      PathPoint P2: pelvis (-0.1413674 -0.09320149 -0.06907875)
      PathPoint P3: femur_l (-0.01277409 -0.002968626 -0.03985156)
    DeGrooteFregly2016Muscle vasint_l: max_isometric_force=1508.552 optimal_fiber_length=0.107707
        tendon_slack_length=0.1831653 pennation_angle_at_optimal=0.06309973 activation_time_constant=0.022
        deactivation_time_constant=0.073
      PathPoint P1: femur_l (0.02608793 -0.1730799 -0.02788709)
      PathPoint P2: femur_l (0.03013605 -0.1874732 -0.02563813)
      ConditionalPathPoint P3: femur_l (0.0332846 -0.3589339 -0.002698751)
          socket_coordinate=/jointset/knee_l/knee_angle_l range=(-3.1416 -1.309)
      PathPoint P4: patella_l (0.005217585 0.04318002 0.0005397502)
      PathPoint P5: patella_l (0.004497918 0.002221972 0.0003508376)
      PathPoint P6: tibia_l (0.03042861 -0.05904478 -0.0004017287)
    DeGrooteFregly2016Muscle vaslat_l: max_isometric_force=4578.877 optimal_fiber_length=0.1053135
        tendon_slack_length=0.1997606 pennation_angle_at_optimal=0.2529 activation_time_constant=0.041
        deactivation_time_constant=0.119
      PathPoint P1: femur_l (0.004318002 -0.1667828 -0.03139547)
      PathPoint P2: femur_l (0.0241988 -0.2330821 -0.03679297)
      ConditionalPathPoint P3: femur_l (0.03058584 -0.3706285 -0.01529292)
          socket_coordinate=/jointset/knee_l/knee_angle_l range=(-3.1416 -1.309)
      PathPoint P4: patella_l (0.009265712 0.03805239 -0.01268413)
      PathPoint P5: patella_l (0.004497918 0.002221972 -0.006593948)
      PathPoint P6: tibia_l (0.03040059 -0.05921294 -0.004774032)
    DeGrooteFregly2016Muscle vasmed_l: max_isometric_force=2442.016 optimal_fiber_length=0.1073809
        tendon_slack_length=0.181143 pennation_angle_at_optimal=0.4222 activation_time_constant=0.03
        deactivation_time_constant=0.091
      PathPoint P1: femur_l (0.01259417 -0.1888226 -0.01691217)
      PathPoint P2: femur_l (0.03202518 -0.2490947 -0.0008096253)
      ConditionalPathPoint P3: femur_l (0.03148543 -0.3688293 0.01349376)
          socket_coordinate=/jointset/knee_l/knee_angle_l range=(-3.1416 -1.309)
      PathPoint P4: patella_l (0.005667377 0.04003147 0.01529292)
      PathPoint P5: patella_l (0.004497918 0.002221972 0.007646461)
      PathPoint P6: tibia_l (0.02980266 -0.05939045 0.006334234)
    SmoothSphereHalfSpaceForce [values shared by the 12 below unless stated]: socket_half_space=/contactgeometryset/floor
        stiffness=3067776 [N/m^2] dissipation=2 [s/m] static_friction=0.8 dynamic_friction=0.8 viscous_friction=0.5
        transition_velocity=0.2 [m/s] hertz_smoothing=300 hunt_crossley_smoothing=50
    SmoothSphereHalfSpaceForce contactHeel_r: socket_sphere=/contactgeometryset/heel_r
    SmoothSphereHalfSpaceForce contactMH1_r: socket_sphere=/contactgeometryset/mh1_r
    SmoothSphereHalfSpaceForce contactMH3_r: socket_sphere=/contactgeometryset/mh3_r
    SmoothSphereHalfSpaceForce contactMH5_r: socket_sphere=/contactgeometryset/mh5_r
    SmoothSphereHalfSpaceForce contactHallux_r: socket_sphere=/contactgeometryset/hallux_r
    SmoothSphereHalfSpaceForce contactOtherToes_r: socket_sphere=/contactgeometryset/othertoes_r stiffness=306777.6
    SmoothSphereHalfSpaceForce contactHeel_l: socket_sphere=/contactgeometryset/heel_l
    SmoothSphereHalfSpaceForce contactMH1_l: socket_sphere=/contactgeometryset/mh1_l
    SmoothSphereHalfSpaceForce contactMH3_l: socket_sphere=/contactgeometryset/mh3_l
    SmoothSphereHalfSpaceForce contactMH5_l: socket_sphere=/contactgeometryset/mh5_l
    SmoothSphereHalfSpaceForce contactHallux_l: socket_sphere=/contactgeometryset/hallux_l
    SmoothSphereHalfSpaceForce contactOtherToes_l: socket_sphere=/contactgeometryset/othertoes_l stiffness=306777.6
  MarkerSet:
    Marker C7: torso (-0.1133341 0.4088887 0.00204595) fixed=true
    Marker CLAV: torso (0.05333369 0.3571901 0.001958477) fixed=true
    Marker RSHO: torso (0.01954595 0.388995 0.1720803) fixed=true
    Marker LSHO: torso (0.019546 0.3889951 -0.1720802) fixed=true
    Marker RASI: pelvis (0.0102068 0.01982626 0.1408593) fixed=true
    Marker LASI: pelvis (0.0102068 0.01982626 -0.1408593) fixed=true
    Marker SACR: pelvis (-0.1659997 0.03837708 0) fixed=true
    Marker RKNE: femur_r (0 -0.3588777 0.04441556) fixed=true
    Marker RANK: tibia_r (-0.004775112 -0.3780616 0.05061619) fixed=true
    Marker RHEE: calcn_r (-0.02055018 0.01644014 -0.004110035) fixed=true
    Marker LKNE: femur_l (0 -0.3634318 -0.04497918) fixed=true
    Marker LANK: tibia_l (-0.004671264 -0.3698399 -0.0495154) fixed=true
    Marker LHEE: calcn_l (-0.02029886 0.01623909 0.004059773) fixed=true
    Marker STRN: torso (0.1334171 0.2115096 0.00204595) fixed=true
    Marker T10: torso (-0.1237755 0.1606844 0.00204595) fixed=true
    Marker RTIB: tibia_r (-0.001372926 -0.2334368 0.09399623)
    Marker LTIB: tibia_l (-0.03478372 -0.2178664 -0.09725649)
    Marker RTOE: toes_r (0.00246713 0.0534644 0.01626771)
    Marker LTOE: toes_l (0.005081733 0.05036231 -0.004326229)
    Marker RTHI: femur_r (0.01270829 -0.1839241 0.1088768)
    Marker LTHI: femur_l (-0.02030173 -0.1623891 -0.1318801)
  ContactGeometrySet:
    ContactSphere heel_r: socket_frame=/bodyset/calcn_r location=(0.02573501 0.008578336 0) radius=0.035
    ContactSphere mh1_r: socket_frame=/bodyset/calcn_r location=(0.1496053 -0.006658257 -0.01890616) radius=0.015
    ContactSphere mh3_r: socket_frame=/bodyset/calcn_r location=(0.1362888 -0.006658257 0.009535282) radius=0.015
    ContactSphere mh5_r: socket_frame=/bodyset/calcn_r location=(0.117547 -0.006658257 0.03041426) radius=0.015
    ContactSphere hallux_r: socket_frame=/bodyset/toes_r location=(0.0461968 -0.008384472 -0.01487833) radius=0.015
    ContactSphere othertoes_r: socket_frame=/bodyset/toes_r location=(0.03625051 -0.004932042 0.01989257) radius=0.015
    ContactSphere heel_l: socket_frame=/bodyset/calcn_l location=(0.02542029 0.00847343 0) radius=0.035
    ContactSphere mh1_l: socket_frame=/bodyset/calcn_l location=(0.1477757 -0.006576832 0.01867495) radius=0.015
    ContactSphere mh3_l: socket_frame=/bodyset/calcn_l location=(0.1346221 -0.006576832 -0.009418673) radius=0.015
    ContactSphere mh5_l: socket_frame=/bodyset/calcn_l location=(0.1161095 -0.006576832 -0.03004232) radius=0.015
    ContactSphere hallux_l: socket_frame=/bodyset/toes_l location=(0.04563185 -0.008281936 0.01469638) radius=0.015
    ContactSphere othertoes_l: socket_frame=/bodyset/toes_l location=(0.0358072 -0.004871727 -0.0196493) radius=0.015
    ContactHalfSpace floor: socket_frame=/ground orientation=(0 0 -1.570796)
