# OpenSim document version 40500
InverseKinematicsTool:
  model_file: ..\data\2014001\scaling\2014001_scaledModelAdjusted.osim
  time_range: 0.1500001 0.6599999
  output_motion_file: ..\data\2014001\ik\C4_04\C4_04_ik.mot
  marker_file: ..\data\2014001\dynamic\2014001_C4_04.trc
  report_marker_locations: true
  IKTaskSet:
    IKMarkerTask SJN: weight=1
    IKMarkerTask SXS: weight=1
    IKMarkerTask CV7: weight=1
    IKMarkerTask TV10: weight=1
    IKMarkerTask R_SAE: apply=false weight=0
    IKMarkerTask L_SAE: apply=false weight=0
    IKMarkerTask L_IAS: weight=1
    IKMarkerTask L_IPS: weight=1
    IKMarkerTask R_IAS: weight=1
    IKMarkerTask R_IPS: weight=1
    IKMarkerTask R_FTC: weight=1
    IKMarkerTask R_FLE: weight=1
    IKMarkerTask R_FME: weight=1
    IKMarkerTask R_TTC: weight=1
    IKMarkerTask R_FAX: weight=1
    IKMarkerTask R_TAM: weight=1
    IKMarkerTask R_FAL: weight=1
    IKMarkerTask R_FCC: weight=1
    IKMarkerTask R_FM1: weight=1
    IKMarkerTask R_FM2: weight=1
    IKMarkerTask R_FM5: weight=1
    IKMarkerTask L_FTC: weight=1
    IKMarkerTask L_FLE: weight=1
    IKMarkerTask L_FME: weight=1
    IKMarkerTask L_TTC: weight=1
    IKMarkerTask L_FAX: weight=1
    IKMarkerTask L_TAM: weight=1
    IKMarkerTask L_FAL: weight=1
    IKMarkerTask L_FCC: weight=1
    IKMarkerTask L_FM1: weight=1
    IKMarkerTask L_FM2: weight=1
    IKMarkerTask L_FM5: weight=1
    IKMarkerTask R_SAA: apply=false weight=0
    IKMarkerTask R_HLE: weight=1
    IKMarkerTask R_HME: weight=1
    IKMarkerTask R_UOA: weight=1
    IKMarkerTask R_RSP: weight=1
    IKMarkerTask R_UHE: weight=1
    IKMarkerTask R_HM2: apply=false weight=0
    IKMarkerTask R_HM5: apply=false weight=0
    IKMarkerTask L_SAA: apply=false weight=0
    IKMarkerTask L_HLE: weight=1
    IKMarkerTask L_HME: weight=1
    IKMarkerTask L_UOA: weight=1
    IKMarkerTask L_RSP: weight=1
    IKMarkerTask L_UHE: weight=1
    IKMarkerTask L_HM2: apply=false weight=0
    IKMarkerTask L_HM5: apply=false weight=0
