# OpenSim document version 40500
Model 2014014_2d:
  gravity: 0 -9.80665 0
  length_units: meters
  force_units: N
  credits:
    A 2-D model 11 degrees of freedom and 18 muscles for simulating walking. This model was assembled by Vinh Nguyen and Russel Johnson and includes elements from Delp et al. (1990), Yamaguchi Zajac (1989), Anderson Pandy (1999), Sasaki et al. (2009) and Porsa et al. (2016). The CustomJoint and moving muscle insertion points for the knee joint are due to Ajay Seth. For use with Moco, Brian Umberger replaced the muscles with DeGrooteFregly2016Muscles and the ground contact elements with SmoothSphereHalfSpaceForces. License: Creative Commons (CCBY 3.0). You are free to distribute, remix, tweak, and build upon this work, even commercially, as long as you credit us for the original creation.
  publications:
    >Nguyen, V.Q.,Johnson, R.T., Sup, F.C., Umberger, B.R. Bilevel Optimization for Cost Function Determination in Dynamic Simulation of Human Gait. IEEE Transactions on Neural Systems and Rehabilitation Engineering, vol 27 pp 1426-1435, 2019
  Ground
  BodySet:
    Body pelvis: mass=14.556 [kg] mass_center=(-0.08469207 0 0) inertia=(0.187789 0.187789 0.1012613 0 0 0)
        meshes=(sacrum.vtp pelvis.vtp l_pelvis.vtp)
    Body femur_r: mass=11.49624 mass_center=(0 -0.2069145 0) inertia=(0.317657 0.1071341 0.317657 0 0 0)
        meshes=r_femur.vtp
    Body tibia_r: mass=4.582353 mass_center=(0 -0.2075768 0) inertia=(0.09532243 0.01025715 0.09532243 0 0 0)
        meshes=(r_tibia.vtp r_fibula.vtp)
    Body talus_r: mass=0.1235968 mass_center=(0 0 0) inertia=(0.00183549 0.001865733 0.001865733 0 0 0)
        meshes=talus.vtp
    Body calcn_r: mass=1.544961 mass_center=(0.1048874 0.03568811 0) inertia=(0.002896629 0.00659536 0.00659536 0 0 0)
        meshes=foot.vtp
    Body toes_r: mass=0.2677108 mass_center=(0.03448249 0.006781918 -0.01978047)
        inertia=(0.0001602342 0.0002669653 0.0002669653 0 0 0) meshes=bofoot.vtp
    Body femur_l: mass=11.49624 mass_center=(0 -0.2053265 0) inertia=(0.3216325 0.1231616 0.3216325 0 0 0)
        meshes=l_femur.vtp
    Body tibia_l: mass=4.582353 mass_center=(0 -0.2056671 0) inertia=(0.09364728 0.01021061 0.09364728 0 0 0)
        meshes=(l_tibia.vtp l_fibula.vtp)
    Body talus_l: mass=0.1235968 mass_center=(0 0 0) inertia=(0.001814473 0.001850923 0.001850923 0 0 0)
        meshes=l_talus.vtp
    Body calcn_l: mass=1.544961 mass_center=(0.1076426 0.03504869 0)
        inertia=(0.002793762 0.006817885 0.006817885 0 0 0) meshes=l_foot.vtp
    Body toes_l: mass=0.2677108 mass_center=(0.03538828 0.006660408 0.01942607)
        inertia=(0.0001545439 0.0002740654 0.0002740654 0 0 0) meshes=l_bofoot.vtp
    Body torso: mass=32.45078 mass_center=(-0.03846761 0.3474302 0) inertia=(2.763542 1.930897 2.763542 0 0 0)
        meshes=(hat_spine.vtp hat_jaw.vtp hat_skull.vtp hat_ribs_scap.vtp)
    Body humerus_r: mass=2.458612 mass_center=(0 -0.1986846 0) inertia=(0.0205932 0.00629855 0.0205932 0 0 0)
        meshes=humerus_rv.vtp
    Body ulna_r: mass=0.734862 mass_center=(0 -0.1258761 0) inertia=(0.004033808 0.001066635 0.004033808 0 0 0)
        meshes=ulna_rv.vtp
    Body radius_r: mass=0.734862 mass_center=(0 -0.1258761 0) inertia=(0.004033808 0.001066635 0.004033808 0 0 0)
        meshes=radius_rv.vtp
    Body hand_r: mass=0.5534146 mass_center=(0 -0.08401566 0) inertia=(0.001735921 0.001194024 0.001735921 0 0 0)
        meshes=(pisiform_rvs.vtp lunate_rvs.vtp scaphoid_rvs.vtp triquetrum_rvs.vtp hamate_rvs.vtp capitate_rvs.vtp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)
    Body humerus_l: mass=2.458612 mass_center=(0 -0.2018547 0) inertia=(0.020402 0.004793966 0.020402 0 0 0)
        meshes=humerus_lv.vtp
    Body ulna_l: mass=0.734862 mass_center=(0 -0.1270471 0) inertia=(0.004058237 0.000984632 0.004058237 0 0 0)
        meshes=ulna_lv.vtp
    Body radius_l: mass=0.734862 mass_center=(0 -0.1270471 0) inertia=(0.004058237 0.000984632 0.004058237 0 0 0)
        meshes=radius_lv.vtp
    Body hand_l: mass=0.5534146 mass_center=(0 -0.07349039 0) inertia=(0.001471688 0.001200526 0.001471688 0 0 0)
        meshes=(pisiform_lvs.vtp lunate_lvs.vtp scaphoid_lvs.vtp triquetrum_lvs.vtp hamate_lvs.vtp capitate_lvs.vtp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)
  JointSet:
    CustomJoint ground_pelvis: socket_parent_frame=ground_offset socket_child_frame=pelvis_offset
      Coordinate pelvis_tilt: default_value=0 range=(-1.570796 1.570796) clamped=false
      Coordinate pelvis_tx: default_value=0 range=(-5 5) clamped=false
      Coordinate pelvis_ty: default_value=1.2 range=(-1 2) clamped=false
      PhysicalOffsetFrame ground_offset: socket_parent=/ground translation=(0 0 0) [meters]
      PhysicalOffsetFrame pelvis_offset: socket_parent=/bodyset/pelvis translation=(0 0 0)
      SpatialTransform: axes_held_at_zero=(rotation2 rotation3)
        TransformAxis rotation1: coordinates=pelvis_tilt axis=(0 0 1) LinearFunction(coefficients=1 0)
        TransformAxis translation1: coordinates=pelvis_tx axis=(1 0 0) LinearFunction(coefficients=1 0)
        TransformAxis translation2: coordinates=pelvis_ty axis=(0 1 0) LinearFunction(coefficients=1 0)
        TransformAxis translation3: axis=(0 0 1) MultiplierFunction(scale=1, Constant(value=0.02))
    PinJoint hip_r: socket_parent_frame=pelvis_offset socket_child_frame=femur_r_offset
      Coordinate hip_flexion_r: default_value=0 range=(-2.094395 2.094395) clamped=false
      PhysicalOffsetFrame pelvis_offset: socket_parent=/bodyset/pelvis translation=(-0.06670983 -0.07376546 0.08403532)
      PhysicalOffsetFrame femur_r_offset: socket_parent=/bodyset/femur_r translation=(0 0 0)
    PinJoint knee_r: socket_parent_frame=femur_r_offset socket_child_frame=tibia_r_offset
      Coordinate knee_angle_r: default_value=0 range=(-2.094395 0)
      PhysicalOffsetFrame femur_r_offset: socket_parent=/bodyset/femur_r translation=(0 -0.4512994 -0.003527746)
      PhysicalOffsetFrame tibia_r_offset: socket_parent=/bodyset/tibia_r translation=(0 0 0)
    PinJoint ankle_r: socket_parent_frame=tibia_r_offset socket_child_frame=talus_r_offset
      Coordinate ankle_angle_r: default_value=-0.3490659 range=(-1.570796 1.570796) clamped=false
      PhysicalOffsetFrame tibia_r_offset: socket_parent=/bodyset/tibia_r translation=(-0.01117175 -0.4326138 0)
      PhysicalOffsetFrame talus_r_offset: socket_parent=/bodyset/talus_r translation=(0 0 0)
    WeldJoint subtalar_r: socket_parent_frame=talus_r_offset socket_child_frame=calcn_r_offset
      PhysicalOffsetFrame talus_r_offset: socket_parent=/bodyset/talus_r
          translation=(-0.05448462 -0.04537037 0.008848026)
      PhysicalOffsetFrame calcn_r_offset: socket_parent=/bodyset/calcn_r translation=(0 0 0)
    PinJoint mtp_r: socket_parent_frame=calcn_r_offset socket_child_frame=toes_r_offset
      Coordinate mtp_angle_r: default_value=0 range=(-1.570796 1.570796) clamped=false locked=true
      PhysicalOffsetFrame calcn_r_offset: socket_parent=/bodyset/calcn_r
          translation=(0.1839823 -0.002334089 0.001260408)
      PhysicalOffsetFrame toes_r_offset: socket_parent=/bodyset/toes_r translation=(0 0 0)
    PinJoint hip_l: socket_parent_frame=pelvis_offset socket_child_frame=femur_l_offset
      Coordinate hip_flexion_l: default_value=0 range=(-2.094395 2.094395) clamped=false
      PhysicalOffsetFrame pelvis_offset: socket_parent=/bodyset/pelvis
          translation=(-0.06670983 -0.07376546 -0.08403532)
      PhysicalOffsetFrame femur_l_offset: socket_parent=/bodyset/femur_l translation=(0 0 0)
    PinJoint knee_l: socket_parent_frame=femur_l_offset socket_child_frame=tibia_l_offset
      Coordinate knee_angle_l: default_value=0 range=(-2.094395 0)
      PhysicalOffsetFrame femur_l_offset: socket_parent=/bodyset/femur_l translation=(0 -0.4478357 0.003782432)
      PhysicalOffsetFrame tibia_l_offset: socket_parent=/bodyset/tibia_l translation=(0 0 0)
    PinJoint ankle_l: socket_parent_frame=tibia_l_offset socket_child_frame=talus_l_offset
      Coordinate ankle_angle_l: default_value=-0.3490659 range=(-1.047198 1.047198) clamped=false
      PhysicalOffsetFrame tibia_l_offset: socket_parent=/bodyset/tibia_l translation=(-0.01114637 -0.4286339 0)
      PhysicalOffsetFrame talus_l_offset: socket_parent=/bodyset/talus_l translation=(0 0 0)
    WeldJoint subtalar_l: socket_parent_frame=talus_l_offset socket_child_frame=calcn_l_offset
      PhysicalOffsetFrame talus_l_offset: socket_parent=/bodyset/talus_l
          translation=(-0.05436087 -0.04495298 -0.008827928)
      PhysicalOffsetFrame calcn_l_offset: socket_parent=/bodyset/calcn_l translation=(0 0 0)
    PinJoint mtp_l: socket_parent_frame=calcn_l_offset socket_child_frame=toes_l_offset
      Coordinate mtp_angle_l: default_value=0 range=(-1.570796 1.570796) clamped=false locked=true
      PhysicalOffsetFrame calcn_l_offset: socket_parent=/bodyset/calcn_l
          translation=(0.1888152 -0.00229227 -0.001237826)
      PhysicalOffsetFrame toes_l_offset: socket_parent=/bodyset/toes_l translation=(0 0 0)
    PinJoint back: socket_parent_frame=pelvis_offset socket_child_frame=torso_offset
      Coordinate lumbar_ext: default_value=0 range=(-1.570796 1.570796) clamped=false
      PhysicalOffsetFrame pelvis_offset: socket_parent=/bodyset/pelvis translation=(-0.1206291 0.07740214 0)
      PhysicalOffsetFrame torso_offset: socket_parent=/bodyset/torso translation=(0 0 0)
    PinJoint acromial_r: socket_parent_frame=torso_offset socket_child_frame=humerus_r_offset
      Coordinate shoulder_flexion_r: default_value=0 range=(-1.570796 1.570796) clamped=false
      PhysicalOffsetFrame torso_offset: socket_parent=/bodyset/torso translation=(0.003979334 0.3967476 0.2396455)
      PhysicalOffsetFrame humerus_r_offset: socket_parent=/bodyset/humerus_r translation=(0 0 0)
    PinJoint elbow_r: socket_parent_frame=humerus_r_offset socket_child_frame=ulna_r_offset
      Coordinate elbow_flexion_r: default_value=0 range=(0 2.618) clamped=false
      PhysicalOffsetFrame humerus_r_offset: socket_parent=/bodyset/humerus_r
          translation=(0.01477464 -0.3457589 -0.01078535)
      PhysicalOffsetFrame ulna_r_offset: socket_parent=/bodyset/ulna_r translation=(0 0 0)
    WeldJoint radioulnar_r: socket_parent_frame=ulna_r_offset socket_child_frame=radius_r_offset
      PhysicalOffsetFrame ulna_r_offset: socket_parent=/bodyset/ulna_r
          translation=(-0.008035359 -0.01358449 0.03115598)
      PhysicalOffsetFrame radius_r_offset: socket_parent=/bodyset/radius_r translation=(0 0 0)
          orientation=(0 -1.570796 0) [radians]
    WeldJoint radius_hand_r: socket_parent_frame=radius_r_offset socket_child_frame=hand_r_offset
      PhysicalOffsetFrame radius_r_offset: socket_parent=/bodyset/radius_r
          translation=(-0.01050796 -0.2463119 0.01625706) orientation=(-1.5708 0 -1.5708)
      PhysicalOffsetFrame hand_r_offset: socket_parent=/bodyset/hand_r translation=(0 0 0)
          orientation=(-1.5708 0 -1.5708)
    PinJoint acromial_l: socket_parent_frame=torso_offset socket_child_frame=humerus_l_offset
      Coordinate shoulder_flexion_l: default_value=0 range=(-1.570796 1.570796) clamped=false
      PhysicalOffsetFrame torso_offset: socket_parent=/bodyset/torso translation=(0.003979334 0.3967476 -0.2396455)
      PhysicalOffsetFrame humerus_l_offset: socket_parent=/bodyset/humerus_l translation=(0 0 0)
    PinJoint elbow_l: socket_parent_frame=humerus_l_offset socket_child_frame=ulna_l_offset
      Coordinate elbow_flexion_l: default_value=0 range=(0 2.618) clamped=false
      PhysicalOffsetFrame humerus_l_offset: socket_parent=/bodyset/humerus_l
          translation=(0.01288973 -0.3512756 0.009409389)
      PhysicalOffsetFrame ulna_l_offset: socket_parent=/bodyset/ulna_l translation=(0 0 0)
    WeldJoint radioulnar_l: socket_parent_frame=ulna_l_offset socket_child_frame=radius_l_offset
      PhysicalOffsetFrame ulna_l_offset: socket_parent=/bodyset/ulna_l
          translation=(-0.007720304 -0.01371086 -0.0299344)
      PhysicalOffsetFrame radius_l_offset: socket_parent=/bodyset/radius_l translation=(0 0 0)
          orientation=(0 1.570796 0)
    WeldJoint radius_hand_l: socket_parent_frame=radius_l_offset socket_child_frame=hand_l_offset
      PhysicalOffsetFrame radius_l_offset: socket_parent=/bodyset/radius_l
          translation=(-0.01009596 -0.2486032 -0.01561964) orientation=(1.5708 0 1.5708)
      PhysicalOffsetFrame hand_l_offset: socket_parent=/bodyset/hand_l translation=(0 0 0)
          orientation=(1.5708 0 1.5708)
  ForceSet:
    CoordinateLimitForce hip_limit_r: coordinate=hip_flexion_r upper_stiffness=500 [N*m/degree]
        upper_limit=103.7 [degrees] lower_stiffness=729.4401 [N*m/degree] lower_limit=-36.52 [degrees] damping=0
        transition=1 [degrees]
    CoordinateLimitForce hip_limit_l: coordinate=hip_flexion_l upper_stiffness=500 upper_limit=103.7
        lower_stiffness=729.4401 lower_limit=-36.52 damping=0 transition=1
    CoordinateLimitForce knee_limit_r: coordinate=knee_angle_r upper_stiffness=595.4197 upper_limit=11.4485
        lower_stiffness=105.2106 lower_limit=-137.51 damping=0 transition=7
    CoordinateLimitForce knee_limit_l: coordinate=knee_angle_l upper_stiffness=595.4197 upper_limit=11.4485
        lower_stiffness=105.2106 lower_limit=-137.51 damping=0 transition=7
    CoordinateLimitForce ankle_limit_r: coordinate=ankle_angle_r upper_stiffness=889.7686 upper_limit=35.8
        lower_stiffness=390.7439 lower_limit=-48.4 damping=0 transition=9
    CoordinateLimitForce ankle_limit_l: coordinate=ankle_angle_l upper_stiffness=889.7686 upper_limit=35.8
        lower_stiffness=390.7439 lower_limit=-48.4 damping=0 transition=9
    SpringGeneralizedForce hip_flexion_damping_r: coordinate=hip_flexion_r stiffness=0 rest_length=0 viscosity=0.1
    SpringGeneralizedForce hip_flexion_damping_l: coordinate=hip_flexion_l stiffness=0 rest_length=0 viscosity=0.1
    SpringGeneralizedForce knee_damping_r: coordinate=knee_angle_r stiffness=0 rest_length=0 viscosity=0.1
    SpringGeneralizedForce knee_damping_l: coordinate=knee_angle_l stiffness=0 rest_length=0 viscosity=0.1
    SpringGeneralizedForce ankle_damping_r: coordinate=ankle_angle_r stiffness=0 rest_length=0 viscosity=0.5
    SpringGeneralizedForce ankle_damping_l: coordinate=ankle_angle_l stiffness=0 rest_length=0 viscosity=0.5
    CoordinateActuator pelvis_tx_residual: coordinate=pelvis_tx optimal_force=2.5
    CoordinateActuator pelvis_ty_residual: coordinate=pelvis_ty optimal_force=2.5
    CoordinateActuator pelvis_tilt_residual: coordinate=pelvis_tilt optimal_force=2.5
    CoordinateActuator hip_flexion_r_torque: coordinate=hip_flexion_r optimal_force=300
    CoordinateActuator knee_angle_r_torque: coordinate=knee_angle_r optimal_force=300
    CoordinateActuator ankle_angle_r_torque: coordinate=ankle_angle_r optimal_force=200
    CoordinateActuator hip_flexion_l_torque: coordinate=hip_flexion_l optimal_force=300
    CoordinateActuator knee_angle_l_torque: coordinate=knee_angle_l optimal_force=300
    CoordinateActuator ankle_angle_l_torque: coordinate=ankle_angle_l optimal_force=200
    CoordinateActuator lumbar_ext_torque: coordinate=lumbar_ext optimal_force=300
    CoordinateActuator shoulder_flexion_r_torque: coordinate=shoulder_flexion_r optimal_force=100
    CoordinateActuator elbow_flexion_r_torque: coordinate=elbow_flexion_r optimal_force=50
    CoordinateActuator shoulder_flexion_l_torque: coordinate=shoulder_flexion_l optimal_force=100
    CoordinateActuator elbow_flexion_l_torque: coordinate=elbow_flexion_l optimal_force=50
  MarkerSet:
    Marker contact_Foot_Ground_R1: calcn_r (0.01028984 -0.01167045 -0.02334089) fixed=true
    Marker contact_Foot_Ground_R2: calcn_r (0.1646374 -0.01167045 -0.04084656) fixed=true
    Marker contact_Foot_Ground_R3: calcn_r (0.01028984 -0.01167045 0.008752835) fixed=true
    Marker contact_Foot_Ground_R4: calcn_r (0.128623 -0.01167045 0.05835223) fixed=true
    Marker contact_Foot_Ground_R5: toes_r (0.07202888 -0.009336357 0.01167045) fixed=true
    Marker contact_Foot_Ground_R6: calcn_r (0.0771738 -0.01167045 -0.002042328) fixed=true
    Marker contact_Foot_Ground_R7: toes_r (0.03601444 -0.009336357 -0.02334089) fixed=true
    Marker contact_Foot_Ground_R8: toes_r (0.02057968 -0.009336357 0.03501134) fixed=true
    Marker contact_Foot_Ground_L1: calcn_l (0.01056014 -0.01146135 0.0229227) fixed=true
    Marker contact_Foot_Ground_L2: calcn_l (0.1689622 -0.01146135 0.04011472) fixed=true
    Marker contact_Foot_Ground_L3: calcn_l (0.01056014 -0.01146135 -0.008596012) fixed=true
    Marker contact_Foot_Ground_L4: calcn_l (0.1320017 -0.01146135 -0.05730675) fixed=true
    Marker contact_Foot_Ground_L5: toes_l (0.07392095 -0.00916908 -0.01146135) fixed=true
    Marker contact_Foot_Ground_L6: calcn_l (0.07920102 -0.01146135 0.002005736) fixed=true
    Marker contact_Foot_Ground_L7: toes_l (0.03696047 -0.00916908 0.0229227) fixed=true
    Marker contact_Foot_Ground_L8: toes_l (0.02112027 -0.00916908 -0.03438405) fixed=true
    Marker CV7: torso (-0.1072087 0.4645632 0.002331977) fixed=true
    Marker SJN: torso (0.05045115 0.4058253 0.002232275) fixed=true
    Marker R_SAE: torso (0.01848955 0.4419607 0.1961373)
    Marker L_SAE: torso (0.01848959 0.4419608 -0.1961372)
    Marker R_SAA: torso (-0.06306394 0.3967476 0.2396455)
    Marker L_SAA: torso (-0.07315417 0.3967476 -0.2396455)
    Marker R_HLE: humerus_r (0.01686089 -0.3381824 0.04496237) fixed=true
    Marker R_HME: humerus_r (0.002529133 -0.3454292 -0.05170673) fixed=true
    Marker R_RSP: radius_r (0.0005972469 -0.2349896 0.05972469) fixed=true
    Marker R_UHE: radius_r (-0.02627886 -0.2349896 -0.02627886) fixed=true
    Marker L_HLE: humerus_l (0.01470983 -0.3435783 -0.03922622) fixed=true
    Marker L_HME: humerus_l (0.002206524 -0.3509407 0.04511015) fixed=true
    Marker L_RSP: radius_l (0.0005738297 -0.2371756 -0.05738297) fixed=true
    Marker L_UHE: radius_l (-0.0252485 -0.2371756 0.0252485) fixed=true
    Marker R_IAS: pelvis (0.01129746 0.01699322 0.1397297) fixed=true
    Marker L_IAS: pelvis (0.01129746 0.01699322 -0.1397297) fixed=true
    Marker R_IPS: pelvis (-0.1837377 0.03289325 0.04894628) fixed=true
    Marker L_IPS: pelvis (-0.1837377 0.03289325 -0.04894628) fixed=true
    Marker R_FLE: femur_r (0 -0.4469187 0.06414084) fixed=true
    Marker R_FME: femur_r (0 -0.4469187 -0.06414084) fixed=true
    Marker R_FAL: tibia_r (-0.005585875 -0.4281436 0.05921027) fixed=true
    Marker R_TAM: tibia_r (0.00670305 -0.4104569 -0.04245265) fixed=true
    Marker R_FCC: calcn_r (-0.0257246 0.02334089 -0.005835223)
    Marker R_FM1: toes_r (0.02340321 0.03707638 -0.03629612)
    Marker R_FM5: toes_r (-0.03833583 0.03145029 0.06757086)
    Marker L_FLE: femur_l (0 -0.4434886 -0.06877149) fixed=true
    Marker L_FME: femur_l (0 -0.4434886 0.06877149) fixed=true
    Marker L_FAL: tibia_l (-0.005573187 -0.424205 -0.05907578) fixed=true
    Marker L_TAM: tibia_l (0.006687824 -0.4066803 0.04235622) fixed=true
    Marker L_FCC: calcn_l (-0.02640034 0.0229227 0.005730675)
    Marker L_FM1: toes_l (0.02401797 0.03641117 0.03564581)
    Marker L_FM5: toes_l (-0.03934284 0.03088566 -0.06636021)
    Marker SXS: torso (0.1262062 0.2403088 0.002331977) fixed=true
    Marker TV10: torso (-0.1170857 0.1825633 0.002331977) fixed=true
    Marker L_UOA: ulna_l (-0.04790047 3.816054e-20 -1.329505e-18)
    Marker R_UOA: ulna_r (-0.04985518 3.780878e-20 -1.383761e-18)
    Marker R_FAX: tibia_r (-0.00587238 -0.08580474 0.06740361)
    Marker L_FAX: tibia_l (-0.005859036 -0.08501536 -0.06725053)
    Marker L_TTC: tibia_l (0.04556767 -0.0666406 -0.008289781)
    Marker R_TTC: tibia_r (0.04567145 -0.06725934 0.008308654)
    Marker R_FM2: toes_r (0.001651519 0.03705125 0.005637146)
    Marker L_FM2: toes_l (0.001694902 0.03638745 -0.005536141)
    Marker R_HM2: hand_r (0.005495007 -0.1020223 0.04731129)
    Marker R_HM5: hand_r (0.003399097 -0.08243201 -0.06212079)
    Marker L_HM2: hand_l (0.005509944 -0.08924126 -0.04743995)
    Marker L_HM5: hand_l (0.00340834 -0.07210508 0.06228964)
    Marker R_FTC: femur_r (-0.01534451 -0.03596689 0.09774445) fixed=true
    Marker L_FTC: femur_l (-0.01645234 -0.03569085 -0.1048011) fixed=true
