# OpenSim document version 40500
AnalyzeTool C4_04_ik_2d:
  model_file: C:\+GitRepos+\optimal-control-weights\datasets\SchreiberMoissenet2019\code\..\data\2014014\model\2014014_model_2d.osim
  replace_force_set: false
  results_directory: C:\+GitRepos+\optimal-control-weights\datasets\SchreiberMoissenet2019\code\..\data\2014014\mrs\C4_04\2d\results\MuscleAnalysis
  output_precision: 8
  initial_time: 0.23
  final_time: 0.77
  solve_for_equilibrium_for_auxiliary_states: false
  maximum_number_of_integrator_steps: 20000
  maximum_integrator_step_size: 1
  minimum_integrator_step_size: 1e-8
  integrator_error_tolerance: 1e-5
  coordinates_file: C:\+GitRepos+\optimal-control-weights\datasets\SchreiberMoissenet2019\code\..\data\2014014\mrs\C4_04\2d\C4_04_ik_2d.mot
  lowpass_cutoff_frequency_for_coordinates: -1
  AnalysisSet Analyses:
    MuscleAnalysis: start_time=0.23 end_time=0.77 step_interval=1 in_degrees=true muscle_list=all
        moment_arm_coordinate_list=(hip_flexion_r knee_angle_r ankle_angle_r hip_flexion_l knee_angle_l ankle_angle_l)
        compute_moments=true
