# OpenSim document version 40500
Model 2014014:
  gravity: 0 -9.81 0
  length_units: meters
  force_units: N
  Ground
  BodySet:
    Body pelvis: mass=14.38183 [kg] mass_center=(-0.08380811 0 0) inertia=(0.1460803 0.1460803 0.07877047 0 0 0)
        meshes=(r_pelvis.vtp l_pelvis.vtp sacrum.vtp)
    Body femur_l: mass=11.35868 mass_center=(0 -0.1866165 0) inertia=(0.2117621 0.08108928 0.2117621 0 0 0)
        meshes=l_femur.vtp
    Body femur_r: mass=11.35868 mass_center=(0 -0.1880598 0) inertia=(0.2091446 0.07053681 0.2091446 0 0 0)
        meshes=r_femur.vtp
    Body tibia_l: mass=4.527523 mass_center=(0 -0.2000649 0) inertia=(0.07096766 0.007737789 0.07096766 0 0 0)
        meshes=(l_tibia.vtp l_fibula.vtp)
    Body tibia_r: mass=4.527523 mass_center=(0 -0.2019225 0) inertia=(0.07223712 0.007773061 0.07223712 0 0 0)
        meshes=(r_tibia.vtp r_fibula.vtp)
    Body patella_l: mass=0.1052657 mass_center=(0.001975939 0.02898045 0)
        inertia=(4.223414e-6 1.929232e-5 1.929232e-5 0 0 0) meshes=l_patella.vtp
    Body patella_r: mass=0.1052657 mass_center=(0.001991222 0.02920459 0)
        inertia=(4.288997e-6 1.95919e-5 1.95919e-5 0 0 0) meshes=r_patella.vtp
    Body talus_l: mass=0.122118 mass_center=(0 0 0) inertia=(0.001458612 0.001487913 0.001487913 0 0 0)
        meshes=l_talus.vtp
    Body talus_r: mass=0.122118 mass_center=(0 0 0) inertia=(0.001475506 0.001499818 0.001499818 0 0 0)
        meshes=r_talus.vtp
    Body calcn_l: mass=1.526474 mass_center=(0.1038629 0.03438405 0)
        inertia=(0.002245841 0.005338436 0.005338436 0 0 0) meshes=l_foot.vtp
    Body calcn_r: mass=1.526474 mass_center=(0.1012045 0.03501134 0)
        inertia=(0.002328533 0.005166745 0.005166745 0 0 0) meshes=r_foot.vtp
    Body toes_l: mass=0.2645075 mass_center=(0.03593658 0.00687681 0.02005736)
        inertia=(0.0001604172 0.0002778109 0.0002778109 0 0 0) meshes=l_bofoot.vtp
    Body toes_r: mass=0.2645075 mass_center=(0.03501675 0.007002268 0.02042328)
        inertia=(0.0001663238 0.0002707781 0.0002707781 0 0 0) meshes=r_bofoot.vtp
    Body torso: mass=32.76009 mass_center=(-0.03783836 0.3417476 0) inertia=(2.347751 1.640384 2.347751 0 0 0)
        meshes=(hat_spine.vtp hat_jaw.vtp hat_skull.vtp hat_ribs_scap.vtp)
    Body humerus_r: mass=2.482047 mass_center=(0 -0.1986846 0) inertia=(0.02078949 0.006358586 0.02078949 0 0 0)
        meshes=humerus_rv.vtp
    Body ulna_r: mass=0.7418665 mass_center=(0 -0.1262998 0) inertia=(0.004096088 0.001076802 0.004096088 0 0 0)
        meshes=ulna_rv.vtp
    Body radius_r: mass=0.7418665 mass_center=(0 -0.1262998 0) inertia=(0.004096088 0.001076802 0.004096088 0 0 0)
        meshes=radius_rv.vtp
    Body hand_r: mass=0.5586896 mass_center=(0 -0.08401566 0) inertia=(0.001752468 0.001205405 0.001752468 0 0 0)
        meshes=(pisiform_rvs.vtp lunate_rvs.vtp scaphoid_rvs.vtp triquetrum_rvs.vtp hamate_rvs.vtp capitate_rvs.vtp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)
    Body humerus_l: mass=2.482047 mass_center=(0 -0.2018547 0) inertia=(0.02059646 0.004839661 0.02059646 0 0 0)
        meshes=humerus_lv.vtp
    Body ulna_l: mass=0.7418665 mass_center=(0 -0.1274894 0) inertia=(0.004122029 0.0009940173 0.004122029 0 0 0)
        meshes=ulna_lv.vtp
    Body radius_l: mass=0.7418665 mass_center=(0 -0.1274894 0) inertia=(0.004122029 0.0009940173 0.004122029 0 0 0)
        meshes=radius_lv.vtp
    Body hand_l: mass=0.5586896 mass_center=(0 -0.07349039 0) inertia=(0.001485715 0.001211969 0.001485715 0 0 0)
        meshes=(pisiform_lvs.vtp lunate_lvs.vtp scaphoid_lvs.vtp triquetrum_lvs.vtp hamate_lvs.vtp capitate_lvs.vtp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)
  JointSet:
    CustomJoint ground_pelvis: socket_parent_frame=ground_offset socket_child_frame=pelvis_offset
      Coordinate pelvis_tilt: range=(-1.570796 1.570796)
      Coordinate pelvis_list: range=(-1.570796 1.570796)
      Coordinate pelvis_rotation: range=(-1.570796 1.570796)
      Coordinate pelvis_tx: range=(-5 5)
      Coordinate pelvis_ty: default_value=0.94 range=(-3 3)
      Coordinate pelvis_tz: default_value=0 range=(-3 3)
      PhysicalOffsetFrame ground_offset: socket_parent=/ground translation=(0 0 0) [meters]
      PhysicalOffsetFrame pelvis_offset: socket_parent=/bodyset/pelvis translation=(0 0 0)
      SpatialTransform:
        TransformAxis rotation1: coordinates=pelvis_tilt axis=(0 0 1) LinearFunction(coefficients=1 0)
        TransformAxis rotation2: coordinates=pelvis_list axis=(1 0 0) LinearFunction(coefficients=1 0)
        TransformAxis rotation3: coordinates=pelvis_rotation axis=(0 1 0) LinearFunction(coefficients=1 0)
        TransformAxis translation1: coordinates=pelvis_tx axis=(1 0 0) LinearFunction(coefficients=1 0)
        TransformAxis translation2: coordinates=pelvis_ty axis=(0 1 0) LinearFunction(coefficients=1 0)
        TransformAxis translation3: coordinates=pelvis_tz axis=(0 0 1) LinearFunction(coefficients=1 0)
    CustomJoint hip_l: socket_parent_frame=pelvis_offset socket_child_frame=femur_l_offset
      Coordinate hip_flexion_l: default_value=0 range=(-0.5235988 2.094395)
      Coordinate hip_adduction_l: range=(-0.8726646 0.5235988)
      Coordinate hip_rotation_l: range=(-0.6981317 0.6981317)
      PhysicalOffsetFrame pelvis_offset: socket_parent=/bodyset/pelvis
          translation=(-0.06670983 -0.07376546 -0.08403532)
      PhysicalOffsetFrame femur_l_offset: socket_parent=/bodyset/femur_l translation=(0 0 0)
      SpatialTransform: axes_held_at_zero=(translation1 translation2 translation3)
        TransformAxis rotation1: coordinates=hip_flexion_l axis=(0 0 1) LinearFunction(coefficients=1 0)
        TransformAxis rotation2: coordinates=hip_adduction_l axis=(1 0 0) LinearFunction(coefficients=-1 0)
        TransformAxis rotation3: coordinates=hip_rotation_l axis=(0 1 0) LinearFunction(coefficients=-1 0)
    CustomJoint hip_r: socket_parent_frame=pelvis_offset socket_child_frame=femur_r_offset
      Coordinate hip_flexion_r: default_value=0 range=(-0.5235988 2.094395)
      Coordinate hip_adduction_r: range=(-0.8726646 0.5235988)
      Coordinate hip_rotation_r: range=(-0.6981317 0.6981317)
      PhysicalOffsetFrame pelvis_offset: socket_parent=/bodyset/pelvis translation=(-0.06670983 -0.07376546 0.08403532)
      PhysicalOffsetFrame femur_r_offset: socket_parent=/bodyset/femur_r translation=(0 0 0)
      SpatialTransform: axes_held_at_zero=(translation1 translation2 translation3)
        TransformAxis rotation1: coordinates=hip_flexion_r axis=(0 0 1) LinearFunction(coefficients=1 0)
        TransformAxis rotation2: coordinates=hip_adduction_r axis=(1 0 0) LinearFunction(coefficients=1 0)
        TransformAxis rotation3: coordinates=hip_rotation_r axis=(0 1 0) LinearFunction(coefficients=1 0)
    CustomJoint patellofemoral_l: socket_parent_frame=tibia_l_offset socket_child_frame=patella_l_offset
      Coordinate knee_angle_l_beta
      PhysicalOffsetFrame tibia_l_offset: socket_parent=/bodyset/femur_l
          translation=(-0.01112723 -0.4478357 0.003782432)
      PhysicalOffsetFrame patella_l_offset: socket_parent=/bodyset/patella_l translation=(0 0 0)
      SpatialTransform: axes_held_at_zero=(rotation2 rotation3)
        TransformAxis rotation1: coordinates=knee_angle_l_beta axis=(0 0 1)
          SimmSpline: x=(0 0.174533 0.349066 0.523599 0.698132 0.872665 1.0472 1.22173 1.39626 1.5708 1.74533 1.91986 2.0944)
              y=(0.00113686 -0.00629212 -0.105582 -0.253683 -0.414245 -0.579047 -0.747244 -0.91799 -1.09044 -1.26379 -1.43763 -1.61186 -1.78634)
        TransformAxis translation1: coordinates=knee_angle_l_beta axis=(1 0 0)
          MultiplierFunction: scale=1.37543
            SimmSpline: x=(0 0.174533 0.349066 0.523599 0.698132 0.872665 1.0472 1.22173 1.39626 1.5708 1.74533 1.91986 2.0944)
                y=(0.0524 0.0488 0.0437 0.0371 0.0296 0.0216 0.0136 0.0057 -0.0019 -0.0088 -0.0148 -0.0196 -0.0227)
        TransformAxis translation2: coordinates=knee_angle_l_beta axis=(0 1 0)
          MultiplierFunction: scale=1.097744
            SimmSpline: x=(0 0.174533 0.349066 0.523599 0.698132 0.872665 1.0472 1.22173 1.39626 1.5708 1.74533 1.91986 2.0944)
                y=(-0.0108 -0.019 -0.0263 -0.0322 -0.0367 -0.0395 -0.0408 -0.0404 -0.0384 -0.0349 -0.0301 -0.0245 -0.0187)
        TransformAxis translation3: axis=(0 0 1) MultiplierFunction(scale=1.37543, Constant(value=-0.00275))
    CustomJoint patellofemoral_r: socket_parent_frame=tibia_r_offset socket_child_frame=patella_r_offset
      Coordinate knee_angle_r_beta
      PhysicalOffsetFrame tibia_r_offset: socket_parent=/bodyset/femur_r
          translation=(-0.01037799 -0.4512994 -0.003527746)
      PhysicalOffsetFrame patella_r_offset: socket_parent=/bodyset/patella_r translation=(0 0 0)
      SpatialTransform: axes_held_at_zero=(rotation2 rotation3)
        TransformAxis rotation1: coordinates=knee_angle_r_beta axis=(0 0 1)
          SimmSpline: x=(0 0.174533 0.349066 0.523599 0.698132 0.872665 1.0472 1.22173 1.39626 1.5708 1.74533 1.91986 2.0944)
              y=(0.00113686 -0.00629212 -0.105582 -0.253683 -0.414245 -0.579047 -0.747244 -0.91799 -1.09044 -1.26379 -1.43763 -1.61186 -1.78634)
        TransformAxis translation1: coordinates=knee_angle_r_beta axis=(1 0 0)
          MultiplierFunction: scale=1.282817
            SimmSpline: x=(0 0.174533 0.349066 0.523599 0.698132 0.872665 1.0472 1.22173 1.39626 1.5708 1.74533 1.91986 2.0944)
                y=(0.0524 0.0488 0.0437 0.0371 0.0296 0.0216 0.0136 0.0057 -0.0019 -0.0088 -0.0148 -0.0196 -0.0227)
        TransformAxis translation2: coordinates=knee_angle_r_beta axis=(0 1 0)
          MultiplierFunction: scale=1.106234
            SimmSpline: x=(0 0.174533 0.349066 0.523599 0.698132 0.872665 1.0472 1.22173 1.39626 1.5708 1.74533 1.91986 2.0944)
                y=(-0.0108 -0.019 -0.0263 -0.0322 -0.0367 -0.0395 -0.0408 -0.0404 -0.0384 -0.0349 -0.0301 -0.0245 -0.0187)
        TransformAxis translation3: axis=(0 0 1) MultiplierFunction(scale=1.282817, Constant(value=0.00275))
    PinJoint knee_l: socket_parent_frame=femur_l_offset socket_child_frame=tibia_l_offset
      Coordinate knee_angle_l: default_value=0 range=(-2.094395 0)
      PhysicalOffsetFrame femur_l_offset: socket_parent=/bodyset/femur_l translation=(0 -0.4478357 0.003782432)
      PhysicalOffsetFrame tibia_l_offset: socket_parent=/bodyset/tibia_l translation=(0 0 0)
    PinJoint knee_r: socket_parent_frame=femur_r_offset socket_child_frame=tibia_r_offset
      Coordinate knee_angle_r: default_value=0 range=(-2.094395 0)
      PhysicalOffsetFrame femur_r_offset: socket_parent=/bodyset/femur_r translation=(0 -0.4512994 -0.003527746)
      PhysicalOffsetFrame tibia_r_offset: socket_parent=/bodyset/tibia_r translation=(0 0 0)
    PinJoint ankle_l: socket_parent_frame=tibia_l_offset socket_child_frame=talus_l_offset
      Coordinate ankle_angle_l: range=(-0.6981317 0.5235988)
      PhysicalOffsetFrame tibia_l_offset: socket_parent=/bodyset/tibia_l translation=(-0.01114637 -0.4286339 0)
          orientation=(-0.1758952 0.105208 0.01866219) [radians]
      PhysicalOffsetFrame talus_l_offset: socket_parent=/bodyset/talus_l translation=(0 0 0)
          orientation=(-0.1758952 0.105208 0.01866219)
    PinJoint ankle_r: socket_parent_frame=tibia_r_offset socket_child_frame=talus_r_offset
      Coordinate ankle_angle_r: range=(-0.6981317 0.5235988)
      PhysicalOffsetFrame tibia_r_offset: socket_parent=/bodyset/tibia_r translation=(-0.01117175 -0.4326138 0)
          orientation=(0.1758952 -0.105208 0.01866219)
      PhysicalOffsetFrame talus_r_offset: socket_parent=/bodyset/talus_r translation=(0 0 0)
          orientation=(0.1758952 -0.105208 0.01866219)
    PinJoint subtalar_l: socket_parent_frame=talus_l_offset socket_child_frame=calcn_l_offset
      Coordinate subtalar_angle_l: default_value=0 range=(-0.3490659 0.3490659) locked=true
      PhysicalOffsetFrame talus_l_offset: socket_parent=/bodyset/talus_l
          translation=(-0.05436087 -0.04495298 -0.008827928) orientation=(1.768191 -0.906223 1.819602)
      PhysicalOffsetFrame calcn_l_offset: socket_parent=/bodyset/calcn_l translation=(0 0 0)
          orientation=(1.768191 -0.906223 1.819602)
    PinJoint subtalar_r: socket_parent_frame=talus_r_offset socket_child_frame=calcn_r_offset
      Coordinate subtalar_angle_r: default_value=0 range=(-0.3490659 0.3490659) locked=true
      PhysicalOffsetFrame talus_r_offset: socket_parent=/bodyset/talus_r
          translation=(-0.05448462 -0.04537037 0.008848026) orientation=(-1.768191 0.906223 1.819602)
      PhysicalOffsetFrame calcn_r_offset: socket_parent=/bodyset/calcn_r translation=(0 0 0)
          orientation=(-1.768191 0.906223 1.819602)
    PinJoint mtp_l: socket_parent_frame=calcn_l_offset socket_child_frame=toes_l_offset
      Coordinate mtp_angle_l: default_value=0 range=(-1.0472 1.0472) locked=true
      PhysicalOffsetFrame calcn_l_offset: socket_parent=/bodyset/calcn_l
          translation=(0.1857069 -0.00229227 -0.001237826) orientation=(0 0.6199005 0)
      PhysicalOffsetFrame toes_l_offset: socket_parent=/bodyset/toes_l translation=(0 0 0) orientation=(0 0.6199005 0)
    PinJoint mtp_r: socket_parent_frame=calcn_r_offset socket_child_frame=toes_r_offset
      Coordinate mtp_angle_r: default_value=0 range=(-1.0472 1.0472) locked=true
      PhysicalOffsetFrame calcn_r_offset: socket_parent=/bodyset/calcn_r
          translation=(0.1809536 -0.002334089 0.001260408) orientation=(0 -0.6199005 0)
      PhysicalOffsetFrame toes_r_offset: socket_parent=/bodyset/toes_r translation=(0 0 0) orientation=(0 -0.6199005 0)
    CustomJoint lumbar: socket_parent_frame=pelvis_offset socket_child_frame=torso_offset
      Coordinate lumbar_ext: range=(-1.570796 1.570796)
      Coordinate lumbar_bend: range=(-1.570796 1.570796)
      Coordinate lumbar_rota: range=(-1.570796 1.570796)
      PhysicalOffsetFrame pelvis_offset: socket_parent=/bodyset/pelvis translation=(-0.1193703 0.07659428 0)
      PhysicalOffsetFrame torso_offset: socket_parent=/bodyset/torso translation=(0 0 0)
      SpatialTransform: axes_held_at_zero=(translation1 translation2 translation3)
        TransformAxis rotation1: coordinates=lumbar_ext axis=(0 0 1) LinearFunction(coefficients=1 0)
        TransformAxis rotation2: coordinates=lumbar_bend axis=(1 0 0) LinearFunction(coefficients=1 0)
        TransformAxis rotation3: coordinates=lumbar_rota axis=(0 1 0) LinearFunction(coefficients=1 0)
    CustomJoint shoulder_r: socket_parent_frame=torso_offset socket_child_frame=humerus_r_offset
      Coordinate shoulder_flexion_r: range=(-1.0472 3.1416)
      Coordinate shoulder_adduction_r: range=(-0.5236 0.1745)
      Coordinate shoulder_rotation_r: range=(-0.5236 0.5236)
      PhysicalOffsetFrame torso_offset: socket_parent=/bodyset/torso translation=(0.003979334 0.3967476 0.2396455)
      PhysicalOffsetFrame humerus_r_offset: socket_parent=/bodyset/humerus_r translation=(0 0 0)
      SpatialTransform: axes_held_at_zero=(translation1 translation2 translation3)
        TransformAxis rotation1: coordinates=shoulder_flexion_r axis=(0 0 1) LinearFunction(coefficients=1 0)
        TransformAxis rotation2: coordinates=shoulder_adduction_r axis=(1 0 0) LinearFunction(coefficients=1 0)
        TransformAxis rotation3: coordinates=shoulder_rotation_r axis=(0 1 0) LinearFunction(coefficients=1 0)
    PinJoint elbow_r: socket_parent_frame=humerus_r_offset socket_child_frame=ulna_r_offset
      Coordinate elbow_flexion_r: range=(0 2.618)
      PhysicalOffsetFrame humerus_r_offset: socket_parent=/bodyset/humerus_r
          translation=(0.01477464 -0.3457589 -0.01078535) orientation=(-0.02286271 0.2280177 0.005168901)
      PhysicalOffsetFrame ulna_r_offset: socket_parent=/bodyset/ulna_r translation=(0 0 0)
          orientation=(-0.02286271 0.2280177 0.005168901)
    WeldJoint radioulnar_r: socket_parent_frame=ulna_r_offset socket_child_frame=radius_r_offset
      PhysicalOffsetFrame ulna_r_offset: socket_parent=/bodyset/ulna_r
          translation=(-0.008035359 -0.01363021 0.03115598) orientation=(-1.568841 0.05642797 1.536144)
      PhysicalOffsetFrame radius_r_offset: socket_parent=/bodyset/radius_r translation=(0 0 0)
          orientation=(-1.568841 0.05642797 -0.0346525)
    WeldJoint wrist_r: socket_parent_frame=radius_r_offset socket_child_frame=hand_r_offset
      PhysicalOffsetFrame radius_r_offset: socket_parent=/bodyset/radius_r
          translation=(-0.01050796 -0.247141 0.01625706)
      PhysicalOffsetFrame hand_r_offset: socket_parent=/bodyset/hand_r translation=(0 0 0)
    CustomJoint shoulder_l: socket_parent_frame=torso_offset socket_child_frame=humerus_l_offset
      Coordinate shoulder_flexion_l: range=(-1.0472 3.1416)
      Coordinate shoulder_adduction_l: range=(-0.5236 0.1745)
      Coordinate shoulder_rotation_l: range=(-0.5236 0.5236)
      PhysicalOffsetFrame torso_offset: socket_parent=/bodyset/torso translation=(0.003979334 0.3967476 -0.2396455)
      PhysicalOffsetFrame humerus_l_offset: socket_parent=/bodyset/humerus_l translation=(0 0 0)
      SpatialTransform: axes_held_at_zero=(translation1 translation2 translation3)
        TransformAxis rotation1: coordinates=shoulder_flexion_l axis=(0 0 1) LinearFunction(coefficients=1 0)
        TransformAxis rotation2: coordinates=shoulder_adduction_l axis=(1 0 0) LinearFunction(coefficients=-1 0)
        TransformAxis rotation3: coordinates=shoulder_rotation_l axis=(0 1 0) LinearFunction(coefficients=-1 0)
    PinJoint elbow_l: socket_parent_frame=humerus_l_offset socket_child_frame=ulna_l_offset
      Coordinate elbow_flexion_l: range=(0 2.618)
      PhysicalOffsetFrame humerus_l_offset: socket_parent=/bodyset/humerus_l
          translation=(0.01288973 -0.3512756 0.009409389) orientation=(0.02286271 -0.2280177 0.005168901)
      PhysicalOffsetFrame ulna_l_offset: socket_parent=/bodyset/ulna_l translation=(0 0 0)
          orientation=(0.02286271 -0.2280177 0.005168901)
    WeldJoint radioulnar_l: socket_parent_frame=ulna_l_offset socket_child_frame=radius_l_offset
      PhysicalOffsetFrame ulna_l_offset: socket_parent=/bodyset/ulna_l
          translation=(-0.007720304 -0.01375859 -0.0299344) orientation=(1.568841 -0.05642797 1.536144)
      PhysicalOffsetFrame radius_l_offset: socket_parent=/bodyset/radius_l translation=(0 0 0)
          orientation=(1.568841 -0.05642797 -0.0346525)
    WeldJoint wrist_l: socket_parent_frame=radius_l_offset socket_child_frame=hand_l_offset
      PhysicalOffsetFrame radius_l_offset: socket_parent=/bodyset/radius_l
          translation=(-0.01009596 -0.2494687 -0.01561964)
      PhysicalOffsetFrame hand_l_offset: socket_parent=/bodyset/hand_l translation=(0 0 0)
  ConstraintSet:
    CoordinateCouplerConstraint patellofemoral_knee_angle_r_con: independent_coordinate_names=knee_angle_r
        dependent_coordinate_name=knee_angle_r_beta scale_factor=1
        coupled_coordinates_function=LinearFunction(coefficients=-1 0)
    CoordinateCouplerConstraint patellofemoral_knee_angle_l_con: independent_coordinate_names=knee_angle_l
        dependent_coordinate_name=knee_angle_l_beta scale_factor=1
        coupled_coordinates_function=LinearFunction(coefficients=-1 0)
  ForceSet:
    ExpressionBasedCoordinateForce PassiveToeMoment_r: coordinate=mtp_angle_r expression=-10.0*q-1.0*qdot
    ExpressionBasedCoordinateForce PassiveToeMoment_l: coordinate=mtp_angle_l expression=-10.0*q-1.0*qdot
    ExpressionBasedCoordinateForce PassiveHipDampingX_r: coordinate=hip_flexion_r
        expression=-2.44*exp(5.05*(q-1.81))+1.51*exp(-21.88*(q+0.47))-0.1*qdot
    ExpressionBasedCoordinateForce PassiveHipDampingY_r: coordinate=hip_adduction_r
        expression=-0.03*exp(14.94*(q-0.50))+0.03*exp(-14.94*(q+0.50))-0.1*qdot
    ExpressionBasedCoordinateForce PassiveHipDampingZ_r: coordinate=hip_rotation_r
        expression=-0.03*exp(14.94*(q-0.92))+0.03*exp(-14.94*(q+0.92))-0.1*qdot
    ExpressionBasedCoordinateForce PassiveHipDampingX_l: coordinate=hip_flexion_l
        expression=-2.44*exp(5.05*(q-1.81))+1.51*exp(-21.88*(q+0.47))-0.1*qdot
    ExpressionBasedCoordinateForce PassiveHipDampingY_l: coordinate=hip_adduction_l
        expression=-0.03*exp(14.94*(q-0.50))+0.03*exp(-14.94*(q+0.50))-0.1*qdot
    ExpressionBasedCoordinateForce PassiveHipDampingZ_l: coordinate=hip_rotation_l
        expression=-0.03*exp(14.94*(q-0.92))+0.03*exp(-14.94*(q+0.92))-0.1*qdot
    ExpressionBasedCoordinateForce PassiveKneeDamping_r: coordinate=knee_angle_r
        expression=-6.09*exp(33.94*(q-0.13))+11.03*exp(-11.33*(q+2.40))-0.1*qdot
    ExpressionBasedCoordinateForce PassiveKneeDamping_l: coordinate=knee_angle_l
        expression=-6.09*exp(33.94*(q-0.13))+11.03*exp(-11.33*(q+2.40))-0.1*qdot
    ExpressionBasedCoordinateForce PassiveAnkleDamping_r: coordinate=ankle_angle_r
        expression=-2.03*exp(38.11*(q-0.52))+0.18*exp(-42.12*(q+0.74))-0.1*qdot
    ExpressionBasedCoordinateForce PassiveAnkleDamping_l: coordinate=ankle_angle_l
        expression=-2.03*exp(38.11*(q-0.52))+0.18*exp(-42.12*(q+0.74))-0.1*qdot
    ExpressionBasedCoordinateForce PassiveSubtalarDamping_r: coordinate=subtalar_angle_r
        expression=-60.21*exp(16.32*(q-0.65))+60.21*exp(-16.32*(q+0.65))-0.1*qdot
    ExpressionBasedCoordinateForce PassiveSubtalarDamping_l: coordinate=subtalar_angle_l
        expression=-60.21*exp(16.32*(q-0.65))+60.21*exp(-16.32*(q+0.65))-0.1*qdot
    ExpressionBasedCoordinateForce PassiveLumbarDampingX: coordinate=lumbar_ext
        expression=-0.35*exp(30.72*(q-0.17))+0.25*exp(-20.36*(q+0.35))-0.1*qdot
    ExpressionBasedCoordinateForce PassiveLumbarDampingY: coordinate=lumbar_bend
        expression=-0.25*exp(20.36*(q-0.17))+0.25*exp(-20.36*(q+0.17))-0.1*qdot
    ExpressionBasedCoordinateForce PassiveLumbarDampingZ: coordinate=lumbar_rota
        expression=-0.25*exp(20.36*(q-0.17))+0.25*exp(-20.36*(q+0.17))-0.1*qdot
    ExpressionBasedCoordinateForce PassiveShoulderDampingX_r: coordinate=shoulder_flexion_r
        expression=-2.44*exp(5.05*(q-1.81))+1.51*exp(-11.88*(q+0.50))-1.0*qdot
    ExpressionBasedCoordinateForce PassiveShoulderDampingY_r: coordinate=shoulder_adduction_r
        expression=-15.03*exp(20.94*(q-0.10))+5.03*exp(-14.93*(q+1.57))-1.0*qdot
    ExpressionBasedCoordinateForce PassiveShoulderDampingZ_r: coordinate=shoulder_rotation_r
        expression=-0.43*exp(14.94*(q-0.15))+0.43*exp(-14.93*(q+0.15))-1.0*qdot
    ExpressionBasedCoordinateForce PassiveElbowDamping_r: coordinate=elbow_flexion_r
        expression=6.09*exp(-6.94*(q-0.30))-11.03*exp(11.33*(q-2.40))-1.0*qdot
    ExpressionBasedCoordinateForce PassiveShoulderDampingX_l: coordinate=shoulder_flexion_l
        expression=-2.44*exp(5.05*(q-1.81))+1.51*exp(-11.88*(q+0.50))-1.0*qdot
    ExpressionBasedCoordinateForce PassiveShoulderDampingY_l: coordinate=shoulder_adduction_l
        expression=-15.03*exp(20.94*(q-0.10))+5.03*exp(-14.93*(q+1.57))-1.0*qdot
    ExpressionBasedCoordinateForce PassiveShoulderDampingZ_l: coordinate=shoulder_rotation_l
        expression=-0.43*exp(14.94*(q-0.15))+0.43*exp(-14.93*(q+0.15))-1.0*qdot
    ExpressionBasedCoordinateForce PassiveElbowDamping_l: coordinate=elbow_flexion_l
        expression=6.09*exp(-6.94*(q-0.30))-11.03*exp(11.33*(q-2.40))-1.0*qdot
    DeGrooteFregly2016Muscle [values shared by the 84 below unless stated]: min_control=0.001 max_control=1
        max_contraction_velocity=20 default_activation=0.01 active_force_width_scale=1 fiber_damping=0.01
        passive_fiber_strain_at_one_norm_force=0.75 tendon_strain_at_one_norm_force=0.049
        ignore_passive_fiber_force=false
    DeGrooteFregly2016Muscle addbrev_r: max_isometric_force=681.137 optimal_fiber_length=0.1176241
        tendon_slack_length=0.04050101 pennation_angle_at_optimal=0.1148 [radians] activation_time_constant=0.016
        deactivation_time_constant=0.057
      PathPoint P1: pelvis (-0.02264123 -0.08834187 0.0167505)
      PathPoint P2: femur_r (-0.002565633 -0.1305357 0.03194214)
    DeGrooteFregly2016Muscle addlong_r: max_isometric_force=1019.762 optimal_fiber_length=0.1207801
        tendon_slack_length=0.147124 pennation_angle_at_optimal=0.1378 activation_time_constant=0.018
        deactivation_time_constant=0.062
      PathPoint P1: pelvis (-0.008985367 -0.08354886 0.02053568)
      PathPoint P2: femur_r (0.01444452 -0.2647993 0.02030699)
    DeGrooteFregly2016Muscle addmagMid_r: max_isometric_force=2548.644 optimal_fiber_length=0.1602281
        tendon_slack_length=0.05422387 pennation_angle_at_optimal=0.2073 activation_time_constant=0.05
        deactivation_time_constant=0.142
      PathPoint P1: pelvis (-0.06242341 -0.1134817 0.03104282)
      PathPoint P2: femur_r (0.003104416 -0.1796525 0.0374839)
    DeGrooteFregly2016Muscle bflh_r: max_isometric_force=1455.214 optimal_fiber_length=0.1459419
        tendon_slack_length=0.3642387 pennation_angle_at_optimal=0.1759182 activation_time_constant=0.027
        deactivation_time_constant=0.084 active_force_width_scale=1.5
      PathPoint P1: pelvis (-0.1232821 -0.111931 0.06373893)
      PathPoint P2: tibia_r (-0.0376488 -0.03785371 0.02826453)
      PathPoint P3: tibia_r (-0.03206292 -0.04920982 0.0338504)
    DeGrooteFregly2016Muscle bfsh_r: max_isometric_force=626.778 optimal_fiber_length=0.1359095
        tendon_slack_length=0.1167145 pennation_angle_at_optimal=0.2642 activation_time_constant=0.012
        deactivation_time_constant=0.048
      PathPoint P1: femur_r (0.006414084 -0.2335261 0.03001791)
      PathPoint P2: tibia_r (-0.0376488 -0.03785371 0.02826453)
      PathPoint P3: tibia_r (-0.03206292 -0.04920982 0.0338504)
    DeGrooteFregly2016Muscle edl_r: max_isometric_force=711.8067 optimal_fiber_length=0.07287627
        tendon_slack_length=0.3805761 pennation_angle_at_optimal=0.2183 activation_time_constant=0.009
        deactivation_time_constant=0.041 active_force_width_scale=1.5 passive_fiber_strain_at_one_norm_force=1.5
      PathPoint P1: tibia_r (-0.0178748 -0.1251335 0.02290209)
      PathPoint P2: tibia_r (0.01832167 -0.406657 0.01251236)
      PathPoint P3: calcn_r (0.09300692 0.04201361 0.0009336357)
      PathPoint P4: calcn_r (0.1635464 0.006418746 0.01517158)
      PathPoint P5: toes_r (0.0003036134 0.00548511 0.01785578)
      PathPoint P6: toes_r (0.04483358 -0.0004668179 0.02917612)
    DeGrooteFregly2016Muscle ehl_r: max_isometric_force=338.6588 optimal_fiber_length=0.07841568
        tendon_slack_length=0.3413389 pennation_angle_at_optimal=0.1972681 activation_time_constant=0.01
        deactivation_time_constant=0.043 active_force_width_scale=1.5 passive_fiber_strain_at_one_norm_force=1.5
      PathPoint P1: tibia_r (-0.01564045 -0.1676379 0.02111461)
      PathPoint P2: tibia_r (0.007931942 -0.3146184 0.01832167)
      PathPoint P3: tibia_r (0.0223435 -0.3994107 -0.00312809)
      PathPoint P4: calcn_r (0.09816834 0.04539804 -0.02462464)
      PathPoint P5: calcn_r (0.1308574 0.03606168 -0.02999305)
      PathPoint P6: calcn_r (0.1754886 0.01622192 -0.03267725)
      PathPoint P7: toes_r (0.03015893 0.004784883 -0.02859259)
      PathPoint P8: toes_r (0.05697812 0.003967952 -0.02170703)
    DeGrooteFregly2016Muscle ercspn_r: max_isometric_force=2995.782 optimal_fiber_length=0.1489657
        tendon_slack_length=0.03107769 pennation_angle_at_optimal=0 activation_time_constant=0.051
        deactivation_time_constant=0.146
      PathPoint P1: pelvis (-0.1659567 0.04125753 0.0474235)
      PathPoint P2: torso (-0.06937033 0.1174757 0.03397328)
    DeGrooteFregly2016Muscle extobl_r: max_isometric_force=1048.795 optimal_fiber_length=0.1278294
        tendon_slack_length=0.1491343 pennation_angle_at_optimal=0 activation_time_constant=0.014
        deactivation_time_constant=0.053
      PathPoint P1: pelvis (-0.03556214 -0.05977174 0.01087695)
      PathPoint P2: torso (0.08198312 0.1174757 0.1550648)
    DeGrooteFregly2016Muscle fdb_r: max_isometric_force=1145.11 optimal_fiber_length=0.03040356
        tendon_slack_length=0.1721512 pennation_angle_at_optimal=0 activation_time_constant=0.007
        deactivation_time_constant=0.036
      PathPoint P1: calcn_r (0.02155655 0.006302041 0)
      PathPoint P2: calcn_r (0.167797 -0.009453062 0.01353772)
      PathPoint P3: toes_r (-0.001922885 -0.009102948 0.01715556)
      PathPoint P4: toes_r (0.02884328 -0.008286017 0.02509146)
      PathPoint P5: toes_r (0.04463118 -0.007002268 0.02824248)
    DeGrooteFregly2016Muscle fdl_r: max_isometric_force=497.3491 optimal_fiber_length=0.04708814
        tendon_slack_length=0.3883187 pennation_angle_at_optimal=0.2248 activation_time_constant=0.007
        deactivation_time_constant=0.035 active_force_width_scale=1.5 passive_fiber_strain_at_one_norm_force=1.5
      PathPoint P1: tibia_r (-0.002569502 -0.1981371 -0.002010915)
      PathPoint P2: tibia_r (-0.01966228 -0.3942193 -0.01385297)
      PathPoint P3: calcn_r (0.04412515 0.03676191 -0.03267725)
      PathPoint P4: calcn_r (0.07165277 0.02053999 -0.03069327)
      PathPoint P5: calcn_r (0.167797 -0.009453062 0.01353772)
      PathPoint P6: toes_r (-0.001922885 -0.009102948 0.01715556)
      PathPoint P7: toes_r (0.02884328 -0.008286017 0.02509146)
      PathPoint P8: toes_r (0.04463118 -0.007002268 0.02824248)
    DeGrooteFregly2016Muscle fhl_r: max_isometric_force=1077.154 optimal_fiber_length=0.05514631
        tendon_slack_length=0.3602823 pennation_angle_at_optimal=0.258 activation_time_constant=0.01
        deactivation_time_constant=0.042 active_force_width_scale=1.5 passive_fiber_strain_at_one_norm_force=1.5
      PathPoint P1: tibia_r (-0.03463242 -0.2339359 0.0223435)
      PathPoint P2: tibia_r (-0.02703563 -0.3970313 -0.00849053)
      PathPoint P3: calcn_r (0.03785048 0.03221043 -0.02812578)
      PathPoint P4: calcn_r (0.1050502 0.007935904 -0.02987634)
      PathPoint P5: calcn_r (0.1746789 -0.006185337 -0.0313935)
      PathPoint P6: toes_r (0.01568669 -0.007469086 -0.03092668)
      PathPoint P7: toes_r (0.05687692 -0.01190386 -0.02112351)
    DeGrooteFregly2016Muscle gaslat_r: max_isometric_force=1799.281 optimal_fiber_length=0.07215181
        tendon_slack_length=0.4086791 pennation_angle_at_optimal=0.2102 activation_time_constant=0.016
        deactivation_time_constant=0.058 active_force_width_scale=1.5
      PathPoint P1: femur_r (-0.00384845 -0.4219178 0.03553402)
      ConditionalPathPoint P2: femur_r (-0.03463605 -0.4413875 0.03335323)
          socket_coordinate=/jointset/knee_r/knee_angle_r range=(-0.8727 0) [radians]
      ConditionalPathPoint P3: tibia_r (-0.03239807 -0.04434292 0.0312809)
          socket_coordinate=/jointset/knee_r/knee_angle_r range=(-1.5708 0)
      PathPoint P4: calcn_r (0.004452997 0.03617838 -0.006185337)
    DeGrooteFregly2016Muscle gasmed_r: max_isometric_force=3553.342 optimal_fiber_length=0.05780329
        tendon_slack_length=0.4340146 pennation_angle_at_optimal=0.1656816 activation_time_constant=0.023
        deactivation_time_constant=0.074 active_force_width_scale=1.5
      PathPoint P1: femur_r (0.01026253 -0.4190416 -0.02668259)
      ConditionalPathPoint P2: femur_r (-0.02950478 -0.4369626 -0.02437352)
          socket_coordinate=/jointset/knee_r/knee_angle_r range=(-0.8727 0)
      ConditionalPathPoint P3: tibia_r (-0.0357496 -0.04758752 -0.01675762)
          socket_coordinate=/jointset/knee_r/knee_angle_r range=(-1.5708 0)
      PathPoint P4: calcn_r (0.004452997 0.03617838 -0.006185337)
    DeGrooteFregly2016Muscle glmax2_r: max_isometric_force=3884.662 optimal_fiber_length=0.2244277
        tendon_slack_length=0.072427 pennation_angle_at_optimal=0.3673821 activation_time_constant=0.103
        deactivation_time_constant=0.274
      PathPoint P1: pelvis (-0.1561178 0.008176322 0.05025151)
      PathPoint P2: pelvis (-0.1593184 -0.05723426 0.08842961)
      PathPoint P3: femur_r (-0.05772675 -0.06460409 0.03232698)
      PathPoint P4: femur_r (-0.02001194 -0.1123934 0.05375002)
    DeGrooteFregly2016Muscle glmed2_r: max_isometric_force=3307.342 optimal_fiber_length=0.07477302
        tendon_slack_length=0.06678357 pennation_angle_at_optimal=0.3165559 activation_time_constant=0.055
        deactivation_time_constant=0.156
      PathPoint P1: pelvis (-0.1007594 0.02969791 0.07341942)
      PathPoint P2: femur_r (-0.03309667 -0.00641616 0.06760444)
    DeGrooteFregly2016Muscle glmin2_r: max_isometric_force=1426.138 optimal_fiber_length=0.05927309
        tendon_slack_length=0.02762549 pennation_angle_at_optimal=0 activation_time_constant=0.014
        deactivation_time_constant=0.054
      PathPoint P1: pelvis (-0.07302093 -0.01334526 0.1056152)
      PathPoint P2: femur_r (-0.01231504 -0.01150484 0.07183774)
    DeGrooteFregly2016Muscle grac_r: max_isometric_force=310.7967 optimal_fiber_length=0.2962999
        tendon_slack_length=0.1930439 pennation_angle_at_optimal=0.172 activation_time_constant=0.016
        deactivation_time_constant=0.057
      PathPoint P1: pelvis (-0.05614077 -0.1215359 0.02671379)
      PathPoint P2: tibia_r (-0.02057836 -0.05142697 -0.03307955)
      PathPoint P3: tibia_r (0.001988571 -0.07529644 -0.01757316)
    DeGrooteFregly2016Muscle iliacus_r: max_isometric_force=1194.63 optimal_fiber_length=0.1214774
        tendon_slack_length=0.1019561 pennation_angle_at_optimal=0.2799 activation_time_constant=0.021
        deactivation_time_constant=0.07
      PathPoint P1: pelvis (-0.07171698 0.02904004 0.09169269)
      PathPoint P2: pelvis (-0.01600296 -0.05234726 0.08222975)
      ConditionalPathPoint P3: pelvis (-0.04267457 -0.08928168 0.09027869)
          socket_coordinate=/jointset/hip_r/hip_flexion_r range=(-1.5708 0)
      PathPoint P4: femur_r (-0.002950478 -0.06250224 0.01783115)
      PathPoint P5: femur_r (-0.01565036 -0.07046713 0.02514321)
    DeGrooteFregly2016Muscle intobl_r: max_isometric_force=1057.568 optimal_fiber_length=0.1056409
        tendon_slack_length=0.1056409 pennation_angle_at_optimal=0 activation_time_constant=0.013
        deactivation_time_constant=0.049
      PathPoint P1: pelvis (-0.04741619 0.0657865 0.1258463)
      PathPoint P2: torso (0.08828951 0.1708738 0.02114519)
    DeGrooteFregly2016Muscle obtext_r: max_isometric_force=113.8715 optimal_fiber_length=0.05846207
        tendon_slack_length=0.04776779 pennation_angle_at_optimal=0.1222 activation_time_constant=0.006
        deactivation_time_constant=0.032
      PathPoint P1: pelvis (-0.1007594 -0.1081718 0.04024472)
      PathPoint P2: femur_r (-0.04489859 -0.0353995 0.05259549)
    DeGrooteFregly2016Muscle pect_r: max_isometric_force=291.5799 optimal_fiber_length=0.09059656
        tendon_slack_length=0.03737108 pennation_angle_at_optimal=0 activation_time_constant=0.008
        deactivation_time_constant=0.037
      PathPoint P1: pelvis (-0.05109094 -0.07217719 0.04905505)
      PathPoint P2: femur_r (-0.01565036 -0.09093247 0.03245526)
    DeGrooteFregly2016Muscle perbrev_r: max_isometric_force=611.4927 optimal_fiber_length=0.04801754
        tendon_slack_length=0.1560041 pennation_angle_at_optimal=0.2052 activation_time_constant=0.008
        deactivation_time_constant=0.038
      PathPoint P1: tibia_r (-0.02714735 -0.2738445 0.02804109)
      PathPoint P2: tibia_r (-0.03787223 -0.4210414 0.02781766)
      PathPoint P3: tibia_r (-0.03183949 -0.4330464 0.02848796)
      PathPoint P4: calcn_r (0.04766731 0.03151021 0.02719214)
      PathPoint P5: calcn_r (0.06851543 0.02555828 0.04002963)
    DeGrooteFregly2016Muscle perlong_r: max_isometric_force=1291.363 optimal_fiber_length=0.05444876
        tendon_slack_length=0.3560606 pennation_angle_at_optimal=0.248 activation_time_constant=0.016
        deactivation_time_constant=0.058
      PathPoint P1: tibia_r (-0.0223435 -0.1484947 0.03150433)
      PathPoint P2: tibia_r (-0.03541445 -0.4217985 0.02647705)
      PathPoint P3: tibia_r (-0.03038716 -0.434128 0.0268122)
      PathPoint P4: calcn_r (0.04432756 0.02684203 0.02579169)
      PathPoint P5: calcn_r (0.06892025 0.01237067 0.03314407)
      PathPoint P6: calcn_r (0.08622622 0.008052608 0.01377113)
      PathPoint P7: calcn_r (0.121749 0.00991988 -0.02147362)
    DeGrooteFregly2016Muscle pertert_r: max_isometric_force=207.5756 optimal_fiber_length=0.0763203
        tendon_slack_length=0.08611599 pennation_angle_at_optimal=0.2269 activation_time_constant=0.007
        deactivation_time_constant=0.034
      PathPoint per_tert_r-P1: tibia_r (0.001117175 -0.3032623 0.02580674)
      PathPoint per_tert_r-P2: tibia_r (0.02558331 -0.4238534 0.02893483)
      PathPoint per_tert_r-P3: calcn_r (0.08673224 0.02660862 0.03489463)
    DeGrooteFregly2016Muscle piri_r: max_isometric_force=1166.599 optimal_fiber_length=0.02849617
        tendon_slack_length=0.1259312 pennation_angle_at_optimal=0.1745 activation_time_constant=0.012
        deactivation_time_constant=0.046
      PathPoint P1: pelvis (-0.120686 -0.006136941 0.01469476)
      PathPoint P2: pelvis (-0.120935 -0.02881449 0.06626238)
      PathPoint P3: pelvis (-0.1102426 -0.0526292 0.09898025)
      PathPoint P4: femur_r (-0.01898569 -0.003982444 0.05605909)
    DeGrooteFregly2016Muscle popli_r: max_isometric_force=374.964 optimal_fiber_length=0.04669284
        tendon_slack_length=0.07971949 pennation_angle_at_optimal=0 activation_time_constant=0.009
        deactivation_time_constant=0.04
      PathPoint P1: femur_r (-0.01282817 -0.4314314 0.04489859)
      ConditionalPathPoint P2: femur_r (-0.02437352 -0.4347501 0.02950478)
          socket_coordinate=/jointset/knee_r/knee_angle_r range=(-0.9599 0)
      PathPoint P3: tibia_r (-0.03463242 -0.03785371 -0.01117175)
      PathPoint P4: tibia_r (-0.01117175 -0.07029975 -0.01675762)
    DeGrooteFregly2016Muscle psoas_r: max_isometric_force=1689.479 optimal_fiber_length=0.2742878
        tendon_slack_length=0.1043258 pennation_angle_at_optimal=0.2155251 activation_time_constant=0.049
        deactivation_time_constant=0.139
      PathPoint P1: torso (-0.01387407 0.1014563 0.03524199)
      PathPoint P2: pelvis (-0.07183552 0.05826804 0.04242011)
      PathPoint P3: pelvis (-0.0243008 -0.06146339 0.0713528)
      ConditionalPathPoint P4: pelvis (-0.03674754 -0.08928168 0.08048943)
          socket_coordinate=/jointset/hip_r/hip_flexion_r range=(-1.5708 0.5585)
      PathPoint P5: femur_r (-0.01693318 -0.05166115 0.005900957)
      PathPoint P6: femur_r (-0.03014619 -0.05796668 0.01128879)
    DeGrooteFregly2016Muscle quadfem_r: max_isometric_force=398.0457 optimal_fiber_length=0.06416282
        tendon_slack_length=0.02851681 pennation_angle_at_optimal=0 activation_time_constant=0.011
        deactivation_time_constant=0.045
      PathPoint quad_fem_r-P1: pelvis (-0.1354918 -0.1081718 0.05656014)
      PathPoint quad_fem_r-P2: femur_r (-0.04887532 -0.03971382 0.04695109)
    DeGrooteFregly2016Muscle recabd_r: max_isometric_force=801.0939 optimal_fiber_length=0.3653314
        tendon_slack_length=0.01733361 pennation_angle_at_optimal=0 activation_time_constant=0.029
        deactivation_time_constant=0.091
      PathPoint rectabd_r-P1: pelvis (-0.03082052 -0.0657865 0.01196465)
      PathPoint rectabd_r-P2: torso (0.1160376 0.2370682 0.04370007)
    DeGrooteFregly2016Muscle recfem_r: max_isometric_force=2482.044 optimal_fiber_length=0.08320903
        tendon_slack_length=0.4684482 pennation_angle_at_optimal=0.217 activation_time_constant=0.016
        deactivation_time_constant=0.057 active_force_width_scale=1.5 passive_fiber_strain_at_one_norm_force=1.5
      PathPoint P1: pelvis (-0.02844971 -0.03646452 0.1014819)
      ConditionalPathPoint P2: femur_r (0.05131267 -0.4424938 0.002565633)
          socket_coordinate=/jointset/knee_r/knee_angle_r range=(-3.1416 -1.309)
      PathPoint P3: patella_r (0.01106234 0.05420549 0.0007743641)
      PathPoint P4: patella_r (0.01338544 0.04834244 -0.001106234)
      PathPoint P5: patella_r (0.005531172 0.002732399 3.318703e-5)
      PathPoint P6: tibia_r (0.0364199 -0.06826646 -0.0005250722)
    DeGrooteFregly2016Muscle sart_r: max_isometric_force=283.5664 optimal_fiber_length=0.439286
        tendon_slack_length=0.1351649 pennation_angle_at_optimal=0.0261 activation_time_constant=0.017
        deactivation_time_constant=0.059
      PathPoint P1: pelvis (-0.02311539 -0.01466099 0.1148606)
      PathPoint P2: femur_r (-0.00384845 -0.3947044 -0.05400658)
      PathPoint P3: tibia_r (-0.02804109 -0.04336954 -0.04077689)
      PathPoint P4: tibia_r (-0.01776308 -0.06478392 -0.02949342)
      PathPoint P5: tibia_r (0.01519358 -0.0876043 -0.002904655)
    DeGrooteFregly2016Muscle semimem_r: max_isometric_force=2443.2 optimal_fiber_length=0.1103763
        tendon_slack_length=0.3887214 pennation_angle_at_optimal=0.2546 activation_time_constant=0.035
        deactivation_time_constant=0.106 active_force_width_scale=1.5
      PathPoint P1: pelvis (-0.1169994 -0.107138 0.06678448)
      PathPoint P2: tibia_r (-0.03239807 -0.04509999 -0.02189663)
    DeGrooteFregly2016Muscle semiten_r: max_isometric_force=654.6363 optimal_fiber_length=0.2907067
        tendon_slack_length=0.2770343 pennation_angle_at_optimal=0.2413 activation_time_constant=0.019
        deactivation_time_constant=0.065 active_force_width_scale=1.5
      PathPoint P1: pelvis (-0.123045 -0.1177578 0.05601629)
      PathPoint P2: tibia_r (-0.03485586 -0.05494196 -0.02558331)
      PathPoint P3: tibia_r (0.002122632 -0.08360262 -0.01307095)
    DeGrooteFregly2016Muscle soleus_r: max_isometric_force=7156.317 optimal_fiber_length=0.05920125
        tendon_slack_length=0.297403 pennation_angle_at_optimal=0.3814289 activation_time_constant=0.074
        deactivation_time_constant=0.202
      PathPoint P1: tibia_r (-0.00849053 -0.09906856 0.01094831)
      PathPoint P2: calcn_r (0.004452997 0.03617838 -0.006185337)
    DeGrooteFregly2016Muscle tfl_r: max_isometric_force=473.038 optimal_fiber_length=0.102463
        tendon_slack_length=0.4848117 pennation_angle_at_optimal=0.0524 activation_time_constant=0.01
        deactivation_time_constant=0.043
      PathPoint P1: pelvis (-0.03686609 0.02011187 0.134983)
      PathPoint P2: femur_r (0.03771481 -0.1100703 0.07658416)
      PathPoint P3: femur_r (0.01372614 -0.4480249 0.04156326)
      PathPoint P4: tibia_r (0.01206549 -0.04434292 0.03865425)
    DeGrooteFregly2016Muscle tibant_r: max_isometric_force=1433.418 optimal_fiber_length=0.07257552
        tendon_slack_length=0.2523673 pennation_angle_at_optimal=0.1951828 activation_time_constant=0.023
        deactivation_time_constant=0.074
      PathPoint P1: tibia_r (0.01720449 -0.1418973 0.01809823)
      PathPoint P2: tibia_r (0.02804109 -0.2061405 0.01429984)
      PathPoint P3: tibia_r (0.02603018 -0.3957335 -0.01474671)
      PathPoint P4: calcn_r (0.1180044 0.02077339 -0.03559486)
    DeGrooteFregly2016Muscle tibpost_r: max_isometric_force=2007.386 optimal_fiber_length=0.04043939
        tendon_slack_length=0.2943089 pennation_angle_at_optimal=0.2265 activation_time_constant=0.019
        deactivation_time_constant=0.066
      PathPoint P1: tibia_r (-0.004580417 -0.1410321 0.0115069)
      PathPoint P2: tibia_r (-0.01832167 -0.3953009 -0.01955056)
      PathPoint P3: calcn_r (0.04220227 0.03897929 -0.03337748)
      PathPoint P4: calcn_r (0.07812986 0.01855601 -0.03279395)
    DeGrooteFregly2016Muscle tricox_r: max_isometric_force=602.0712 optimal_fiber_length=0.06640077
        tendon_slack_length=0.06756569 pennation_angle_at_optimal=0 activation_time_constant=0.01
        deactivation_time_constant=0.042
      PathPoint P1: pelvis (-0.1315799 -0.09586033 0.04024472)
      PathPoint P2: pelvis (-0.1564734 -0.07988361 0.06852479)
      PathPoint P3: femur_r (-0.018216 -0.003650574 0.05682878)
    DeGrooteFregly2016Muscle vasint_r: max_isometric_force=1888.746 optimal_fiber_length=0.1326135
        tendon_slack_length=0.225521 pennation_angle_at_optimal=0.06309973 activation_time_constant=0.026
        deactivation_time_constant=0.082
      PathPoint P1: femur_r (0.03720168 -0.2128395 0.03976732)
      PathPoint P2: femur_r (0.04297436 -0.2305393 0.03656028)
      ConditionalPathPoint P3: femur_r (0.04746422 -0.4413875 0.00384845)
          socket_coordinate=/jointset/knee_r/knee_angle_r range=(-3.1416 -1.309)
      PathPoint P4: patella_r (0.00641616 0.05309925 -0.0006637406)
      PathPoint P5: patella_r (0.005531172 0.002732399 -0.0004314314)
      PathPoint P6: tibia_r (0.03638639 -0.06835298 0.0004803852)
    DeGrooteFregly2016Muscle vaslat_r: max_isometric_force=5693.582 optimal_fiber_length=0.1305614
        tendon_slack_length=0.2476512 pennation_angle_at_optimal=0.2529 activation_time_constant=0.047
        deactivation_time_constant=0.135
      PathPoint P1: femur_r (0.00615752 -0.2050959 0.0447703)
      PathPoint P2: femur_r (0.03450777 -0.2866253 0.0524672)
      ConditionalPathPoint P3: femur_r (0.04361577 -0.4557686 0.02180788)
          socket_coordinate=/jointset/knee_r/knee_angle_r range=(-3.1416 -1.309)
      PathPoint P4: patella_r (0.01139421 0.04679372 0.01559791)
      PathPoint P5: patella_r (0.005531172 0.002732399 0.008108698)
      PathPoint P6: tibia_r (0.03635287 -0.06854766 0.005708764)
    DeGrooteFregly2016Muscle vasmed_r: max_isometric_force=3048.274 optimal_fiber_length=0.1326108
        tendon_slack_length=0.2237037 pennation_angle_at_optimal=0.4222 activation_time_constant=0.035
        deactivation_time_constant=0.105
      PathPoint P1: femur_r (0.01795943 -0.2321986 0.02411695)
      PathPoint P2: femur_r (0.04566828 -0.3063163 0.001154535)
      ConditionalPathPoint P3: femur_r (0.04489859 -0.4535561 -0.01924225)
          socket_coordinate=/jointset/knee_r/knee_angle_r range=(-3.1416 -1.309)
      PathPoint P4: patella_r (0.006969277 0.04922743 -0.01880598)
      PathPoint P5: patella_r (0.005531172 0.002732399 -0.009402992)
      PathPoint P6: tibia_r (0.03563788 -0.06875315 -0.007574446)
    DeGrooteFregly2016Muscle addbrev_l: max_isometric_force=677.8323 optimal_fiber_length=0.1181975
        tendon_slack_length=0.04069847 pennation_angle_at_optimal=0.1148 activation_time_constant=0.016
        deactivation_time_constant=0.057
      PathPoint P1: pelvis (-0.02264123 -0.08834187 -0.0167505)
      PathPoint P2: femur_l (-0.00275086 -0.1295338 -0.0342482)
    DeGrooteFregly2016Muscle addlong_l: max_isometric_force=1025.842 optimal_fiber_length=0.1200643
        tendon_slack_length=0.146252 pennation_angle_at_optimal=0.1378 activation_time_constant=0.018
        deactivation_time_constant=0.062
      PathPoint P1: pelvis (-0.008985367 -0.08354886 -0.02053568)
      PathPoint P2: femur_l (0.01548734 -0.262767 -0.02177305)
    DeGrooteFregly2016Muscle addmagMid_l: max_isometric_force=2543.495 optimal_fiber_length=0.1605524
        tendon_slack_length=0.05433363 pennation_angle_at_optimal=0.2073 activation_time_constant=0.05
        deactivation_time_constant=0.142
      PathPoint P1: pelvis (-0.06242341 -0.1134817 -0.03104282)
      PathPoint P2: femur_l (0.00332854 -0.1782737 -0.04019006)
    DeGrooteFregly2016Muscle bflh_l: max_isometric_force=1467.5 optimal_fiber_length=0.14472
        tendon_slack_length=0.3611892 pennation_angle_at_optimal=0.1759182 activation_time_constant=0.021
        deactivation_time_constant=0.07 active_force_width_scale=1.5
      PathPoint P1: pelvis (-0.1232821 -0.111931 -0.06373893)
      PathPoint P2: tibia_l (-0.03756328 -0.03750547 -0.02820033)
      PathPoint P3: tibia_l (-0.03199009 -0.04875711 -0.03377351)
    DeGrooteFregly2016Muscle bfsh_l: max_isometric_force=631.3005 optimal_fiber_length=0.1349359
        tendon_slack_length=0.1158784 pennation_angle_at_optimal=0.2642232 activation_time_constant=0.011
        deactivation_time_constant=0.046
      PathPoint P1: femur_l (0.006877149 -0.2317338 -0.03218506)
      PathPoint P2: tibia_l (-0.03756328 -0.03750547 -0.02820033)
      PathPoint P3: tibia_l (-0.03199009 -0.04875711 -0.03377351)
    DeGrooteFregly2016Muscle edl_l: max_isometric_force=709.9775 optimal_fiber_length=0.07306402
        tendon_slack_length=0.3815566 pennation_angle_at_optimal=0.2183 activation_time_constant=0.009
        deactivation_time_constant=0.041 active_force_width_scale=1.5 passive_fiber_strain_at_one_norm_force=1.5
      PathPoint P1: tibia_l (-0.0178342 -0.1239824 -0.02285007)
      PathPoint P2: tibia_l (0.01828005 -0.4029159 -0.01248394)
      PathPoint P3: calcn_l (0.09545004 0.04126086 -0.000916908)
      PathPoint P4: calcn_l (0.1678425 0.006303742 -0.01489975)
      PathPoint P5: toes_l (0.0003115888 0.005386834 -0.01753586)
      PathPoint P6: toes_l (0.04601128 -0.000458454 -0.02865337)
    DeGrooteFregly2016Muscle ehl_l: max_isometric_force=337.2242 optimal_fiber_length=0.07874926
        tendon_slack_length=0.3427909 pennation_angle_at_optimal=0.1972681 activation_time_constant=0.01
        deactivation_time_constant=0.043 active_force_width_scale=1.5 passive_fiber_strain_at_one_norm_force=1.5
      PathPoint P1: tibia_l (-0.01560492 -0.1660956 -0.02106665)
      PathPoint P2: tibia_l (0.007913926 -0.311724 -0.01828005)
      PathPoint P3: tibia_l (0.02229275 -0.3957363 0.003120985)
      PathPoint P4: calcn_l (0.100747 0.04458465 0.02418345)
      PathPoint P5: calcn_l (0.1342948 0.03541557 0.02945567)
      PathPoint P6: calcn_l (0.1800983 0.01593128 0.03209178)
      PathPoint P7: toes_l (0.03095115 0.004699153 0.02808031)
      PathPoint P8: toes_l (0.05847483 0.003896859 0.02131811)
    DeGrooteFregly2016Muscle ercspn_l: max_isometric_force=2995.782 optimal_fiber_length=0.1489657
        tendon_slack_length=0.03107769 pennation_angle_at_optimal=0 activation_time_constant=0.044
        deactivation_time_constant=0.127
      PathPoint P1: pelvis (-0.1659567 0.04125753 -0.0474235)
      PathPoint P2: torso (-0.06937033 0.1174757 -0.03397328)
    DeGrooteFregly2016Muscle extobl_l: max_isometric_force=1048.795 optimal_fiber_length=0.1278294
        tendon_slack_length=0.1491343 pennation_angle_at_optimal=0 activation_time_constant=0.014
        deactivation_time_constant=0.053
      PathPoint P1: pelvis (-0.03556214 -0.05977174 -0.01087695)
      PathPoint P2: torso (0.08198312 0.1174757 -0.1550648)
    DeGrooteFregly2016Muscle fdb_l: max_isometric_force=1117.585 optimal_fiber_length=0.03115236
        tendon_slack_length=0.1763911 pennation_angle_at_optimal=0 activation_time_constant=0.007
        deactivation_time_constant=0.036
      PathPoint P1: calcn_l (0.02212281 0.006189129 0)
      PathPoint P2: calcn_l (0.1722047 -0.009283693 -0.01329517)
      PathPoint P3: toes_l (-0.001973396 -0.008939853 -0.01684818)
      PathPoint P4: toes_l (0.02960094 -0.008137558 -0.0246419)
      PathPoint P5: toes_l (0.04580355 -0.00687681 -0.02773647)
    DeGrooteFregly2016Muscle fdl_l: max_isometric_force=495.6209 optimal_fiber_length=0.04725233
        tendon_slack_length=0.3896728 pennation_angle_at_optimal=0.2248 activation_time_constant=0.007
        deactivation_time_constant=0.035 active_force_width_scale=1.5 passive_fiber_strain_at_one_norm_force=1.5
      PathPoint P1: tibia_l (-0.002563666 -0.1963143 0.002006347)
      PathPoint P2: tibia_l (-0.01961762 -0.3905926 0.0138215)
      PathPoint P3: calcn_l (0.04528424 0.03610325 0.03209178)
      PathPoint P4: calcn_l (0.07353496 0.02017198 0.03014335)
      PathPoint P5: calcn_l (0.1722047 -0.009283693 -0.01329517)
      PathPoint P6: toes_l (-0.001973396 -0.008939853 -0.01684818)
      PathPoint P7: toes_l (0.02960094 -0.008137558 -0.0246419)
      PathPoint P8: toes_l (0.04580355 -0.00687681 -0.02773647)
    DeGrooteFregly2016Muscle fhl_l: max_isometric_force=1069.416 optimal_fiber_length=0.05554531
        tendon_slack_length=0.362889 pennation_angle_at_optimal=0.258 activation_time_constant=0.01
        deactivation_time_constant=0.042 active_force_width_scale=1.5 passive_fiber_strain_at_one_norm_force=1.5
      PathPoint P1: tibia_l (-0.03455376 -0.2317838 -0.02229275)
      PathPoint P2: tibia_l (-0.02697423 -0.3933788 0.008471244)
      PathPoint P3: calcn_l (0.03884474 0.03163332 0.02762185)
      PathPoint P4: calcn_l (0.1078097 0.007793718 0.02934106)
      PathPoint P5: calcn_l (0.1792674 -0.006074515 0.03083103)
      PathPoint P6: toes_l (0.01609875 -0.007335264 0.03037258)
      PathPoint P7: toes_l (0.05837097 -0.01169058 0.02074504)
    DeGrooteFregly2016Muscle gaslat_l: max_isometric_force=1804.746 optimal_fiber_length=0.07193332
        tendon_slack_length=0.4074416 pennation_angle_at_optimal=0.2102 activation_time_constant=0.015
        deactivation_time_constant=0.055 active_force_width_scale=1.5
      PathPoint P1: femur_l (-0.004126289 -0.4186796 -0.0380994)
      ConditionalPathPoint P2: femur_l (-0.0371366 -0.4379999 -0.03576117)
          socket_coordinate=/jointset/knee_l/knee_angle_l range=(-0.8727 0)
      ConditionalPathPoint P3: tibia_l (-0.03232448 -0.04393498 -0.03120985)
          socket_coordinate=/jointset/knee_l/knee_angle_l range=(-1.5708 0)
      PathPoint P4: calcn_l (0.004569969 0.03553018 0.006074515)
    DeGrooteFregly2016Muscle gasmed_l: max_isometric_force=3562.8 optimal_fiber_length=0.05764985
        tendon_slack_length=0.4328624 pennation_angle_at_optimal=0.1656816 activation_time_constant=0.022
        deactivation_time_constant=0.072 active_force_width_scale=1.5
      PathPoint P1: femur_l (0.01100344 -0.4158255 0.02860894)
      ConditionalPathPoint P2: femur_l (-0.03163488 -0.4336089 0.02613317)
          socket_coordinate=/jointset/knee_l/knee_angle_l range=(-0.8727 0)
      ConditionalPathPoint P3: tibia_l (-0.0356684 -0.04714973 0.01671956)
          socket_coordinate=/jointset/knee_l/knee_angle_l range=(-1.5708 0)
      PathPoint P4: calcn_l (0.004569969 0.03553018 0.006074515)
    DeGrooteFregly2016Muscle glmax2_l: max_isometric_force=3873.033 optimal_fiber_length=0.2251016
        tendon_slack_length=0.07264447 pennation_angle_at_optimal=0.3673821 activation_time_constant=0.103
        deactivation_time_constant=0.274
      PathPoint P1: pelvis (-0.1561178 0.008176322 -0.05025151)
      PathPoint P2: pelvis (-0.1593184 -0.05723426 -0.08842961)
      PathPoint P3: femur_l (-0.06189434 -0.06410826 -0.03466083)
      PathPoint P4: femur_l (-0.0214567 -0.1115308 -0.05763051)
    DeGrooteFregly2016Muscle glmed2_l: max_isometric_force=3238.84 optimal_fiber_length=0.07635447
        tendon_slack_length=0.06819605 pennation_angle_at_optimal=0.3165559 activation_time_constant=0.055
        deactivation_time_constant=0.156
      PathPoint P1: pelvis (-0.1007594 0.02969791 -0.07341942)
      PathPoint P2: femur_l (-0.03548609 -0.006366916 -0.07248515)
    DeGrooteFregly2016Muscle glmin2_l: max_isometric_force=1378.241 optimal_fiber_length=0.061333
        tendon_slack_length=0.02858556 pennation_angle_at_optimal=0 activation_time_constant=0.014
        deactivation_time_constant=0.054
      PathPoint P1: pelvis (-0.07302093 -0.01334526 -0.1056152)
      PathPoint P2: femur_l (-0.01320413 -0.01141654 -0.07702407)
    DeGrooteFregly2016Muscle grac_l: max_isometric_force=313.4206 optimal_fiber_length=0.2938193
        tendon_slack_length=0.1914277 pennation_angle_at_optimal=0.172 activation_time_constant=0.014
        deactivation_time_constant=0.053
      PathPoint P1: pelvis (-0.05614077 -0.1215359 -0.02671379)
      PathPoint P2: tibia_l (-0.02053162 -0.05095386 0.03300441)
      PathPoint P3: tibia_l (0.001984055 -0.07460373 0.01753325)
    DeGrooteFregly2016Muscle iliacus_l: max_isometric_force=1189.745 optimal_fiber_length=0.1219762
        tendon_slack_length=0.1023748 pennation_angle_at_optimal=0.2799 activation_time_constant=0.02
        deactivation_time_constant=0.067
      PathPoint P1: pelvis (-0.07171698 0.02904004 -0.09169269)
      PathPoint P2: pelvis (-0.01600296 -0.05234726 -0.08222975)
      ConditionalPathPoint P3: pelvis (-0.04267457 -0.08928168 -0.09027869)
          socket_coordinate=/jointset/hip_l/hip_flexion_l range=(-1.5708 0)
      PathPoint P4: femur_l (-0.003163488 -0.06202254 -0.01911847)
      PathPoint P5: femur_l (-0.01678024 -0.0699263 -0.02695842)
    DeGrooteFregly2016Muscle intobl_l: max_isometric_force=1057.568 optimal_fiber_length=0.1056409
        tendon_slack_length=0.1056409 pennation_angle_at_optimal=0 activation_time_constant=0.013
        deactivation_time_constant=0.049
      PathPoint P1: pelvis (-0.04741619 0.0657865 -0.1258463)
      PathPoint P2: torso (0.08828951 0.1708738 -0.02114519)
    DeGrooteFregly2016Muscle obtext_l: max_isometric_force=109.1758 optimal_fiber_length=0.06097655
        tendon_slack_length=0.0498223 pennation_angle_at_optimal=0.1222 activation_time_constant=0.006
        deactivation_time_constant=0.032
      PathPoint P1: pelvis (-0.1007594 -0.1081718 -0.04024472)
      PathPoint P2: femur_l (-0.04814004 -0.03512781 -0.05639262)
    DeGrooteFregly2016Muscle pect_l: max_isometric_force=288.8772 optimal_fiber_length=0.09144416
        tendon_slack_length=0.03772072 pennation_angle_at_optimal=0 activation_time_constant=0.008
        deactivation_time_constant=0.037
      PathPoint P1: pelvis (-0.05109094 -0.07217719 -0.04905505)
      PathPoint P2: femur_l (-0.01678024 -0.09023457 -0.03479837)
    DeGrooteFregly2016Muscle perbrev_l: max_isometric_force=612.3381 optimal_fiber_length=0.04795125
        tendon_slack_length=0.1557888 pennation_angle_at_optimal=0.2052 activation_time_constant=0.008
        deactivation_time_constant=0.038
      PathPoint P1: tibia_l (-0.02708569 -0.2713253 -0.0279774)
      PathPoint P2: tibia_l (-0.03778621 -0.4171679 -0.02775447)
      PathPoint P3: tibia_l (-0.03176717 -0.4290625 -0.02842325)
      PathPoint P4: calcn_l (0.04891944 0.03094564 -0.02670494)
      PathPoint P5: calcn_l (0.07031521 0.02510036 -0.03931243)
    DeGrooteFregly2016Muscle perlong_l: max_isometric_force=1296.027 optimal_fiber_length=0.0542528
        tendon_slack_length=0.3547791 pennation_angle_at_optimal=0.248 activation_time_constant=0.016
        deactivation_time_constant=0.058
      PathPoint P1: tibia_l (-0.02229275 -0.1471286 -0.03143277)
      PathPoint P2: tibia_l (-0.03533401 -0.4179181 -0.02641691)
      PathPoint P3: tibia_l (-0.03031814 -0.4301341 -0.0267513)
      PathPoint P4: calcn_l (0.04549197 0.0263611 -0.02532958)
      PathPoint P5: calcn_l (0.07073066 0.01214903 -0.03255023)
      PathPoint P6: calcn_l (0.08849122 0.007908331 -0.01352439)
      PathPoint P7: calcn_l (0.1249471 0.009742147 0.02108888)
    DeGrooteFregly2016Muscle pertert_l: max_isometric_force=209.8067 optimal_fiber_length=0.0755087
        tendon_slack_length=0.08520023 pennation_angle_at_optimal=0.2269 activation_time_constant=0.007
        deactivation_time_constant=0.034
      PathPoint per_tert_l-P1: tibia_l (0.001114637 -0.3004724 -0.02574812)
      PathPoint per_tert_l-P2: tibia_l (0.0255252 -0.4199541 -0.02886911)
      PathPoint per_tert_l-P3: calcn_l (0.08901054 0.02613188 -0.03426944)
    DeGrooteFregly2016Muscle piri_l: max_isometric_force=1147.387 optimal_fiber_length=0.02897333
        tendon_slack_length=0.1280398 pennation_angle_at_optimal=0.1745 activation_time_constant=0.012
        deactivation_time_constant=0.046
      PathPoint P1: pelvis (-0.120686 -0.006136941 -0.01469476)
      PathPoint P2: pelvis (-0.120935 -0.02881449 -0.06626238)
      PathPoint P3: pelvis (-0.1102426 -0.0526292 -0.09898025)
      PathPoint P4: femur_l (-0.02035636 -0.003951879 -0.06010628)
    DeGrooteFregly2016Muscle popli_l: max_isometric_force=369.3327 optimal_fiber_length=0.04740478
        tendon_slack_length=0.08093499 pennation_angle_at_optimal=0 activation_time_constant=0.009
        deactivation_time_constant=0.04
      PathPoint P1: femur_l (-0.0137543 -0.4281202 -0.04814004)
      ConditionalPathPoint P2: femur_l (-0.02613317 -0.4314135 -0.03163488)
          socket_coordinate=/jointset/knee_l/knee_angle_l range=(-0.9599 0)
      PathPoint P3: tibia_l (-0.03455376 -0.03750547 0.01114637)
      PathPoint P4: tibia_l (-0.01114637 -0.06965301 0.01671956)
    DeGrooteFregly2016Muscle psoas_l: max_isometric_force=1681.734 optimal_fiber_length=0.275551
        tendon_slack_length=0.1048063 pennation_angle_at_optimal=0.2155251 activation_time_constant=0.025
        deactivation_time_constant=0.079
      PathPoint P1: torso (-0.01387407 0.1014563 -0.03524199)
      PathPoint P2: pelvis (-0.07183552 0.05826804 -0.04242011)
      PathPoint P3: pelvis (-0.0243008 -0.06146339 -0.0713528)
      ConditionalPathPoint P4: pelvis (-0.03674754 -0.08928168 -0.08048943)
          socket_coordinate=/jointset/hip_l/hip_flexion_l range=(-1.5708 0.5585)
      PathPoint P5: femur_l (-0.01815567 -0.05126465 -0.006326977)
      PathPoint P6: femur_l (-0.0323226 -0.05752179 -0.01210378)
    DeGrooteFregly2016Muscle quadfem_l: max_isometric_force=385.7917 optimal_fiber_length=0.06620084
        tendon_slack_length=0.0294226 pennation_angle_at_optimal=0 activation_time_constant=0.011
        deactivation_time_constant=0.045
      PathPoint quad_fem_l-P1: pelvis (-0.1354918 -0.1081718 -0.05656014)
      PathPoint quad_fem_l-P2: femur_l (-0.05240387 -0.03940902 -0.05034073)
    DeGrooteFregly2016Muscle recabd_l: max_isometric_force=801.0939 optimal_fiber_length=0.3653314
        tendon_slack_length=0.01733361 pennation_angle_at_optimal=0 activation_time_constant=0.031
        deactivation_time_constant=0.096
      PathPoint rectabd_l-P1: pelvis (-0.03082052 -0.0657865 -0.01196465)
      PathPoint rectabd_l-P2: torso (0.1160376 0.2370682 -0.04370007)
    DeGrooteFregly2016Muscle recfem_l: max_isometric_force=2490.669 optimal_fiber_length=0.0829209
        tendon_slack_length=0.4668261 pennation_angle_at_optimal=0.2170149 activation_time_constant=0.016
        deactivation_time_constant=0.057 active_force_width_scale=1.5 passive_fiber_strain_at_one_norm_force=1.5
      PathPoint P1: pelvis (-0.02844971 -0.03646452 -0.1014819)
      ConditionalPathPoint P2: femur_l (0.05501719 -0.4390977 -0.00275086)
          socket_coordinate=/jointset/knee_l/knee_angle_l range=(-3.1416 -1.309)
      PathPoint P3: patella_l (0.01097744 0.05378946 -0.0007684209)
      PathPoint P4: patella_l (0.0132827 0.04797142 0.001097744)
      PathPoint P5: patella_l (0.005488721 0.002711428 -3.293232e-5)
      PathPoint P6: tibia_l (0.03633718 -0.06763843 0.0005238796)
    DeGrooteFregly2016Muscle sart_l: max_isometric_force=284.9111 optimal_fiber_length=0.4372125
        tendon_slack_length=0.1345269 pennation_angle_at_optimal=0.0261 activation_time_constant=0.017
        deactivation_time_constant=0.059
      PathPoint P1: pelvis (-0.02311539 -0.01466099 -0.1148606)
      PathPoint P2: femur_l (-0.004126289 -0.3916751 0.05790559)
      PathPoint P3: tibia_l (-0.0279774 -0.04297055 0.04068427)
      PathPoint P4: tibia_l (-0.01772273 -0.06418793 0.02942643)
      PathPoint P5: tibia_l (0.01515907 -0.08679837 0.002898057)
    DeGrooteFregly2016Muscle semimem_l: max_isometric_force=2463.765 optimal_fiber_length=0.109455
        tendon_slack_length=0.3854767 pennation_angle_at_optimal=0.2546 activation_time_constant=0.026
        deactivation_time_constant=0.083 active_force_width_scale=1.5
      PathPoint P1: pelvis (-0.1169994 -0.107138 -0.06678448)
      PathPoint P2: tibia_l (-0.03232448 -0.04468508 0.02184689)
    DeGrooteFregly2016Muscle semiten_l: max_isometric_force=660.0438 optimal_fiber_length=0.288325
        tendon_slack_length=0.2747647 pennation_angle_at_optimal=0.2413 activation_time_constant=0.015
        deactivation_time_constant=0.056 active_force_width_scale=1.5
      PathPoint P1: pelvis (-0.123045 -0.1177578 -0.05601629)
      PathPoint P2: tibia_l (-0.03477669 -0.05443651 0.0255252)
      PathPoint P3: tibia_l (0.002117811 -0.0828335 0.01304126)
    DeGrooteFregly2016Muscle soleus_l: max_isometric_force=7215.481 optimal_fiber_length=0.05871582
        tendon_slack_length=0.2949644 pennation_angle_at_optimal=0.3814289 activation_time_constant=0.06
        deactivation_time_constant=0.167
      PathPoint P1: tibia_l (-0.008471244 -0.09815716 -0.01092345)
      PathPoint P2: calcn_l (0.004569969 0.03553018 0.006074515)
    DeGrooteFregly2016Muscle tfl_l: max_isometric_force=474.5892 optimal_fiber_length=0.1021281
        tendon_slack_length=0.4832272 pennation_angle_at_optimal=0.0524 activation_time_constant=0.01
        deactivation_time_constant=0.043
      PathPoint P1: pelvis (-0.03686609 0.02011187 -0.134983)
      PathPoint P2: femur_l (0.04043764 -0.1092255 -0.08211316)
      PathPoint P3: femur_l (0.0147171 -0.4445864 -0.04456392)
      PathPoint P4: tibia_l (0.01203808 -0.04393498 -0.03856645)
    DeGrooteFregly2016Muscle tibant_l: max_isometric_force=1439.672 optimal_fiber_length=0.07226025
        tendon_slack_length=0.251271 pennation_angle_at_optimal=0.1951828 activation_time_constant=0.023
        deactivation_time_constant=0.074
      PathPoint P1: tibia_l (0.01716542 -0.1405919 -0.01805713)
      PathPoint P2: tibia_l (0.0279774 -0.2042441 -0.01426736)
      PathPoint P3: tibia_l (0.02597105 -0.3920929 0.01471321)
      PathPoint P4: calcn_l (0.1211042 0.0204012 0.03495712)
    DeGrooteFregly2016Muscle tibpost_l: max_isometric_force=2018.745 optimal_fiber_length=0.04021186
        tendon_slack_length=0.292653 pennation_angle_at_optimal=0.2265 activation_time_constant=0.019
        deactivation_time_constant=0.066
      PathPoint P1: tibia_l (-0.004570013 -0.1397347 -0.01148077)
      PathPoint P2: tibia_l (-0.01828005 -0.3916642 0.01950615)
      PathPoint P3: calcn_l (0.04331084 0.03828091 0.03277946)
      PathPoint P4: calcn_l (0.08018219 0.01822355 0.03220639)
    DeGrooteFregly2016Muscle tricox_l: max_isometric_force=593.4927 optimal_fiber_length=0.06736055
        tendon_slack_length=0.06854231 pennation_angle_at_optimal=0 activation_time_constant=0.01
        deactivation_time_constant=0.042
      PathPoint P1: pelvis (-0.1315799 -0.09586033 -0.04024472)
      PathPoint P2: pelvis (-0.1564734 -0.07988361 -0.06852479)
      PathPoint P3: femur_l (-0.0195311 -0.003622556 -0.06093154)
    DeGrooteFregly2016Muscle vasint_l: max_isometric_force=1887.166 optimal_fiber_length=0.1327246
        tendon_slack_length=0.2257099 pennation_angle_at_optimal=0.06309973 activation_time_constant=0.022
        deactivation_time_constant=0.073
      PathPoint P1: femur_l (0.03988746 -0.211206 -0.04263832)
      PathPoint P2: femur_l (0.0460769 -0.2287699 -0.03919975)
      ConditionalPathPoint P3: femur_l (0.0508909 -0.4379999 -0.004126289)
          socket_coordinate=/jointset/knee_l/knee_angle_l range=(-3.1416 -1.309)
      PathPoint P4: patella_l (0.006366916 0.05269172 0.0006586465)
      PathPoint P5: patella_l (0.005488721 0.002711428 0.0004281202)
      PathPoint P6: tibia_l (0.03630374 -0.06772416 -0.0004792941)
    DeGrooteFregly2016Muscle vaslat_l: max_isometric_force=5665.911 optimal_fiber_length=0.131199
        tendon_slack_length=0.2488607 pennation_angle_at_optimal=0.2529 activation_time_constant=0.041
        deactivation_time_constant=0.119
      PathPoint P1: femur_l (0.006602063 -0.2035218 -0.0480025)
      PathPoint P2: femur_l (0.03699906 -0.2844255 -0.05625508)
      ConditionalPathPoint P3: femur_l (0.04676461 -0.4522706 -0.02338231)
          socket_coordinate=/jointset/knee_l/knee_angle_l range=(-3.1416 -1.309)
      PathPoint P4: patella_l (0.01130676 0.04643458 -0.01547819)
      PathPoint P5: patella_l (0.005488721 0.002711428 -0.008046465)
      PathPoint P6: tibia_l (0.0362703 -0.06791704 -0.005695797)
    DeGrooteFregly2016Muscle vasmed_l: max_isometric_force=3039.087 optimal_fiber_length=0.1330116
        tendon_slack_length=0.22438 pennation_angle_at_optimal=0.4222 activation_time_constant=0.03
        deactivation_time_constant=0.091
      PathPoint P1: femur_l (0.01925602 -0.2304165 -0.02585808)
      PathPoint P2: femur_l (0.0489653 -0.3039654 -0.001237887)
      ConditionalPathPoint P3: femur_l (0.04814004 -0.4500751 0.02063145)
          socket_coordinate=/jointset/knee_l/knee_angle_l range=(-3.1416 -1.309)
      PathPoint P4: patella_l (0.006915788 0.04884961 0.01866165)
      PathPoint P5: patella_l (0.005488721 0.002711428 0.009330825)
      PathPoint P6: tibia_l (0.03555693 -0.06812064 0.007557242)
    SmoothSphereHalfSpaceForce [values shared by the 12 below unless stated]: socket_half_space=/contactgeometryset/floor
        stiffness=3067776 [N/m^2] dissipation=2 [s/m] static_friction=0.8 dynamic_friction=0.8 viscous_friction=0.5
        transition_velocity=0.2 [m/s] hertz_smoothing=300 hunt_crossley_smoothing=50
    SmoothSphereHalfSpaceForce contactHeel_r: socket_sphere=/contactgeometryset/heel_r
    SmoothSphereHalfSpaceForce contactMH1_r: socket_sphere=/contactgeometryset/mh1_r
    SmoothSphereHalfSpaceForce contactMH3_r: socket_sphere=/contactgeometryset/mh3_r
    SmoothSphereHalfSpaceForce contactMH5_r: socket_sphere=/contactgeometryset/mh5_r
    SmoothSphereHalfSpaceForce contactHallux_r: socket_sphere=/contactgeometryset/hallux_r
    SmoothSphereHalfSpaceForce contactOtherToes_r: socket_sphere=/contactgeometryset/othertoes_r stiffness=306777.6
    SmoothSphereHalfSpaceForce contactHeel_l: socket_sphere=/contactgeometryset/heel_l
    SmoothSphereHalfSpaceForce contactMH1_l: socket_sphere=/contactgeometryset/mh1_l
    SmoothSphereHalfSpaceForce contactMH3_l: socket_sphere=/contactgeometryset/mh3_l
    SmoothSphereHalfSpaceForce contactMH5_l: socket_sphere=/contactgeometryset/mh5_l
    SmoothSphereHalfSpaceForce contactHallux_l: socket_sphere=/contactgeometryset/hallux_l
    SmoothSphereHalfSpaceForce contactOtherToes_l: socket_sphere=/contactgeometryset/othertoes_l stiffness=306777.6
  MarkerSet:
    Marker CV7: torso (-0.1072087 0.4645632 0.002331977) fixed=true
    Marker SJN: torso (0.05045115 0.4058253 0.002232275) fixed=true
    Marker R_SAE: torso (-0.08565786 0.3832459 0.2015455)
    Marker L_SAE: torso (-0.09875986 0.3985023 -0.1902132)
    Marker R_SAA: torso (-0.1260597 0.3675954 0.1776916)
    Marker L_SAA: torso (-0.1380016 0.3868279 -0.1595615)
    Marker R_HLE: humerus_r (0.01686089 -0.3381824 0.04496237) fixed=true
    Marker R_HME: humerus_r (0.002529133 -0.3454292 -0.05170673) fixed=true
    Marker R_RSP: radius_r (0.0005972469 -0.2357806 0.05972469) fixed=true
    Marker R_UHE: radius_r (-0.02627886 -0.2357806 -0.02627886) fixed=true
    Marker L_HLE: humerus_l (0.01470983 -0.3435783 -0.03922622) fixed=true
    Marker L_HME: humerus_l (0.002206524 -0.3509407 0.04511015) fixed=true
    Marker L_RSP: radius_l (0.0005738297 -0.2380013 -0.05738297) fixed=true
    Marker L_UHE: radius_l (-0.0252485 -0.2380013 0.0252485) fixed=true
    Marker R_IAS: pelvis (0.01129746 0.01699322 0.1397297) fixed=true
    Marker L_IAS: pelvis (0.01129746 0.01699322 -0.1397297) fixed=true
    Marker R_IPS: pelvis (-0.1837377 0.03289325 0.04894628) fixed=true
    Marker L_IPS: pelvis (-0.1837377 0.03289325 -0.04894628) fixed=true
    Marker R_FLE: femur_r (0 -0.4469187 0.06414084) fixed=true
    Marker R_FME: femur_r (0 -0.4469187 -0.06414084) fixed=true
    Marker R_FAL: tibia_r (-0.005585875 -0.4281436 0.05921027) fixed=true
    Marker R_TAM: tibia_r (0.00670305 -0.4104569 -0.04245265) fixed=true
    Marker R_FCC: calcn_r (-0.003998603 0.01332129 -0.001684305)
    Marker R_FM1: toes_r (0.0158624 0.02876821 -0.04456626)
    Marker R_FM5: toes_r (-0.01527137 0.01412219 0.076013)
    Marker L_FLE: femur_l (0 -0.4434886 -0.06877149) fixed=true
    Marker L_FME: femur_l (0 -0.4434886 0.06877149) fixed=true
    Marker L_FAL: tibia_l (-0.005573187 -0.424205 -0.05907578) fixed=true
    Marker L_TAM: tibia_l (0.006687824 -0.4066803 0.04235622) fixed=true
    Marker L_FCC: calcn_l (-0.005388472 0.002457582 0.006468963)
    Marker L_FM1: toes_l (0.00504654 0.02540481 0.04962735)
    Marker L_FM5: toes_l (-0.0272258 0.01013413 -0.06822897)
    Marker SXS: torso (0.1262062 0.2403088 0.002331977) fixed=true
    Marker TV10: torso (-0.1170857 0.1825633 0.002331977) fixed=true
    Marker L_UOA: ulna_l (-0.01449649 0.01152676 -0.01322757)
    Marker R_UOA: ulna_r (-0.02266532 0.004403682 0.01714312)
    Marker R_FAX: tibia_r (-0.02742647 -0.04533902 0.05714722)
    Marker L_FAX: tibia_l (-0.0198828 -0.04337906 -0.07215856)
    Marker L_TTC: tibia_l (0.05392381 -0.05291673 -0.0260481)
    Marker R_TTC: tibia_r (0.04487256 -0.05352637 0.008606929)
    Marker R_FM2: toes_r (0.02483209 0.03993939 0.01437226)
    Marker L_FM2: toes_l (0.02337056 0.03685699 -0.008490157)
    Marker R_HM2: hand_r (-0.0151112 -0.08408107 0.0433423)
    Marker R_HM5: hand_r (0.0532719 -0.08247856 -0.0447253)
    Marker L_HM2: hand_l (-0.01662929 -0.07275962 -0.03746459)
    Marker L_HM5: hand_l (0.07104408 -0.05929755 0.03061316)
    Marker R_FTC: femur_r (-0.01534451 -0.03596689 0.09774445) fixed=true
    Marker L_FTC: femur_l (-0.01645234 -0.03569085 -0.1048011) fixed=true
  ContactGeometrySet:
    ContactSphere heel_r: socket_frame=/bodyset/calcn_r location=(0.03168462 0.01217909 0) radius=0.035
    ContactSphere mh1_r: socket_frame=/bodyset/calcn_r location=(0.1841922 -0.009453062 -0.02684203) radius=0.015
    ContactSphere mh3_r: socket_frame=/bodyset/calcn_r location=(0.167797 -0.009453062 0.01353772) radius=0.015
    ContactSphere mh5_r: socket_frame=/bodyset/calcn_r location=(0.1447224 -0.009453062 0.04318065) radius=0.015
    ContactSphere hallux_r: socket_frame=/bodyset/toes_r location=(0.05687692 -0.01190386 -0.02112351) radius=0.015
    ContactSphere othertoes_r: socket_frame=/bodyset/toes_r location=(0.04463118 -0.007002268 0.02824248) radius=0.015
    ContactSphere heel_l: socket_frame=/bodyset/calcn_l location=(0.03251692 0.01196088 0) radius=0.035
    ContactSphere mh1_l: socket_frame=/bodyset/calcn_l location=(0.1890305 -0.009283693 0.0263611) radius=0.015
    ContactSphere mh3_l: socket_frame=/bodyset/calcn_l location=(0.1722047 -0.009283693 -0.01329517) radius=0.015
    ContactSphere mh5_l: socket_frame=/bodyset/calcn_l location=(0.148524 -0.009283693 -0.04240699) radius=0.015
    ContactSphere hallux_l: socket_frame=/bodyset/toes_l location=(0.05837097 -0.01169058 0.02074504) radius=0.015
    ContactSphere othertoes_l: socket_frame=/bodyset/toes_l location=(0.04580355 -0.00687681 -0.02773647) radius=0.015
    ContactHalfSpace floor: socket_frame=/ground orientation=(0 0 -1.570796)
