# OpenSim document version 40500
ScaleTool:
  mass: 62.8 [kg]
  height: -1
  age: -1
  GenericModelMaker:
    model_file: ..\model\Denton2023_SchreiberMoissenet2019.osim
  ModelScaler:
    apply: true
    scaling_order: measurements
    marker_file: ..\data\2014053\static\2014053_ST.trc
    time_range: 0 1
    preserve_mass_distribution: true
    output_model_file: ..\data\2014053\scaling\2014053_scaledModel_2d.osim
    output_scale_file: ..\data\2014053\scaling\2014053_scaleSet_2d.xml
    MeasurementSet:
      Measurement torso_depth: apply=true
        MarkerPair: markers=(CV7 SJN)
        MarkerPair: markers=(TV10 SXS)
        BodyScale torso: axes=X
      Measurement torso_height: apply=true
        MarkerPair: markers=(CV7 TV10)
        MarkerPair: markers=(SJN SXS)
        BodyScale torso: axes=Y
      Measurement torso_width: apply=true
        MarkerPair: markers=(R_SAE L_SAE)
        BodyScale torso: axes=Z
      Measurement pelvis_depth: apply=true
        MarkerPair: markers=(R_IAS R_IPS)
        MarkerPair: markers=(L_IAS L_IPS)
        BodyScale pelvis: axes=X
      Measurement pelvis_height: apply=true
        MarkerPair: markers=(R_IAS R_FTC)
        MarkerPair: markers=(L_IAS L_FTC)
        BodyScale pelvis: axes=Y
      Measurement pelvis_width: apply=true
        MarkerPair: markers=(R_IAS L_IAS)
        MarkerPair: markers=(R_IPS L_IPS)
        BodyScale pelvis: axes=Z
      Measurement r_thigh_length: apply=true
        MarkerPair: markers=(R_FTC R_FLE)
        BodyScale femur_r: axes=Y
      Measurement r_thigh_breadth: apply=true
        MarkerPair: markers=(R_FLE R_FME)
        BodyScale femur_r: axes=(X Z)
      Measurement r_patella: apply=true
        MarkerPair: markers=(R_FTC R_FLE)
        BodyScale patella_r: axes=(X Y Z)
      Measurement r_tibia_length: apply=true
        MarkerPair: markers=(R_TTC R_TAM)
        BodyScale tibia_r: axes=Y
        BodyScale talus_r: axes=Y
      Measurement r_tibia_breadth: apply=true
        MarkerPair: markers=(R_TAM R_FAL)
        BodyScale tibia_r: axes=(X Z)
        BodyScale talus_r: axes=(X Z)
      Measurement r_foot_length: apply=true
        MarkerPair: markers=(R_FCC R_FM2)
        BodyScale calcn_r: axes=X
        BodyScale toes_r: axes=X
      Measurement r_foot_width: apply=true
        MarkerPair: markers=(R_FM1 R_FM5)
        BodyScale calcn_r: axes=(Y Z)
        BodyScale toes_r: axes=(Y Z)
      Measurement l_thigh_length: apply=true
        MarkerPair: markers=(L_FTC L_FLE)
        BodyScale femur_l: axes=Y
      Measurement l_thigh_breadth: apply=true
        MarkerPair: markers=(L_FLE L_FME)
        BodyScale femur_l: axes=(X Z)
      Measurement l_patella: apply=true
        MarkerPair: markers=(L_FTC L_FLE)
        BodyScale patella_l: axes=(X Y Z)
      Measurement l_tibia_length: apply=true
        MarkerPair: markers=(L_TTC L_TAM)
        BodyScale tibia_l: axes=Y
        BodyScale talus_l: axes=Y
      Measurement l_tibia_breadth: apply=true
        MarkerPair: markers=(L_TAM L_FAL)
        BodyScale tibia_l: axes=(X Z)
        BodyScale talus_l: axes=(X Z)
      Measurement l_foot_length: apply=true
        MarkerPair: markers=(L_FCC L_FM2)
        BodyScale calcn_l: axes=X
        BodyScale toes_l: axes=X
      Measurement l_foot_width: apply=true
        MarkerPair: markers=(L_FM1 L_FM5)
        BodyScale calcn_l: axes=(Y Z)
        BodyScale toes_l: axes=(Y Z)
      Measurement r_upperarm_length: apply=true
        MarkerPair: markers=(R_SAA R_UOA)
        BodyScale humerus_r: axes=Y
      Measurement r_upperarm_breadth: apply=true
        MarkerPair: markers=(R_HLE R_HME)
        BodyScale humerus_r: axes=(X Z)
      Measurement r_forearm_length: apply=true
        MarkerPair: markers=(R_HLE R_RSP)
        MarkerPair: markers=(R_HME R_UHE)
        BodyScale radius_r: axes=Y
        BodyScale ulna_r: axes=Y
      Measurement r_forearm_breadth: apply=true
        MarkerPair: markers=(R_RSP R_UHE)
        BodyScale radius_r: axes=(X Z)
        BodyScale ulna_r: axes=(X Z)
      Measurement r_hand_length: apply=true
        MarkerPair: markers=(R_RSP R_HM2)
        MarkerPair: markers=(R_UHE R_HM5)
        BodyScale hand_r: axes=Y
      Measurement r_hand_breadth: apply=true
        MarkerPair: markers=(R_HM2 R_HM5)
        BodyScale hand_r: axes=(X Z)
      Measurement l_upperarm_length: apply=true
        MarkerPair: markers=(L_SAA L_UOA)
        BodyScale humerus_l: axes=Y
      Measurement l_upperarm_breadth: apply=true
        MarkerPair: markers=(L_HLE L_HME)
        BodyScale humerus_l: axes=(X Z)
      Measurement l_forearm_length: apply=true
        MarkerPair: markers=(L_HLE L_RSP)
        MarkerPair: markers=(L_HME L_UHE)
        BodyScale radius_l: axes=Y
        BodyScale ulna_l: axes=Y
      Measurement l_forearm_breadth: apply=true
        MarkerPair: markers=(L_RSP L_UHE)
        BodyScale radius_l: axes=(X Z)
        BodyScale ulna_l: axes=(X Z)
      Measurement l_hand_length: apply=true
        MarkerPair: markers=(L_RSP L_HM2)
        MarkerPair: markers=(L_UHE L_HM5)
        BodyScale hand_l: axes=Y
      Measurement l_hand_breadth: apply=true
        MarkerPair: markers=(L_HM2 L_HM5)
        BodyScale hand_l: axes=(X Z)
  MarkerPlacer:
    apply: false
    marker_file: ..\data\2014053\static\2014053_ST.trc
    time_range: -1 -1
    max_marker_movement: -1
