# OpenSim document version 40500
ScaleTool:
  mass: 60.2 [kg]
  height: -1
  age: -1
  GenericModelMaker:
    model_file: ..\model\Miller2021_SchreiberMoissenet2019.osim
  ModelScaler:
    apply: true
    scaling_order: measurements
    marker_file: ..\data\2015007\static\2015007_ST.trc
    time_range: 0 1
    preserve_mass_distribution: true
    output_model_file: ..\data\2015007\scaling\2015007_scaledModel.osim
    output_scale_file: ..\data\2015007\scaling\2015007_scaleSet.xml
    MeasurementSet:
      Measurement torso_depth: apply=true
        MarkerPair: markers=(CV7 SJN)
        MarkerPair: markers=(TV10 SXS)
        BodyScale torso: axes=X
      Measurement torso_height: apply=true
        MarkerPair: markers=(CV7 TV10)
        MarkerPair: markers=(SJN SXS)
        BodyScale torso: axes=Y
      Measurement torso_width: apply=true
        MarkerPair: markers=(R_SAE L_SAE)
        BodyScale torso: axes=Z
      Measurement pelvis_depth: apply=true
        MarkerPair: markers=(R_IAS R_IPS)
        MarkerPair: markers=(L_IAS L_IPS)
        BodyScale pelvis: axes=X
      Measurement pelvis_height: apply=true
        MarkerPair: markers=(R_IAS R_FTC)
        MarkerPair: markers=(L_IAS L_FTC)
        BodyScale pelvis: axes=Y
      Measurement pelvis_width: apply=true
        MarkerPair: markers=(R_IAS L_IAS)
        MarkerPair: markers=(R_IPS L_IPS)
        BodyScale pelvis: axes=Z
      Measurement r_thigh_length: apply=true
        MarkerPair: markers=(R_FTC R_FLE)
        BodyScale femur_r: axes=Y
      Measurement r_thigh_breadth: apply=true
        MarkerPair: markers=(R_FLE R_FME)
        BodyScale femur_r: axes=(X Z)
      Measurement r_patella: apply=true
        MarkerPair: markers=(R_FTC R_FLE)
        BodyScale patella_r: axes=(X Y Z)
      Measurement r_tibia_length: apply=true
        MarkerPair: markers=(R_TTC R_TAM)
        BodyScale tibia_r: axes=Y
        BodyScale talus_r: axes=Y
      Measurement r_tibia_breadth: apply=true
        MarkerPair: markers=(R_TAM R_FAL)
        BodyScale tibia_r: axes=(X Z)
        BodyScale talus_r: axes=(X Z)
      Measurement r_foot_length: apply=true
        MarkerPair: markers=(R_FCC R_FM2)
        BodyScale calcn_r: axes=X
        BodyScale toes_r: axes=X
      Measurement r_foot_width: apply=true
        MarkerPair: markers=(R_FM1 R_FM5)
        BodyScale calcn_r: axes=(Y Z)
        BodyScale toes_r: axes=(Y Z)
      Measurement l_thigh_length: apply=true
        MarkerPair: markers=(L_FTC L_FLE)
        BodyScale femur_l: axes=Y
      Measurement l_thigh_breadth: apply=true
        MarkerPair: markers=(L_FLE L_FME)
        BodyScale femur_l: axes=(X Z)
      Measurement l_patella: apply=true
        MarkerPair: markers=(L_FTC L_FLE)
        BodyScale patella_l: axes=(X Y Z)
      Measurement l_tibia_length: apply=true
        MarkerPair: markers=(L_TTC L_TAM)
        BodyScale tibia_l: axes=Y
        BodyScale talus_l: axes=Y
      Measurement l_tibia_breadth: apply=true
        MarkerPair: markers=(L_TAM L_FAL)
        BodyScale tibia_l: axes=(X Z)
        BodyScale talus_l: axes=(X Z)
      Measurement l_foot_length: apply=true
        MarkerPair: markers=(L_FCC L_FM2)
        BodyScale calcn_l: axes=X
        BodyScale toes_l: axes=X
      Measurement l_foot_width: apply=true
        MarkerPair: markers=(L_FM1 L_FM5)
        BodyScale calcn_l: axes=(Y Z)
        BodyScale toes_l: axes=(Y Z)
      Measurement r_upperarm_length: apply=true
        MarkerPair: markers=(R_SAA R_UOA)
        BodyScale humerus_r: axes=Y
      Measurement r_upperarm_breadth: apply=true
        MarkerPair: markers=(R_HLE R_HME)
        BodyScale humerus_r: axes=(X Z)
      Measurement r_forearm_length: apply=true
        MarkerPair: markers=(R_HLE R_RSP)
        MarkerPair: markers=(R_HME R_UHE)
        BodyScale radius_r: axes=Y
        BodyScale ulna_r: axes=Y
      Measurement r_forearm_breadth: apply=true
        MarkerPair: markers=(R_RSP R_UHE)
        BodyScale radius_r: axes=(X Z)
        BodyScale ulna_r: axes=(X Z)
      Measurement r_hand_length: apply=true
        MarkerPair: markers=(R_RSP R_HM2)
        MarkerPair: markers=(R_UHE R_HM5)
        BodyScale hand_r: axes=Y
      Measurement r_hand_breadth: apply=true
        MarkerPair: markers=(R_HM2 R_HM5)
        BodyScale hand_r: axes=(X Z)
      Measurement l_upperarm_length: apply=true
        MarkerPair: markers=(L_SAA L_UOA)
        BodyScale humerus_l: axes=Y
      Measurement l_upperarm_breadth: apply=true
        MarkerPair: markers=(L_HLE L_HME)
        BodyScale humerus_l: axes=(X Z)
      Measurement l_forearm_length: apply=true
        MarkerPair: markers=(L_HLE L_RSP)
        MarkerPair: markers=(L_HME L_UHE)
        BodyScale radius_l: axes=Y
        BodyScale ulna_l: axes=Y
      Measurement l_forearm_breadth: apply=true
        MarkerPair: markers=(L_RSP L_UHE)
        BodyScale radius_l: axes=(X Z)
        BodyScale ulna_l: axes=(X Z)
      Measurement l_hand_length: apply=true
        MarkerPair: markers=(L_RSP L_HM2)
        MarkerPair: markers=(L_UHE L_HM5)
        BodyScale hand_l: axes=Y
      Measurement l_hand_breadth: apply=true
        MarkerPair: markers=(L_HM2 L_HM5)
        BodyScale hand_l: axes=(X Z)
  MarkerPlacer:
    apply: true
    marker_file: ..\data\2015007\static\2015007_ST.trc
    time_range: 0 1
    output_motion_file: ..\data\2015007\scaling\2015007_staticMotion.mot
    output_model_file: ..\data\2015007\scaling\2015007_scaledModelAdjusted.osim
    max_marker_movement: -1
    IKTaskSet:
      IKMarkerTask SJN: weight=5
      IKMarkerTask SXS: weight=5
      IKMarkerTask CV7: weight=5
      IKMarkerTask TV10: weight=5
      IKMarkerTask R_SAE: apply=false weight=0
      IKMarkerTask L_SAE: apply=false weight=0
      IKMarkerTask L_IAS: weight=10
      IKMarkerTask L_IPS: weight=10
      IKMarkerTask R_IAS: weight=5
      IKMarkerTask R_IPS: weight=5
      IKMarkerTask R_FTC: weight=2.5
      IKMarkerTask R_FLE: weight=5
      IKMarkerTask R_FME: weight=5
      IKMarkerTask R_TTC: weight=2.5
      IKMarkerTask R_FAX: weight=2.5
      IKMarkerTask R_TAM: weight=5
      IKMarkerTask R_FAL: weight=5
      IKMarkerTask R_FCC: weight=5
      IKMarkerTask R_FM1: weight=2.5
      IKMarkerTask R_FM2: weight=2.5
      IKMarkerTask R_FM5: weight=2.5
      IKMarkerTask L_FTC: weight=2.5
      IKMarkerTask L_FLE: weight=5
      IKMarkerTask L_FME: weight=5
      IKMarkerTask L_TTC: weight=2.5
      IKMarkerTask L_FAX: weight=2.5
      IKMarkerTask L_TAM: weight=5
      IKMarkerTask L_FAL: weight=5
      IKMarkerTask L_FCC: weight=5
      IKMarkerTask L_FM1: weight=2.5
      IKMarkerTask L_FM2: weight=2.5
      IKMarkerTask L_FM5: weight=2.5
      IKMarkerTask R_SAA: apply=false weight=0
      IKMarkerTask R_HLE: weight=1
      IKMarkerTask R_HME: weight=1
      IKMarkerTask R_UOA: weight=1
      IKMarkerTask R_RSP: weight=1
      IKMarkerTask R_UHE: weight=1
      IKMarkerTask R_HM2: weight=1
      IKMarkerTask R_HM5: apply=false weight=0
      IKMarkerTask L_SAA: apply=false weight=0
      IKMarkerTask L_HLE: weight=1
      IKMarkerTask L_HME: weight=1
      IKMarkerTask L_UOA: weight=1
      IKMarkerTask L_RSP: weight=1
      IKMarkerTask L_UHE: weight=1
      IKMarkerTask L_HM2: weight=1
      IKMarkerTask L_HM5: apply=false weight=0
